// Define ellipsoid's raduis, sRel, and ARel based on origin and insertion nodes
AnyFloat pos_node1 = .HumerusRef.r0 + (.HumerusRef.Axes0 * Node1.sRel')'-.r0;
AnyFloat pos_node2 ??=  .ScapulaRef.r0 + (.ScapulaRef.Axes0 * Node2.sRel')'-.r0;
AnyFloat axes_node2 ??= .ScapulaRef.Axes0 * Node2.ARel;
AnyFloat pos_node3 ??= .ScapulaRef.r0 + (.ScapulaRef.Axes0 * Node3.sRel')'-.r0;

AnyFloat Rxy ??= vnorm( (pos_node2 - pos_node1) )/5;
AnyFloat Rz = Rxy*5;
AnyFloat DistanceRatio ??= 1.45;
AnyFloat AdjustorDirection ??= {1,0.3,0};
Radius = {Rxy, Rxy, Rz};
AnyFloat Sizes = Radius;
AnyMatrix RotMatrix ??= RotMat(pos_node1, pos_node2, pos_node3) * RotMat(pi/2,x);
sRel ??= (pos_node2 + pos_node1)/2 + Rxy*DistanceRatio * (RotMatrix*(AdjustorDirection/vnorm(AdjustorDirection))')';
ARel ??= RotMatrix;

// viewSurface = {Visible = On; Opacity = 0.1; RGB = {0.5, 0.1, 0.1}; Transparency = 0.7; };
