ArmCalibrationStudy ArmCalibration1Left(
  BodyModelRef = Main.HumanModel.BodyModel,
Side = Left,
) = {
  nStep = .ArmCalibration1Right.nStep;

  MuscleArr = ObjSearch(
  &..BodyModel.Left.ShoulderArm.Muscles,
  {
    "DeltoideusAnterior.*",
    "DeltoideusLateral.*",
    "DeltoideusPosterior.*",
    "Infraspinatus.*",
    "LatissimusDorsi.*",
    "LevatorScapulae.*",
    "PectoralisMajorClavicular.*",
    "PectoralisMajorThoracic.*",
    "PectoralisMinor.*",
    "SerratusAnterior.*",
    "Subscapularis.*",
    "Supraspinatus.*",
  },
  "AnyMuscle"
  );

  RminMuscleFiber = repmat(NumElemOf(MuscleArr), .RValues.RMinDefault);
  RmaxMuscleFiber = repmat(NumElemOf(MuscleArr), .RValues.RMaxDefault);

  ShoulderPositions = .ArmCalibration1Right.ShoulderPositions;
  ScapulaElevationPositions = .ArmCalibration1Right.ScapulaElevationPositions;
  ScapulaProtractionPositions = .ArmCalibration1Right.ScapulaProtractionPositions;
  ElbowFlexionPositions = .ArmCalibration1Right.ElbowFlexionPositions;
  ElbowPronationPositions = .ArmCalibration1Right.ElbowPronationPositions;
  WristFlexionPositions = .ArmCalibration1Right.WristFlexionPositions;
  WristAbductionPositions = .ArmCalibration1Right.WristAbductionPositions;
};


CalibrationSequence = {
  AnyOperation &ArmCal1Left = .ArmCalibration1Left.FiberAndTendonLengthAdjustment;
};
