// This file contains muscle attachment points for the clavicle segment data from VU sub 2.
// The original coordinates have been transformed from global coordinates to the segment local
// coordinate system
AnyFolder &Clavicula =..Segments.Clavicula;

Clavicula = {

  #include "../DrawSettings/SegmentAxes.any"

  AnyRefNode O_DeltoideusAnterior1       = {sRel = .Scale(.Data.O_DeltoideusAnterior1_pos*.Mirror);};
  AnyRefNode O_DeltoideusAnterior2       = {sRel = .Scale(.Data.O_DeltoideusAnterior2_pos*.Mirror);};
  AnyRefNode O_DeltoideusAnterior3       = {sRel = .Scale(.Data.O_DeltoideusAnterior3_pos*.Mirror);};
  AnyRefNode O_DeltoideusAnterior4       = {sRel = .Scale(.Data.O_DeltoideusAnterior4_pos*.Mirror);};

  AnyRefNode O_PectoralisMajorClavicular1 = {sRel = .Scale(.Data.O_PectoralisMajorClavicular1_pos*.Mirror);};
  AnyRefNode O_PectoralisMajorClavicular2 = {sRel = .Scale(.Data.O_PectoralisMajorClavicular2_pos*.Mirror);};
  AnyRefNode O_PectoralisMajorClavicular3 = {sRel = .Scale(.Data.O_PectoralisMajorClavicular3_pos*.Mirror);};
  AnyRefNode O_PectoralisMajorClavicular4 = {sRel = .Scale(.Data.O_PectoralisMajorClavicular4_pos*.Mirror);};
  AnyRefNode O_PectoralisMajorClavicular5 = {sRel = .Scale(.Data.O_PectoralisMajorClavicular5_pos*.Mirror);};

  AnyRefNode I_TrapeziusClavicular1        = {sRel = .Scale(.Data.I_TrapeziusClavicular1_pos*.Mirror);};
  AnyRefNode I_TrapeziusClavicular2        = {sRel = .Scale(.Data.I_TrapeziusClavicular2_pos*.Mirror);};
  AnyRefNode I_TrapeziusClavicular3        = {sRel = .Scale(.Data.I_TrapeziusClavicular3_pos*.Mirror);};
  AnyRefNode I_TrapeziusClavicular4        = {sRel = .Scale(.Data.I_TrapeziusClavicular4_pos*.Mirror);};
  AnyRefNode I_TrapeziusClavicular5        = {sRel = .Scale(.Data.I_TrapeziusClavicular5_pos*.Mirror);};
  AnyRefNode I_TrapeziusClavicular6        = {sRel = .Scale(.Data.I_TrapeziusClavicular6_pos*.Mirror);};

  AnyRefNode SternocleidomastoidNode = {sRel = .Scale(.Data.SternocleidomastoidNode_pos*.Mirror);};
};
