/* Range of Motion definition for the Leg */

AnyFolder RangeOfMotion = {
  AnyFolder Hip = {
    AnyVar MaxExternalRotationAngle = 30;
    AnyVar MaxInternalRotationAngle = -30;
    AnyVar MaxAdductionAngle = -15;
    AnyVar MaxAdductionInExtensionAngle = -10;
    AnyVar MaxAbductionAngle = 40;
    AnyVar MaxFlexionAngle = 110;
    AnyVar MaxExtensionAngle = -20;
    AnyVar MaxExtensionInAdductionAngle = -10;
    AnyVar MaxFlexionInAbductionAngle = 90;
    AnyVar MinFlexionInAdduction = 5;
    AnyVar Neutral = 0;

    // Hip positions
    AnyFloat Neutral = { Neutral, Neutral, Neutral };
    AnyFloat InternallyRotated = { 0, 0, MaxInternalRotationAngle };
    AnyFloat ExternallyRotated = { 0, 0, MaxExternalRotationAngle };
    AnyFloat Adduction = { MinFlexionInAdduction,  MaxAdductionAngle, 0};
    AnyFloat Abduction = { 0,  MaxAbductionAngle, 0};
    AnyFloat Flexed = { MaxFlexionAngle,  0, 0};
    AnyFloat FlexedAndAdducted = { MaxFlexionAngle,  MaxAdductionAngle, 0};
    AnyFloat FlexedAndAbducted = { MaxFlexionInAbductionAngle,  MaxAbductionAngle, 0};
    AnyFloat Extended = { MaxExtensionAngle,  0, 0};
    AnyFloat ExtendedAndAdducted = { MaxExtensionInAdductionAngle,  MaxAdductionInExtensionAngle, 0};
    AnyFloat AbductedAndExternallyRotated = {0,  MaxAbductionAngle,  MaxExternalRotationAngle};
  };

  AnyFolder Knee = {
    AnyVar Neutral = 0;
    AnyVar MaxFlexionAngle = 130;
    AnyVar MaxExtensionAngle = -3;
  };

  AnyFolder Ankle = {
    AnyVar Neutral = 0;
    AnyVar MaxPlantarFlexionAngle = 45;
    AnyVar MaxDorsiFlexionAngle = -20;
    AnyVar MaxInversionAngle = 15;
    AnyVar MaxEversionAngle = -20;
  };
};
