//#define  OBLIQUUS_WRAP_ON_CYLS    //with this statement it will use wrapping on cylinders

#if BM_TRUNK_MUSCLES

#if BM_TRUNK_CAVITY_MODEL == _CAVITY_MODEL_VOLUME_
MuscleGroup Transversus = {
AnyMuscleViaPoint TransversusL1 = {
    AnyMuscleModel &MusMdl = ....MuscleModels.Right.Transversus.Transversus_1;
    AnyRefNode &Org = ....Segments.L1Seg.TransversusInsNode_R;
    AnyRefNode &Via01 = ....Abdominal.Layer_L1.BaseSegPosterior.TransversusPoints.Right.nn03;
    AnyRefNode &Via02 = ....Abdominal.Layer_L1.BaseSegAnterior.TransversusPoints.Right.nn01;
    AnyRefNode &Via03 = ....Abdominal.Layer_L1.BaseSegAnterior.TransversusPoints.Right.nn02;
    AnyRefNode &Via04 = ....Abdominal.Layer_L1.BaseSegAnterior.TransversusPoints.Right.nn03;
    AnyRefNode &Via05 = ....Abdominal.Layer_L1.BaseSegAnterior.TransversusPoints.Right.nn04;
    AnyRefNode &Via06 = ....Abdominal.Layer_L1.BaseSegAnterior.TransversusPoints.Right.nn05;
    AnyRefNode &Via07 = ....Abdominal.Layer_L1.BaseSegAnterior.TransversusPoints.Right.nn06;
    AnyRefNode &Ins = ....Abdominal.Layer_L1.BaseSegAnterior.TransversusPoints.Center;
    viewMuscle = {#include "../DrawSettings/MusDrawSettings.any"};
  };

  AnyMuscleViaPoint TransversusL2 = {
    AnyMuscleModel &MusMdl = ....MuscleModels.Right.Transversus.Transversus_2;
    AnyRefNode &Org = ....Segments.L2Seg.TransversusInsNode_R;
    AnyRefNode &Via01 = ....Abdominal.Layer_L2.BaseSegPosterior.TransversusPoints.Right.nn03;
    AnyRefNode &Via02 = ....Abdominal.Layer_L2.BaseSegAnterior.TransversusPoints.Right.nn01;
    AnyRefNode &Via03 = ....Abdominal.Layer_L2.BaseSegAnterior.TransversusPoints.Right.nn02;
    AnyRefNode &Via04 = ....Abdominal.Layer_L2.BaseSegAnterior.TransversusPoints.Right.nn03;
    AnyRefNode &Via05 = ....Abdominal.Layer_L2.BaseSegAnterior.TransversusPoints.Right.nn04;
    AnyRefNode &Via06 = ....Abdominal.Layer_L2.BaseSegAnterior.TransversusPoints.Right.nn05;
    AnyRefNode &Via07 = ....Abdominal.Layer_L2.BaseSegAnterior.TransversusPoints.Right.nn06;
    viewMuscle = {#include "../DrawSettings/MusDrawSettings.any"};
  };

  AnyMuscleViaPoint TransversusL3 = {
    AnyMuscleModel &MusMdl = ....MuscleModels.Right.Transversus.Transversus_3;
    AnyRefNode &Org = ....Segments.L3Seg.TransversusInsNode_R;
    AnyRefNode &Via01 = ....Abdominal.Layer_L3.BaseSegPosterior.TransversusPoints.Right.nn03;
    AnyRefNode &Via02 = ....Abdominal.Layer_L3.BaseSegAnterior.TransversusPoints.Right.nn01;
    AnyRefNode &Via03 = ....Abdominal.Layer_L3.BaseSegAnterior.TransversusPoints.Right.nn02;
    AnyRefNode &Via04 = ....Abdominal.Layer_L3.BaseSegAnterior.TransversusPoints.Right.nn03;
    AnyRefNode &Via05 = ....Abdominal.Layer_L3.BaseSegAnterior.TransversusPoints.Right.nn04;
    AnyRefNode &Via06 = ....Abdominal.Layer_L3.BaseSegAnterior.TransversusPoints.Right.nn05;
    AnyRefNode &Via07 = ....Abdominal.Layer_L3.BaseSegAnterior.TransversusPoints.Right.nn06;
    viewMuscle = {#include "../DrawSettings/MusDrawSettings.any"};
  };

  AnyMuscleViaPoint TransversusL4 = {
    AnyMuscleModel &MusMdl = ....MuscleModels.Right.Transversus.Transversus_4;
    AnyRefNode &Org = ....Segments.L4Seg.TransversusInsNode_R;
    AnyRefNode &Via01 = ....Abdominal.Layer_L4.BaseSegPosterior.TransversusPoints.Right.nn03;
    AnyRefNode &Via02 = ....Abdominal.Layer_L4.BaseSegAnterior.TransversusPoints.Right.nn01;
    AnyRefNode &Via03 = ....Abdominal.Layer_L4.BaseSegAnterior.TransversusPoints.Right.nn02;
    AnyRefNode &Via04 = ....Abdominal.Layer_L4.BaseSegAnterior.TransversusPoints.Right.nn03;
    AnyRefNode &Via05 = ....Abdominal.Layer_L4.BaseSegAnterior.TransversusPoints.Right.nn04;
    AnyRefNode &Via06 = ....Abdominal.Layer_L4.BaseSegAnterior.TransversusPoints.Right.nn05;
    AnyRefNode &Via07 = ....Abdominal.Layer_L4.BaseSegAnterior.TransversusPoints.Right.nn06;
    viewMuscle = {#include "../DrawSettings/MusDrawSettings.any"};
  };

  AnyMuscleViaPoint TransversusL5 = {
    AnyMuscleModel &MusMdl = ....MuscleModels.Right.Transversus.Transversus_5;
    AnyRefNode &Org = ....Segments.L5Seg.TransversusInsNode_R;
    AnyRefNode &Via01 = ....Abdominal.Layer_L5.BaseSegPosterior.TransversusPoints.Right.nn03;
    AnyRefNode &Via02 = ....Abdominal.Layer_L5.BaseSegAnterior.TransversusPoints.Right.nn01;
    AnyRefNode &Via03 = ....Abdominal.Layer_L5.BaseSegAnterior.TransversusPoints.Right.nn02;
    AnyRefNode &Via04 = ....Abdominal.Layer_L5.BaseSegAnterior.TransversusPoints.Right.nn03;
    AnyRefNode &Via05 = ....Abdominal.Layer_L5.BaseSegAnterior.TransversusPoints.Right.nn04;
    AnyRefNode &Via06 = ....Abdominal.Layer_L5.BaseSegAnterior.TransversusPoints.Right.nn05;
    AnyRefNode &Via07 = ....Abdominal.Layer_L5.BaseSegAnterior.TransversusPoints.Right.nn06;
    viewMuscle = {#include "../DrawSettings/MusDrawSettings.any"};
  };
};

MuscleGroup Diaphragm = {

  AnyMuscleShortestPath L1_Diaphragm1 = {
    AnyMuscleModel &MusMdl = ....MuscleModels.Right.Diaphragm.L1_Diaphragm1;
    AnyRefNode &Org = ....Segments.L1Seg.L1_DiaphragmNode1R;
    AnyRefNode &Ins = ....Abdominal.Diaphragm.CavitySegSuperoanterior.Layer_T10.Right.L1_Diaphragm1Node;
    viewMuscle = {#include "../DrawSettings/MusDrawSettings.any"};
    viewForce.Visible ??= Off;
    AnyParamSurf &Srf = ....Abdominal.Diaphragm.CavitySegSuperoposterior.Layer_T10.Right.L1_Diaphragm1;
     SPLine = {
      StringMesh=35;
      AnyMatrix InitWrapPos = {transf3D({0,-.Srf.Radius[0],0}, &.Srf)};
      InitWrapPosVecArr = {&InitWrapPos};
    };
  };

  AnyMuscleShortestPath L1_Diaphragm2 = {
    AnyMuscleModel &MusMdl = ....MuscleModels.Right.Diaphragm.L1_Diaphragm2;
    AnyRefNode &Org = ....Segments.L1Seg.L1_DiaphragmNode2R;
    AnyRefNode &Ins = ....Abdominal.Diaphragm.CavitySegSuperoanterior.Layer_T10.Right.L1_Diaphragm2Node;
    viewMuscle = {#include "../DrawSettings/MusDrawSettings.any"};
    viewForce.Visible ??= Off;
    AnyParamSurf &Srf = ....Abdominal.Diaphragm.CavitySegSuperoposterior.Layer_T10.Right.L1_Diaphragm2;
     SPLine = {
      StringMesh=35;
      AnyMatrix InitWrapPos = {transf3D({0,-.Srf.Radius[0],0}, &.Srf)};
      InitWrapPosVecArr = {&InitWrapPos};
    };
  };

  AnyMuscleShortestPath L2_Diaphragm1 = {
    AnyMuscleModel &MusMdl = ....MuscleModels.Right.Diaphragm.L2_Diaphragm1;
    AnyRefNode &Org = ....Segments.L2Seg.L2_DiaphragmNode1R;
    AnyRefNode &Ins = ....Abdominal.Diaphragm.CavitySegSuperoanterior.Layer_T10.Right.L2_Diaphragm1Node;
    viewMuscle = {#include "../DrawSettings/MusDrawSettings.any"};
    viewForce.Visible ??= Off;
    AnyParamSurf &Srf = ....Abdominal.Diaphragm.CavitySegSuperoposterior.Layer_T10.Right.L2_Diaphragm1;
     SPLine = {
      StringMesh=35;
      AnyMatrix InitWrapPos = {transf3D({0,-.Srf.Radius[0],0}, &.Srf)};
      InitWrapPosVecArr = {&InitWrapPos};
    };
  };

  AnyMuscleShortestPath L2_Diaphragm2 = {
    AnyMuscleModel &MusMdl = ....MuscleModels.Right.Diaphragm.L2_Diaphragm2;
    AnyRefNode &Org = ....Segments.L2Seg.L2_DiaphragmNode2R;
    AnyRefNode &Ins = ....Abdominal.Diaphragm.CavitySegSuperoanterior.Layer_T10.Right.L2_Diaphragm2Node;
    viewMuscle = {#include "../DrawSettings/MusDrawSettings.any"};
    viewForce.Visible ??= Off;
    AnyParamSurf &Srf = ....Abdominal.Diaphragm.CavitySegSuperoposterior.Layer_T10.Right.L2_Diaphragm2;
     SPLine = {
      StringMesh=35;
      AnyMatrix InitWrapPos = {transf3D({0,-.Srf.Radius[0],0}, &.Srf)};
      InitWrapPosVecArr = {&InitWrapPos};
    };
  };

  AnyMuscleShortestPath L1TransverseProcess_Diaphragm = {
    AnyMuscleModel &MusMdl = ....MuscleModels.Right.Diaphragm.L1TransverseProcess_Diaphragm;
    AnyRefNode &Org = ....Segments.L1Seg.L1TransversProcess_DiaphragmR;
    AnyRefNode &Ins = ....Abdominal.Diaphragm.CavitySegSuperoanterior.Layer_T10.Right.L1TransversProcess_DiaphragmNode;
    viewMuscle = {#include "../DrawSettings/MusDrawSettings.any"};
    viewForce.Visible ??= Off;
    AnyParamSurf &Srf = ....Abdominal.Diaphragm.CavitySegSuperoposterior.Layer_T10.Right.L1TransverseProcess_Diaphragm;
     SPLine = {
      StringMesh=35;
      AnyMatrix InitWrapPos = {transf3D({0,-.Srf.Radius[0],0}, &.Srf)};
      InitWrapPosVecArr = {&InitWrapPos};
    };
  };
  AnyMuscleShortestPath R12_Diaphragm2 = {
    AnyMuscleModel &MusMdl = ....MuscleModels.Right.Diaphragm.R12_Diaphragm2;
    AnyRefNode &Org = ....Segments.Right.R12Seg.R12_DiaphragmNode2R;
    AnyRefNode &Ins = ....Abdominal.Diaphragm.CavitySegSuperoanterior.Layer_T10.Right.R12_Diaphragm2Node;
    viewMuscle = {#include "../DrawSettings/MusDrawSettings.any"};
    viewForce.Visible ??= Off;
    AnyParamSurf &Srf = ....Abdominal.Diaphragm.CavitySegSuperoposterior.Layer_T10.Right.R12_Diaphragm2;
     SPLine = {
      StringMesh=35;
      AnyMatrix InitWrapPos = {transf3D({0,-.Srf.Radius[0],0}, &.Srf)};
      InitWrapPosVecArr = {&InitWrapPos};
    };
  };
  AnyMuscleShortestPath R12_Diaphragm1 = {
    AnyMuscleModel &MusMdl = ....MuscleModels.Right.Diaphragm.R12_Diaphragm1;
    AnyRefNode &Org = ....Segments.Right.R12Seg.R12_DiaphragmNode1R;
    AnyRefNode &Ins = ....Abdominal.Diaphragm.CavitySegSuperoanterior.Layer_T10.Right.R12_Diaphragm1Node;
    viewMuscle = {#include "../DrawSettings/MusDrawSettings.any"};
    viewForce.Visible ??= Off;
    AnyParamSurf &Srf = ....Abdominal.Diaphragm.CavitySegSuperoposterior.Layer_T10.Right.R12_Diaphragm1;
     SPLine = {
      StringMesh=35;
      AnyMatrix InitWrapPos = {transf3D({0,-.Srf.Radius[0],0}, &.Srf)};
      InitWrapPosVecArr = {&InitWrapPos};
    };
 };
  AnyMuscleShortestPath R11_Diaphragm3 = {
    AnyMuscleModel &MusMdl = ....MuscleModels.Right.Diaphragm.R11_Diaphragm3;
    AnyRefNode &Org = ....Segments.Right.R11Seg.R11_DiaphragmNode3R;
    AnyRefNode &Ins = ....Abdominal.Diaphragm.CavitySegSuperoanterior.Layer_T10.Right.R11_Diaphragm3Node;
    viewMuscle = {#include "../DrawSettings/MusDrawSettings.any"};
    viewForce.Visible ??= Off;
    AnyParamSurf &Srf = ....Abdominal.Diaphragm.CavitySegSuperoanterior.Layer_T10.Right.R11_Diaphragm3;
     SPLine = {
      StringMesh=35;
      AnyMatrix InitWrapPos = {transf3D({0,-.Srf.Radius[0],0}, &.Srf)};
      InitWrapPosVecArr = {&InitWrapPos};
    };
  };
  AnyMuscleShortestPath R11_Diaphragm2 = {
    AnyMuscleModel &MusMdl = ....MuscleModels.Right.Diaphragm.R11_Diaphragm2;
    AnyRefNode &Org = ....Segments.Right.R11Seg.R11_DiaphragmNode2R;
    AnyRefNode &Ins = ....Abdominal.Diaphragm.CavitySegSuperoanterior.Layer_T10.Right.R11_Diaphragm2Node;
    viewMuscle = {#include "../DrawSettings/MusDrawSettings.any"};
    viewForce.Visible ??= Off;
    AnyParamSurf &Srf = ....Abdominal.Diaphragm.CavitySegSuperoanterior.Layer_T10.Right.R11_Diaphragm2;
     SPLine = {
      StringMesh=35;
      AnyMatrix InitWrapPos = {transf3D({0,-.Srf.Radius[0],0}, &.Srf)};
      InitWrapPosVecArr = {&InitWrapPos};
    };
  };
  AnyMuscleShortestPath R11_Diaphragm1 = {
    AnyMuscleModel &MusMdl = ....MuscleModels.Right.Diaphragm.R11_Diaphragm1;
    AnyRefNode &Org = ....Segments.Right.R11Seg.R11_DiaphragmNode1R;
    AnyRefNode &Ins = ....Abdominal.Diaphragm.CavitySegSuperoanterior.Layer_T10.Right.R11_Diaphragm1Node;
    viewMuscle = {#include "../DrawSettings/MusDrawSettings.any"};
    viewForce.Visible ??= Off;
    AnyParamSurf &Srf = ....Abdominal.Diaphragm.CavitySegSuperoanterior.Layer_T10.Right.R11_Diaphragm1;
     SPLine = {
      StringMesh=35;
      AnyMatrix InitWrapPos = {transf3D({0,-.Srf.Radius[0],0}, &.Srf)};
      InitWrapPosVecArr = {&InitWrapPos};
    };
  };
  AnyMuscleShortestPath R10_Diaphragm1 = {
    AnyMuscleModel &MusMdl = ....MuscleModels.Right.Diaphragm.R10_Diaphragm1;
    AnyRefNode &Org = ....Segments.Right.R10Seg.R10_DiaphragmNode1R;
    AnyRefNode &Ins = ....Abdominal.Diaphragm.CavitySegSuperoanterior.Layer_T10.Right.R10_Diaphragm1Node;
    viewMuscle = {#include "../DrawSettings/MusDrawSettings.any"};
    viewForce.Visible ??= Off;
    AnyParamSurf &Srf = ....Abdominal.Diaphragm.CavitySegSuperoanterior.Layer_T10.Right.R10_Diaphragm1;
     SPLine = {
      StringMesh=35;
      AnyMatrix InitWrapPos = {transf3D({0,-.Srf.Radius[0],0}, &.Srf)};
      InitWrapPosVecArr = {&InitWrapPos};
    };
  };
  AnyMuscleShortestPath R10_Diaphragm2 = {
    AnyMuscleModel &MusMdl = ....MuscleModels.Right.Diaphragm.R10_Diaphragm2;
    AnyRefNode &Org = ....Segments.Right.R10Seg.R10_DiaphragmNode2R;
    AnyRefNode &Ins = ....Abdominal.Diaphragm.CavitySegSuperoanterior.Layer_T10.Right.R10_Diaphragm2Node;
    viewMuscle = {#include "../DrawSettings/MusDrawSettings.any"};
    viewForce.Visible ??= Off;
    AnyParamSurf &Srf = ....Abdominal.Diaphragm.CavitySegSuperoanterior.Layer_T10.Right.R10_Diaphragm2;
     SPLine = {
      StringMesh=35;
      AnyMatrix InitWrapPos = {transf3D({0,-.Srf.Radius[0],0}, &.Srf)};
      InitWrapPosVecArr = {&InitWrapPos};
    };
  };
  AnyMuscleShortestPath R10_Diaphragm3 = {
    AnyMuscleModel &MusMdl = ....MuscleModels.Right.Diaphragm.R10_Diaphragm3;
    AnyRefNode &Org = ....Segments.Right.R10Seg.R10_DiaphragmNode3R;
    AnyRefNode &Ins = ....Abdominal.Diaphragm.CavitySegSuperoanterior.Layer_T10.Right.R10_Diaphragm3Node;
    viewMuscle = {#include "../DrawSettings/MusDrawSettings.any"};
    viewForce.Visible ??= Off;
    AnyParamSurf &Srf = ....Abdominal.Diaphragm.CavitySegSuperoanterior.Layer_T10.Right.R10_Diaphragm3;
     SPLine = {
      StringMesh=35;
      AnyMatrix InitWrapPos = {transf3D({0,-.Srf.Radius[0],0}, &.Srf)};
      InitWrapPosVecArr = {&InitWrapPos};
    };
  };
  AnyMuscleShortestPath CC_DiaphragmNode7 = {
    AnyMuscleModel &MusMdl = ....MuscleModels.Right.Diaphragm.CC_DiaphragmNode7;
    #if BM_TRUNK_THORACIC_STERNUM_TOPOLOGY == 4
      AnyRefNode &Org = ....Segments.Right.CostalCartilageSeg.CC_DiaphragmNode7R;
    #else
      AnyRefNode &Org = ....Segments.SternalBodySeg.CC_DiaphragmNode7R;
    #endif
    AnyRefNode &Ins = ....Abdominal.Diaphragm.CavitySegSuperoanterior.Layer_T10.Right.CC_Diaphragm7Node;
    viewMuscle = {#include "../DrawSettings/MusDrawSettings.any"};
    viewForce.Visible ??= Off;
    AnyParamSurf &Srf = ....Abdominal.Diaphragm.CavitySegSuperoanterior.Layer_T10.Right.CC_Diaphragm7;
     SPLine = {
      StringMesh=35;
      AnyMatrix InitWrapPos = {transf3D({0,-.Srf.Radius[0],0}, &.Srf)};
      InitWrapPosVecArr = {&InitWrapPos};
    };
  };
  AnyMuscleShortestPath CC_DiaphragmNode6 = {
    AnyMuscleModel &MusMdl = ....MuscleModels.Right.Diaphragm.CC_DiaphragmNode6;
    #if BM_TRUNK_THORACIC_STERNUM_TOPOLOGY == 4
       AnyRefNode &Org = ....Segments.Right.CostalCartilageSeg.CC_DiaphragmNode6R;
    #else
      AnyRefNode &Org = ....Segments.SternalBodySeg.CC_DiaphragmNode6R;
    #endif
    AnyRefNode &Ins = ....Abdominal.Diaphragm.CavitySegSuperoanterior.Layer_T10.Right.CC_Diaphragm6Node;
    viewMuscle = {#include "../DrawSettings/MusDrawSettings.any"};
    viewForce.Visible ??= Off;
    AnyParamSurf &Srf = ....Abdominal.Diaphragm.CavitySegSuperoanterior.Layer_T10.Right.CC_Diaphragm6;
     SPLine = {
      StringMesh=35;
      AnyMatrix InitWrapPos = {transf3D({0,-.Srf.Radius[0],0}, &.Srf)};
      InitWrapPosVecArr = {&InitWrapPos};
    };
  };
  AnyMuscleShortestPath CC_DiaphragmNode5 = {
    AnyMuscleModel &MusMdl = ....MuscleModels.Right.Diaphragm.CC_DiaphragmNode5;
    #if BM_TRUNK_THORACIC_STERNUM_TOPOLOGY == 4
       AnyRefNode &Org = ....Segments.Right.CostalCartilageSeg.CC_DiaphragmNode5R;
    #else
      AnyRefNode &Org = ....Segments.SternalBodySeg.CC_DiaphragmNode5R;
    #endif
    AnyRefNode &Ins = ....Abdominal.Diaphragm.CavitySegSuperoanterior.Layer_T10.Right.CC_Diaphragm5Node;
    viewMuscle = {#include "../DrawSettings/MusDrawSettings.any"};
    viewForce.Visible ??= Off;
    AnyParamSurf &Srf = ....Abdominal.Diaphragm.CavitySegSuperoanterior.Layer_T10.Right.CC_Diaphragm5;
     SPLine = {
      StringMesh=35;
      AnyMatrix InitWrapPos = {transf3D({0,-.Srf.Radius[0],0}, &.Srf)};
      InitWrapPosVecArr = {&InitWrapPos};
    };
  };
  AnyMuscleShortestPath CC_DiaphragmNode4 = {
    AnyMuscleModel &MusMdl = ....MuscleModels.Right.Diaphragm.CC_DiaphragmNode4;
    #if BM_TRUNK_THORACIC_STERNUM_TOPOLOGY == 4
       AnyRefNode &Org = ....Segments.Right.CostalCartilageSeg.CC_DiaphragmNode4R;
    #else
      AnyRefNode &Org = ....Segments.SternalBodySeg.CC_DiaphragmNode4R;
    #endif
    AnyRefNode &Ins = ....Abdominal.Diaphragm.CavitySegSuperoanterior.Layer_T10.Right.CC_Diaphragm4Node;
    viewMuscle = {#include "../DrawSettings/MusDrawSettings.any"};
    viewForce.Visible ??= Off;
    AnyParamSurf &Srf = ....Abdominal.Diaphragm.CavitySegSuperoanterior.Layer_T10.Right.CC_Diaphragm4;
     SPLine = {
      StringMesh=35;
      AnyMatrix InitWrapPos = {transf3D({0,-.Srf.Radius[0],0}, &.Srf)};
      InitWrapPosVecArr = {&InitWrapPos};
    };
  };
 AnyMuscleShortestPath CC_DiaphragmNode3 = {
    AnyMuscleModel &MusMdl = ....MuscleModels.Right.Diaphragm.CC_DiaphragmNode3;
    #if BM_TRUNK_THORACIC_STERNUM_TOPOLOGY == 4
       AnyRefNode &Org = ....Segments.Right.CostalCartilageSeg.CC_DiaphragmNode3R;
    #else
      AnyRefNode &Org = ....Segments.SternalBodySeg.CC_DiaphragmNode3R;
    #endif
    AnyRefNode &Ins = ....Abdominal.Diaphragm.CavitySegSuperoanterior.Layer_T10.Right.CC_Diaphragm3Node;
    viewMuscle = {#include "../DrawSettings/MusDrawSettings.any"};
    viewForce.Visible ??= Off;
    AnyParamSurf &Srf = ....Abdominal.Diaphragm.CavitySegSuperoanterior.Layer_T10.Right.CC_Diaphragm3;
     SPLine = {
      StringMesh=35;
      AnyMatrix InitWrapPos = {transf3D({0,-.Srf.Radius[0],0}, &.Srf)};
      InitWrapPosVecArr = {&InitWrapPos};
    };
  };
  AnyMuscleShortestPath CC_DiaphragmNode2 = {
    AnyMuscleModel &MusMdl = ....MuscleModels.Right.Diaphragm.CC_DiaphragmNode2;
    #if BM_TRUNK_THORACIC_STERNUM_TOPOLOGY == 4
      AnyRefNode &Org = ....Segments.Right.CostalCartilageSeg.CC_DiaphragmNode2R;
    #else
      AnyRefNode &Org = ....Segments.SternalBodySeg.CC_DiaphragmNode2R;
    #endif
    AnyRefNode &Ins = ....Abdominal.Diaphragm.CavitySegSuperoanterior.Layer_T10.Right.CC_Diaphragm2Node;
    viewMuscle = {#include "../DrawSettings/MusDrawSettings.any"};
    viewForce.Visible ??= Off;
    AnyParamSurf &Srf = ....Abdominal.Diaphragm.CavitySegSuperoanterior.Layer_T10.Right.CC_Diaphragm2;
     SPLine = {
      StringMesh=35;
      AnyMatrix InitWrapPos = {transf3D({0,-.Srf.Radius[0],0}, &.Srf)};
      InitWrapPosVecArr = {&InitWrapPos};
    };
  };
  AnyMuscleShortestPath CC_DiaphragmNode1 = {
    AnyMuscleModel &MusMdl = ....MuscleModels.Right.Diaphragm.CC_DiaphragmNode1;
    #if BM_TRUNK_THORACIC_STERNUM_TOPOLOGY == 4
      AnyRefNode &Org = ....Segments.Right.CostalCartilageSeg.CC_DiaphragmNode1R;
    #else
      AnyRefNode &Org = ....Segments.SternalBodySeg.CC_DiaphragmNode1R;
    #endif
    AnyRefNode &Ins = ....Abdominal.Diaphragm.CavitySegSuperoanterior.Layer_T10.Right.CC_Diaphragm1Node;
    viewMuscle = {#include "../DrawSettings/MusDrawSettings.any"};
    viewForce.Visible ??= Off;
    AnyParamSurf &Srf = ....Abdominal.Diaphragm.CavitySegSuperoanterior.Layer_T10.Right.CC_Diaphragm1;
     SPLine = {
      StringMesh=35;
      AnyMatrix InitWrapPos = {transf3D({0,-.Srf.Radius[0],0}, &.Srf)};
      InitWrapPosVecArr = {&InitWrapPos};
    };
  };

  AnyMuscleShortestPath Xiphoid_Diaphragm = {
    AnyMuscleModel &MusMdl = ....MuscleModels.Right.Diaphragm.Xiphoid_Diaphragm;
    AnyRefNode &Org = ....Segments.SternalBodySeg.Xiphoid_DiaphragmNodeR;
    AnyRefNode &Ins = ....Abdominal.Diaphragm.CavitySegSuperoanterior.Layer_T10.Right.Xiphoid_DiaphragmNode;
    viewMuscle = {#include "../DrawSettings/MusDrawSettings.any"};
    viewForce.Visible ??= Off;
    AnyParamSurf &Srf = ....Abdominal.Diaphragm.CavitySegSuperoanterior.Layer_T10.Right.Xiphoid_Diaphragm;
     SPLine = {
      StringMesh=35;
      AnyMatrix InitWrapPos = {transf3D({0,-.Srf.Radius[0],0}, &.Srf)};
      InitWrapPosVecArr = {&InitWrapPos};
    };
  };
};
#endif

MuscleGroup ErectorSpinae = {
  AnyMuscleViaPoint ILplL1CI = {
    AnyMuscleModel &MusMdl = ....MuscleModels.Right.ErectorSpinae.ILplL1CI;
    AnyRefNode &Org = ....Segments.L1Seg.ILplL1CINodeR;
    AnyRefNode &Via1 = ....Segments.L2Seg.ILplL1CIViaNodeR;
    AnyRefNode &Via2 = ....Segments.L3Seg.ILplL1CIViaNodeR;
    AnyRefNode &Via3 = ....Segments.L4Seg.ILplL1CIViaNodeR;
    AnyRefNode &Ins = ....Segments.PelvisSeg.ILplL1CINodeR;
    viewMuscle = {#include "../DrawSettings/MusDrawSettings.any"};
    viewForce.Visible ??= Off;
  };
  AnyMuscleViaPoint ILplL2CI = {
    AnyMuscleModel &MusMdl = ....MuscleModels.Right.ErectorSpinae.ILplL2CI;
    AnyRefNode &Org = ....Segments.L2Seg.ILplL2CINodeR;
    AnyRefNode &Via1 = ....Segments.L3Seg.ILplL2CIViaNodeR;
    AnyRefNode &Via2 = ....Segments.L4Seg.ILplL2CIViaNodeR;
    AnyRefNode &Ins = ....Segments.PelvisSeg.ILplL2CINodeR;
    viewMuscle = {#include "../DrawSettings/MusDrawSettings.any"};
    viewForce.Visible ??= Off;
  };
  AnyMuscleViaPoint ILplL3CI = {
    AnyMuscleModel &MusMdl = ....MuscleModels.Right.ErectorSpinae.ILplL3CI;
    AnyRefNode &Org = ....Segments.L3Seg.ILplL3CINodeR;
    AnyRefNode &Ins = ....Segments.PelvisSeg.ILplL3CINodeR;
    viewMuscle = {#include "../DrawSettings/MusDrawSettings.any"};
    viewForce.Visible ??= Off;
  };
  AnyMuscleViaPoint ILplL4CI = {
    AnyMuscleModel &MusMdl = ....MuscleModels.Right.ErectorSpinae.ILplL4CI;
    AnyRefNode &Org = ....Segments.L4Seg.ILplL4CINodeR;
    AnyRefNode &Ins = ....Segments.PelvisSeg.ILplL4CINodeR;
    viewMuscle = {#include "../DrawSettings/MusDrawSettings.any"};
    viewForce.Visible ??= Off;
  };
  AnyMuscleViaPoint LTplL1SIPS = {
    AnyMuscleModel &MusMdl = ....MuscleModels.Right.ErectorSpinae.LTplL1SIPS;
    AnyRefNode &Org = ....Segments.L1Seg.LTplL1SIPSNodeR;
    AnyRefNode &Via1 = ....Segments.L2Seg.LTplL1SIPSViaNodeR;
    AnyRefNode &Via2 = ....Segments.L3Seg.LTplL1SIPSViaNodeR;
    AnyRefNode &Ins = ....Segments.PelvisSeg.LTplL1SIPSNodeR;
    viewMuscle = {#include "../DrawSettings/MusDrawSettings.any"};
    viewForce.Visible ??= Off;
  };
  AnyMuscleViaPoint LTplL2SIPS = {
    AnyMuscleModel &MusMdl = ....MuscleModels.Right.ErectorSpinae.LTplL2SIPS;
    AnyRefNode &Org = ....Segments.L2Seg.LTplL2SIPSNodeR;
    AnyRefNode &Via1 = ....Segments.L3Seg.LTplL2SIPSViaNodeR;
    AnyRefNode &Ins = ....Segments.PelvisSeg.LTplL2SIPSNodeR;
    viewMuscle = {#include "../DrawSettings/MusDrawSettings.any"};
    viewForce.Visible ??= Off;
  };
  AnyMuscleViaPoint LTplL3SIPS = {
    AnyMuscleModel &MusMdl = ....MuscleModels.Right.ErectorSpinae.LTplL3SIPS;
    AnyRefNode &Org = ....Segments.L3Seg.LTplL3SIPSNodeR;
    AnyRefNode &Ins = ....Segments.PelvisSeg.LTplL3SIPSNodeR;
    viewMuscle = {#include "../DrawSettings/MusDrawSettings.any"};
    viewForce.Visible ??= Off;
  };
  AnyMuscleViaPoint LTplL4SIPS = {
    AnyMuscleModel &MusMdl = ....MuscleModels.Right.ErectorSpinae.LTplL4SIPS;
    AnyRefNode &Org = ....Segments.L4Seg.LTplL4SIPSNodeR;
    AnyRefNode &Ins = ....Segments.PelvisSeg.LTplL4SIPSNodeR;
    viewMuscle = {#include "../DrawSettings/MusDrawSettings.any"};
    viewForce.Visible ??= Off;
  };
  AnyMuscleViaPoint LTplL5Ilium = {
    AnyMuscleModel &MusMdl = ....MuscleModels.Right.ErectorSpinae.LTplL5Ilium;
    AnyRefNode &Org = ....Segments.L5Seg.LTplL5IliumNodeR;
    AnyRefNode &Ins = ....Segments.SacrumSeg.LTplL5IliumNodeR;
    viewMuscle = {#include "../DrawSettings/MusDrawSettings.any"};
    viewForce.Visible ??= Off;
  };
  AnyMuscleViaPoint ILptC5SIPS = {
    AnyMuscleModel &MusMdl = ....MuscleModels.Right.ErectorSpinae.ILptC5SIPS;
    AnyRefNode &Org = ....Segments.Right.R5Seg.ILptC5SIPSNodeR;
    AnyRefNode &Via1 = ....Segments.Right.R6Seg.ILptC5SIPSVia1NodeR;
    AnyRefNode &Via2 = ....Segments.Right.R7Seg.ILptC5SIPSVia2NodeR;
    AnyRefNode &Via3 = ....Segments.Right.R8Seg.ILptC5SIPSVia3NodeR;
    AnyRefNode &Via4 = ....Segments.Right.R9Seg.ILptC5SIPSVia4NodeR;
    AnyRefNode &Via5 = ....Segments.Right.R10Seg.ILptC5SIPSVia5NodeR;
    AnyRefNode &Via6 = ....Segments.Right.R12Seg.ILptC5SIPSVia6NodeR;
    AnyRefNode &Via7 = ....Segments.L1Seg.ILptC5SIPSVia7NodeR;
    AnyRefNode &Via8 = ....Segments.L2Seg.ILptC5SIPSVia8NodeR;
    AnyRefNode &Via9 = ....Segments.L3Seg.ILptC5SIPSVia9NodeR;
    AnyRefNode &Ins = ....Segments.PelvisSeg.ILptC5SIPSNodeR;
    viewMuscle = {#include "../DrawSettings/MusDrawSettings.any"};
    viewForce.Visible ??= Off;
  };
  AnyMuscleViaPoint ILptC6SIPS = {
    AnyMuscleModel &MusMdl = ....MuscleModels.Right.ErectorSpinae.ILptC6SIPS;
    AnyRefNode &Org = ....Segments.Right.R6Seg.ILptC6SIPSNodeR;
    AnyRefNode &Via1 = ....Segments.Right.R7Seg.ILptC6SIPSVia1NodeR;
    AnyRefNode &Via2 = ....Segments.Right.R8Seg.ILptC6SIPSVia2NodeR;
    AnyRefNode &Via3 = ....Segments.Right.R9Seg.ILptC6SIPSVia3NodeR;
    AnyRefNode &Via4 = ....Segments.Right.R10Seg.ILptC6SIPSVia4NodeR;
    AnyRefNode &Via5 = ....Segments.Right.R12Seg.ILptC6SIPSVia5NodeR;
    AnyRefNode &Via6 = ....Segments.L1Seg.ILptC6SIPSVia6NodeR;
    AnyRefNode &Via7 = ....Segments.L2Seg.ILptC6SIPSVia7NodeR;
    AnyRefNode &Via8 = ....Segments.L3Seg.ILptC6SIPSVia8NodeR;
    AnyRefNode &Ins = ....Segments.PelvisSeg.ILptC6SIPSNodeR;
    viewMuscle = {#include "../DrawSettings/MusDrawSettings.any"};
    viewForce.Visible ??= Off;
  };
  AnyMuscleViaPoint ILptC7CI = {
    AnyMuscleModel &MusMdl = ....MuscleModels.Right.ErectorSpinae.ILptC7CI;
    AnyRefNode &Org = ....Segments.Right.R7Seg.ILptC7CINodeR;
    AnyRefNode &Via1 = ....Segments.Right.R8Seg.ILptC7CIVia1NodeR;
    AnyRefNode &Via2 = ....Segments.Right.R9Seg.ILptC7CIVia2NodeR;
    AnyRefNode &Via3 = ....Segments.Right.R10Seg.ILptC7CIVia3NodeR;
    AnyRefNode &Via4 = ....Segments.Right.R12Seg.ILptC7CIVia4NodeR;
    AnyRefNode &Via5 = ....Segments.L1Seg.ILptC7CIVia5NodeR;
    AnyRefNode &Via6 = ....Segments.L2Seg.ILptC7CIVia6NodeR;
    AnyRefNode &Via7 = ....Segments.L3Seg.ILptC7CIVia7NodeR;
    AnyRefNode &Ins = ....Segments.PelvisSeg.ILptC7CINodeR;
    viewMuscle = {#include "../DrawSettings/MusDrawSettings.any"};
    viewForce.Visible ??= Off;
  };
  AnyMuscleViaPoint ILptC8CI = {
    AnyMuscleModel &MusMdl = ....MuscleModels.Right.ErectorSpinae.ILptC8CI;
    AnyRefNode &Org = ....Segments.Right.R8Seg.ILptC8CINodeR;
    AnyRefNode &Via1 = ....Segments.Right.R9Seg.ILptC8CIVia1NodeR;
    AnyRefNode &Via2 = ....Segments.Right.R10Seg.ILptC8CIVia2NodeR;
    AnyRefNode &Via3 = ....Segments.Right.R12Seg.ILptC8CIVia3NodeR;
    AnyRefNode &Via4 = ....Segments.L1Seg.ILptC8CIVia4NodeR;
    AnyRefNode &Via5 = ....Segments.L2Seg.ILptC8CIVia5NodeR;
    AnyRefNode &Via6 = ....Segments.L3Seg.ILptC8CIVia6NodeR;
    AnyRefNode &Ins = ....Segments.PelvisSeg.ILptC8CINodeR;
    viewMuscle = {#include "../DrawSettings/MusDrawSettings.any"};
    viewForce.Visible ??= Off;
  };
  AnyMuscleViaPoint ILptC9CI = {
    AnyMuscleModel &MusMdl = ....MuscleModels.Right.ErectorSpinae.ILptC9CI;
    AnyRefNode &Org = ....Segments.Right.R9Seg.ILptC9CINodeR;
    AnyRefNode &Via1 = ....Segments.Right.R10Seg.ILptC9CIVia1NodeR;
    AnyRefNode &Via2 = ....Segments.Right.R12Seg.ILptC9CIVia2NodeR;
    AnyRefNode &Via3 = ....Segments.L1Seg.ILptC9CIVia3NodeR;
    AnyRefNode &Via4 = ....Segments.L2Seg.ILptC9CIVia4NodeR;
    AnyRefNode &Via5 = ....Segments.L3Seg.ILptC9CIVia5NodeR;
    AnyRefNode &Ins = ....Segments.PelvisSeg.ILptC9CINodeR;
    viewMuscle = {#include "../DrawSettings/MusDrawSettings.any"};
    viewForce.Visible ??= Off;
  };
  AnyMuscleViaPoint ILptC10CI = {
    AnyMuscleModel &MusMdl = ....MuscleModels.Right.ErectorSpinae.ILptC10CI;
    AnyRefNode &Org = ....Segments.Right.R10Seg.ILptC10CINodeR;
    AnyRefNode &Via1 = ....Segments.Right.R12Seg.ILptC10CIVia1NodeR;
    AnyRefNode &Via2 = ....Segments.L1Seg.ILptC10CIVia2NodeR;
    AnyRefNode &Via3 = ....Segments.L2Seg.ILptC10CIVia3NodeR;
    AnyRefNode &Via4 = ....Segments.L3Seg.ILptC10CIVia4NodeR;
    AnyRefNode &Ins = ....Segments.PelvisSeg.ILptC10CINodeR;
    viewMuscle = {#include "../DrawSettings/MusDrawSettings.any"};
    viewForce.Visible ??= Off;
  };
  AnyMuscleViaPoint ILptC11CI = {
    AnyMuscleModel &MusMdl = ....MuscleModels.Right.ErectorSpinae.ILptC11CI;
    AnyRefNode &Org = ....Segments.Right.R11Seg.ILptC11CINodeR;
    AnyRefNode &Via1 = ....Segments.L1Seg.ILptC11CIVia1NodeR;
    AnyRefNode &Via2 = ....Segments.L2Seg.ILptC11CIVia2NodeR;
    AnyRefNode &Via3 = ....Segments.L3Seg.ILptC11CIVia3NodeR;
    AnyRefNode &Ins = ....Segments.PelvisSeg.ILptC11CINodeR;
    viewMuscle = {#include "../DrawSettings/MusDrawSettings.any"};
    viewForce.Visible ??= Off;
  };
  AnyMuscleViaPoint ILptC12CI = {
    AnyMuscleModel &MusMdl = ....MuscleModels.Right.ErectorSpinae.ILptC12CI;
    AnyRefNode &Org = ....Segments.Right.R12Seg.ILptC12CINodeR;
    AnyRefNode &Via1 = ....Segments.L1Seg.ILptC12CIVia1NodeR;
    AnyRefNode &Via2 = ....Segments.L2Seg.ILptC12CIVia2NodeR;
    AnyRefNode &Via3 = ....Segments.L3Seg.ILptC12CIVia3NodeR;
    AnyRefNode &Ins = ....Segments.PelvisSeg.ILptC12CINodeR;
    viewMuscle = {#include "../DrawSettings/MusDrawSettings.any"};
    viewForce.Visible ??= Off;
  };
  AnyMuscleViaPoint LTptT1L1 = {
    AnyMuscleModel &MusMdl = ....MuscleModels.Right.ErectorSpinae.LTptT1L1;
    AnyRefNode &Org = ....Segments.T1Seg.LTptT1L1NodeR;
    AnyRefNode &Via1 = ....Segments.T2Seg.LTptT1L1Via1NodeR;
    AnyRefNode &Via2 = ....Segments.T3Seg.LTptT1L1Via2NodeR;
    AnyRefNode &Via3 = ....Segments.T4Seg.LTptT1L1Via3NodeR;
    AnyRefNode &Via4 = ....Segments.T5Seg.LTptT1L1Via4NodeR;
    AnyRefNode &Via5 = ....Segments.T6Seg.LTptT1L1Via5NodeR;
    AnyRefNode &Via6 = ....Segments.T7Seg.LTptT1L1Via6NodeR;
    AnyRefNode &Via7 = ....Segments.T8Seg.LTptT1L1Via7NodeR;
    AnyRefNode &Via8 = ....Segments.T9Seg.LTptT1L1Via8NodeR;
    AnyRefNode &Via9 = ....Segments.T10Seg.LTptT1L1Via9NodeR;
    AnyRefNode &Via10 = ....Segments.T11Seg.LTptT1L1Via10NodeR;
    AnyRefNode &Via11 = ....Segments.T12Seg.LTptT1L1Via11NodeR;
    AnyRefNode &Ins = ....Segments.L1Seg.LTptT1L1NodeR;
    viewMuscle = {#include "../DrawSettings/MusDrawSettings.any"};
    viewForce.Visible ??= Off;
  };
  AnyMuscleViaPoint LTptT2L2 = {
    AnyMuscleModel &MusMdl = ....MuscleModels.Right.ErectorSpinae.LTptT2L2;
    AnyRefNode &Org = ....Segments.T2Seg.LTptT2L2NodeR;
    AnyRefNode &Via1 = ....Segments.T3Seg.LTptT2L2Via1NodeR;
    AnyRefNode &Via2 = ....Segments.T4Seg.LTptT2L2Via2NodeR;
    AnyRefNode &Via3 = ....Segments.T5Seg.LTptT2L2Via3NodeR;
    AnyRefNode &Via4 = ....Segments.T6Seg.LTptT2L2Via4NodeR;
    AnyRefNode &Via5 = ....Segments.T7Seg.LTptT2L2Via5NodeR;
    AnyRefNode &Via6 = ....Segments.T8Seg.LTptT2L2Via6NodeR;
    AnyRefNode &Via7 = ....Segments.T9Seg.LTptT2L2Via7NodeR;
    AnyRefNode &Via8 = ....Segments.T10Seg.LTptT2L2Via8NodeR;
    AnyRefNode &Via9 = ....Segments.T11Seg.LTptT2L2Via9NodeR;
    AnyRefNode &Via10 = ....Segments.T12Seg.LTptT2L2Via10NodeR;
    AnyRefNode &Via11 = ....Segments.L1Seg.LTptT2L2Via11NodeR;
    AnyRefNode &Ins = ....Segments.L2Seg.LTptT2L2NodeR;
    viewMuscle = {#include "../DrawSettings/MusDrawSettings.any"};
    viewForce.Visible ??= Off;
  };
  AnyMuscleViaPoint LTptT3L3 = {
    AnyMuscleModel &MusMdl = ....MuscleModels.Right.ErectorSpinae.LTptT3L3;
    AnyRefNode &Org = ....Segments.Right.R3Seg.LTptT3L3NodeR;
    AnyRefNode &Via1 = ....Segments.Right.R4Seg.LTptT3L3Via1NodeR;
    AnyRefNode &Via2 = ....Segments.Right.R5Seg.LTptT3L3Via2NodeR;
    AnyRefNode &Via3 = ....Segments.Right.R6Seg.LTptT3L3Via3NodeR;
    AnyRefNode &Via4 = ....Segments.Right.R7Seg.LTptT3L3Via4NodeR;
    AnyRefNode &Via5 = ....Segments.Right.R8Seg.LTptT3L3Via5NodeR;
    AnyRefNode &Via6 = ....Segments.Right.R9Seg.LTptT3L3Via6NodeR;
    AnyRefNode &Via7 = ....Segments.Right.R10Seg.LTptT3L3Via7NodeR;
    AnyRefNode &Via8 = ....Segments.T11Seg.LTptT3L3Via8NodeR;
    AnyRefNode &Via9 = ....Segments.T12Seg.LTptT3L3Via9NodeR;
    AnyRefNode &Via10 = ....Segments.L1Seg.LTptT3L3Via10NodeR;
    AnyRefNode &Via11 = ....Segments.L2Seg.LTptT3L3Via11NodeR;
    AnyRefNode &Ins = ....Segments.L3Seg.LTptT3L3NodeR;
    viewMuscle = {#include "../DrawSettings/MusDrawSettings.any"};
    viewForce.Visible ??= Off;
  };
  AnyMuscleViaPoint LTptT4L4 = {
    AnyMuscleModel &MusMdl = ....MuscleModels.Right.ErectorSpinae.LTptT4L4;
    AnyRefNode &Org = ....Segments.Right.R4Seg.LTptT4L4NodeR;
    AnyRefNode &Via1 = ....Segments.Right.R5Seg.LTptT4L4Via1NodeR;
    AnyRefNode &Via2 = ....Segments.Right.R6Seg.LTptT4L4Via2NodeR;
    AnyRefNode &Via3 = ....Segments.Right.R7Seg.LTptT4L4Via3NodeR;
    AnyRefNode &Via4 = ....Segments.Right.R8Seg.LTptT4L4Via4NodeR;
    AnyRefNode &Via5 = ....Segments.Right.R9Seg.LTptT4L4Via5NodeR;
    AnyRefNode &Via6 = ....Segments.Right.R10Seg.LTptT4L4Via6NodeR;
    AnyRefNode &Via7 = ....Segments.T11Seg.LTptT4L4Via7NodeR;
    AnyRefNode &Via8 = ....Segments.T12Seg.LTptT4L4Via8NodeR;
    AnyRefNode &Via9 = ....Segments.L1Seg.LTptT4L4Via9NodeR;
    AnyRefNode &Via10 = ....Segments.L2Seg.LTptT4L4Via10NodeR;
    AnyRefNode &Via11 = ....Segments.L3Seg.LTptT4L4Via11NodeR;
    AnyRefNode &Ins = ....Segments.L4Seg.LTptT4L4NodeR;
    viewMuscle = {#include "../DrawSettings/MusDrawSettings.any"};
    viewForce.Visible ??= Off;
  };
  AnyMuscleViaPoint LTptT5L5 = {
    AnyMuscleModel &MusMdl = ....MuscleModels.Right.ErectorSpinae.LTptT5L5;
    AnyRefNode &Org = ....Segments.Right.R5Seg.LTptT5L5NodeR;
    AnyRefNode &Via1 = ....Segments.Right.R6Seg.LTptT5L5Via1NodeR;
    AnyRefNode &Via2 = ....Segments.Right.R7Seg.LTptT5L5Via2NodeR;
    AnyRefNode &Via3 = ....Segments.Right.R8Seg.LTptT5L5Via3NodeR;
    AnyRefNode &Via4 = ....Segments.Right.R9Seg.LTptT5L5Via4NodeR;
    AnyRefNode &Via5 = ....Segments.Right.R10Seg.LTptT5L5Via5NodeR;
    AnyRefNode &Via6 = ....Segments.T11Seg.LTptT5L5Via6NodeR;
    AnyRefNode &Via7 = ....Segments.T12Seg.LTptT5L5Via7NodeR;
    AnyRefNode &Via8 = ....Segments.L1Seg.LTptT5L5Via8NodeR;
    AnyRefNode &Via9 = ....Segments.L2Seg.LTptT5L5Via9NodeR;
    AnyRefNode &Via10 = ....Segments.L3Seg.LTptT5L5Via10NodeR;
    AnyRefNode &Via11 = ....Segments.L4Seg.LTptT5L5Via11NodeR;
    AnyRefNode &Ins = ....Segments.L5Seg.LTptT5L5NodeR;
    viewMuscle = {#include "../DrawSettings/MusDrawSettings.any"};
    viewForce.Visible ??= Off;
  };
  AnyMuscleViaPoint LTptT6S1 = {
    AnyMuscleModel &MusMdl = ....MuscleModels.Right.ErectorSpinae.LTptT6S1;
    AnyRefNode &Org = ....Segments.Right.R6Seg.LTptT6S1NodeR;
    AnyRefNode &Via1 = ....Segments.Right.R7Seg.LTptT6S1Via1NodeR;
    AnyRefNode &Via2 = ....Segments.Right.R8Seg.LTptT6S1Via2NodeR;
    AnyRefNode &Via3 = ....Segments.Right.R9Seg.LTptT6S1Via3NodeR;
    AnyRefNode &Via4 = ....Segments.Right.R10Seg.LTptT6S1Via4NodeR;
    AnyRefNode &Via5 = ....Segments.T11Seg.LTptT6S1Via5NodeR;
    AnyRefNode &Via6 = ....Segments.T12Seg.LTptT6S1Via6NodeR;
    AnyRefNode &Via7 = ....Segments.L1Seg.LTptT6S1Via7NodeR;
    AnyRefNode &Via8 = ....Segments.L2Seg.LTptT6S1Via8NodeR;
    AnyRefNode &Via9 = ....Segments.L3Seg.LTptT6S1Via9NodeR;
    AnyRefNode &Via10 = ....Segments.L4Seg.LTptT6S1Via10NodeR;
    AnyRefNode &Via11 = ....Segments.L5Seg.LTptT6S1Via11NodeR;
    AnyRefNode &Ins = ....Segments.SacrumSeg.LTptT6S1NodeR;
    viewMuscle = {#include "../DrawSettings/MusDrawSettings.any"};
    viewForce.Visible ??= Off;
  };
  AnyMuscleViaPoint LTptT7S2 = {
    AnyMuscleModel &MusMdl = ....MuscleModels.Right.ErectorSpinae.LTptT7S2;
    AnyRefNode &Org = ....Segments.Right.R7Seg.LTptT7S2NodeR;
    AnyRefNode &Via1 = ....Segments.Right.R8Seg.LTptT7S2Via1NodeR;
    AnyRefNode &Via2 = ....Segments.Right.R9Seg.LTptT7S2Via2NodeR;
    AnyRefNode &Via3 = ....Segments.Right.R10Seg.LTptT7S2Via3NodeR;
    AnyRefNode &Via4 = ....Segments.Right.R11Seg.LTptT7S2Via4NodeR;
    AnyRefNode &Via5 = ....Segments.T12Seg.LTptT7S2Via5NodeR;
    AnyRefNode &Via6 = ....Segments.L1Seg.LTptT7S2Via6NodeR;
    AnyRefNode &Via7 = ....Segments.L2Seg.LTptT7S2Via7NodeR;
    AnyRefNode &Via8 = ....Segments.L3Seg.LTptT7S2Via8NodeR;
    AnyRefNode &Via9 = ....Segments.L4Seg.LTptT7S2Via9NodeR;
    AnyRefNode &Via10 = ....Segments.L5Seg.LTptT7S2Via10NodeR;
    AnyRefNode &Ins = ....Segments.SacrumSeg.LTptT7S2NodeR;
    viewMuscle = {#include "../DrawSettings/MusDrawSettings.any"};
    viewForce.Visible ??= Off;
  };
  AnyMuscleViaPoint LTptT8S3 = {
    AnyMuscleModel &MusMdl = ....MuscleModels.Right.ErectorSpinae.LTptT8S3;
    AnyRefNode &Org = ....Segments.Right.R8Seg.LTptT8S3NodeR;
    AnyRefNode &Via1 = ....Segments.Right.R9Seg.LTptT8S3Via1NodeR;
    AnyRefNode &Via2 = ....Segments.Right.R10Seg.LTptT8S3Via2NodeR;
    AnyRefNode &Via3 = ....Segments.Right.R11Seg.LTptT8S3Via3NodeR;
    AnyRefNode &Via4 = ....Segments.Right.R12Seg.LTptT8S3Via4NodeR;
    AnyRefNode &Via5 = ....Segments.L1Seg.LTptT8S3Via5NodeR;
    AnyRefNode &Via6 = ....Segments.L2Seg.LTptT8S3Via6NodeR;
    AnyRefNode &Via7 = ....Segments.L3Seg.LTptT8S3Via7NodeR;
    AnyRefNode &Via8 = ....Segments.L4Seg.LTptT8S3Via8NodeR;
    AnyRefNode &Via9 = ....Segments.L5Seg.LTptT8S3Via9NodeR;
    AnyRefNode &Ins = ....Segments.SacrumSeg.LTptT8S3NodeR;
    viewMuscle = {#include "../DrawSettings/MusDrawSettings.any"};
    viewForce.Visible ??= Off;
  };
  AnyMuscleViaPoint LTptT9S4 = {
    AnyMuscleModel &MusMdl = ....MuscleModels.Right.ErectorSpinae.LTptT9S4;
    AnyRefNode &Org = ....Segments.Right.R9Seg.LTptT9S4NodeR;
    AnyRefNode &Via1 = ....Segments.Right.R10Seg.LTptT9S4Via1NodeR;
    AnyRefNode &Via2 = ....Segments.Right.R11Seg.LTptT9S4Via2NodeR;
    AnyRefNode &Via3 = ....Segments.Right.R12Seg.LTptT9S4Via3NodeR;
    AnyRefNode &Via4 = ....Segments.L1Seg.LTptT9S4Via4NodeR;
    AnyRefNode &Via5 = ....Segments.L2Seg.LTptT9S4Via5NodeR;
    AnyRefNode &Via6 = ....Segments.L3Seg.LTptT9S4Via6NodeR;
    AnyRefNode &Via7 = ....Segments.L4Seg.LTptT9S4Via7NodeR;
    AnyRefNode &Via8 = ....Segments.L5Seg.LTptT9S4Via8NodeR;
    AnyRefNode &Ins = ....Segments.SacrumSeg.LTptT9S4NodeR;
    viewMuscle = {#include "../DrawSettings/MusDrawSettings.any"};
    viewForce.Visible ??= Off;
  };
  AnyMuscleViaPoint LTptT10Sacrum = {
    AnyMuscleModel &MusMdl = ....MuscleModels.Right.ErectorSpinae.LTptT10Sacrum;
    AnyRefNode &Org = ....Segments.Right.R10Seg.LTptT10SacrumNodeR;
    AnyRefNode &Via1 = ....Segments.Right.R11Seg.LTptT10SacrumVia1NodeR;
    AnyRefNode &Via2 = ....Segments.Right.R12Seg.LTptT10SacrumVia2NodeR;
    AnyRefNode &Via3 = ....Segments.L1Seg.LTptT10SacrumVia3NodeR;
    AnyRefNode &Via4 = ....Segments.L2Seg.LTptT10SacrumVia4NodeR;
    AnyRefNode &Via5 = ....Segments.L3Seg.LTptT10SacrumVia5NodeR;
    AnyRefNode &Via6 = ....Segments.L4Seg.LTptT10SacrumVia6NodeR;
    AnyRefNode &Via7 = ....Segments.L5Seg.LTptT10SacrumVia7NodeR;
    AnyRefNode &Ins = ....Segments.SacrumSeg.LTptT10SacrumNodeR;
    viewMuscle = {#include "../DrawSettings/MusDrawSettings.any"};
    viewForce.Visible ??= Off;
  };
  // Longissimus Thoracis - lateral part (attaching to ribs)
  AnyMuscleViaPoint LTptC3L3 = {
    AnyMuscleModel &MusMdl = ....MuscleModels.Right.ErectorSpinae.LTptC3L3;
    AnyRefNode &Org = ....Segments.Right.R3Seg.LTptT3L3NodeR;
    AnyRefNode &Via1 = ....Segments.Right.R4Seg.LTptT3L3Via1NodeR;
    AnyRefNode &Via2 = ....Segments.Right.R5Seg.LTptT3L3Via2NodeR;
    AnyRefNode &Via3 = ....Segments.Right.R6Seg.LTptT3L3Via3NodeR;
    AnyRefNode &Via4 = ....Segments.Right.R7Seg.LTptT3L3Via4NodeR;
    AnyRefNode &Via5 = ....Segments.Right.R8Seg.LTptT3L3Via5NodeR;
    AnyRefNode &Via6 = ....Segments.Right.R9Seg.LTptT3L3Via6NodeR;
    AnyRefNode &Via7 = ....Segments.Right.R10Seg.LTptT3L3Via7NodeR;
    AnyRefNode &Via8 = ....Segments.T11Seg.LTptT3L3Via8NodeR;
    AnyRefNode &Via9 = ....Segments.T12Seg.LTptT3L3Via9NodeR;
    AnyRefNode &Via10 = ....Segments.L1Seg.LTptT3L3Via10NodeR;
    AnyRefNode &Via11 = ....Segments.L2Seg.LTptT3L3Via11NodeR;
    AnyRefNode &Ins = ....Segments.L3Seg.LTptT3L3NodeR;
    viewMuscle = {#include "../DrawSettings/MusDrawSettings.any"};
    viewForce.Visible ??= Off;
  };
  AnyMuscleViaPoint LTptC4L4 = {
    AnyMuscleModel &MusMdl = ....MuscleModels.Right.ErectorSpinae.LTptC4L4;
    AnyRefNode &Org = ....Segments.Right.R4Seg.LTptT4L4NodeR;
    AnyRefNode &Via1 = ....Segments.Right.R5Seg.LTptT4L4Via1NodeR;
    AnyRefNode &Via2 = ....Segments.Right.R6Seg.LTptT4L4Via2NodeR;
    AnyRefNode &Via3 = ....Segments.Right.R7Seg.LTptT4L4Via3NodeR;
    AnyRefNode &Via4 = ....Segments.Right.R8Seg.LTptT4L4Via4NodeR;
    AnyRefNode &Via5 = ....Segments.Right.R9Seg.LTptT4L4Via5NodeR;
    AnyRefNode &Via6 = ....Segments.Right.R10Seg.LTptT4L4Via6NodeR;
    AnyRefNode &Via7 = ....Segments.T11Seg.LTptT4L4Via7NodeR;
    AnyRefNode &Via8 = ....Segments.T12Seg.LTptT4L4Via8NodeR;
    AnyRefNode &Via9 = ....Segments.L1Seg.LTptT4L4Via9NodeR;
    AnyRefNode &Via10 = ....Segments.L2Seg.LTptT4L4Via10NodeR;
    AnyRefNode &Via11 = ....Segments.L3Seg.LTptT4L4Via11NodeR;
    AnyRefNode &Ins = ....Segments.L4Seg.LTptT4L4NodeR;
    viewMuscle = {#include "../DrawSettings/MusDrawSettings.any"};
    viewForce.Visible ??= Off;
  };
  AnyMuscleViaPoint LTptC5L5 = {
    AnyMuscleModel &MusMdl = ....MuscleModels.Right.ErectorSpinae.LTptC5L5;
    AnyRefNode &Org = ....Segments.Right.R5Seg.LTptT5L5NodeR;
    AnyRefNode &Via1 = ....Segments.Right.R6Seg.LTptT5L5Via1NodeR;
    AnyRefNode &Via2 = ....Segments.Right.R7Seg.LTptT5L5Via2NodeR;
    AnyRefNode &Via3 = ....Segments.Right.R8Seg.LTptT5L5Via3NodeR;
    AnyRefNode &Via4 = ....Segments.Right.R9Seg.LTptT5L5Via4NodeR;
    AnyRefNode &Via5 = ....Segments.Right.R10Seg.LTptT5L5Via5NodeR;
    AnyRefNode &Via6 = ....Segments.T11Seg.LTptT5L5Via6NodeR;
    AnyRefNode &Via7 = ....Segments.T12Seg.LTptT5L5Via7NodeR;
    AnyRefNode &Via8 = ....Segments.L1Seg.LTptT5L5Via8NodeR;
    AnyRefNode &Via9 = ....Segments.L2Seg.LTptT5L5Via9NodeR;
    AnyRefNode &Via10 = ....Segments.L3Seg.LTptT5L5Via10NodeR;
    AnyRefNode &Via11 = ....Segments.L4Seg.LTptT5L5Via11NodeR;
    AnyRefNode &Ins = ....Segments.L5Seg.LTptT5L5NodeR;
    viewMuscle = {#include "../DrawSettings/MusDrawSettings.any"};
    viewForce.Visible ??= Off;
  };
  AnyMuscleViaPoint LTptC6S1 = {
    AnyMuscleModel &MusMdl = ....MuscleModels.Right.ErectorSpinae.LTptC6S1;
    AnyRefNode &Org = ....Segments.Right.R6Seg.LTptT6S1NodeR;
    AnyRefNode &Via1 = ....Segments.Right.R7Seg.LTptT6S1Via1NodeR;
    AnyRefNode &Via2 = ....Segments.Right.R8Seg.LTptT6S1Via2NodeR;
    AnyRefNode &Via3 = ....Segments.Right.R9Seg.LTptT6S1Via3NodeR;
    AnyRefNode &Via4 = ....Segments.Right.R10Seg.LTptT6S1Via4NodeR;
    AnyRefNode &Via5 = ....Segments.T11Seg.LTptT6S1Via5NodeR;
    AnyRefNode &Via6 = ....Segments.T12Seg.LTptT6S1Via6NodeR;
    AnyRefNode &Via7 = ....Segments.L1Seg.LTptT6S1Via7NodeR;
    AnyRefNode &Via8 = ....Segments.L2Seg.LTptT6S1Via8NodeR;
    AnyRefNode &Via9 = ....Segments.L3Seg.LTptT6S1Via9NodeR;
    AnyRefNode &Via10 = ....Segments.L4Seg.LTptT6S1Via10NodeR;
    AnyRefNode &Via11 = ....Segments.L5Seg.LTptT6S1Via11NodeR;
    AnyRefNode &Ins = ....Segments.SacrumSeg.LTptT6S1NodeR;
    viewMuscle = {#include "../DrawSettings/MusDrawSettings.any"};
    viewForce.Visible ??= Off;
  };
  AnyMuscleViaPoint LTptC7S2 = {
    AnyMuscleModel &MusMdl = ....MuscleModels.Right.ErectorSpinae.LTptC7S2;
    AnyRefNode &Org = ....Segments.Right.R7Seg.LTptT7S2NodeR;
    AnyRefNode &Via1 = ....Segments.Right.R8Seg.LTptT7S2Via1NodeR;
    AnyRefNode &Via2 = ....Segments.Right.R9Seg.LTptT7S2Via2NodeR;
    AnyRefNode &Via3 = ....Segments.Right.R10Seg.LTptT7S2Via3NodeR;
    AnyRefNode &Via4 = ....Segments.Right.R11Seg.LTptT7S2Via4NodeR;
    AnyRefNode &Via5 = ....Segments.T12Seg.LTptT7S2Via5NodeR;
    AnyRefNode &Via6 = ....Segments.L1Seg.LTptT7S2Via6NodeR;
    AnyRefNode &Via7 = ....Segments.L2Seg.LTptT7S2Via7NodeR;
    AnyRefNode &Via8 = ....Segments.L3Seg.LTptT7S2Via8NodeR;
    AnyRefNode &Via9 = ....Segments.L4Seg.LTptT7S2Via9NodeR;
    AnyRefNode &Via10 = ....Segments.L5Seg.LTptT7S2Via10NodeR;
    AnyRefNode &Ins = ....Segments.SacrumSeg.LTptT7S2NodeR;
    viewMuscle = {#include "../DrawSettings/MusDrawSettings.any"};
    viewForce.Visible ??= Off;
  };
  AnyMuscleViaPoint LTptC8S3 = {
    AnyMuscleModel &MusMdl = ....MuscleModels.Right.ErectorSpinae.LTptC8S3;
    AnyRefNode &Org = ....Segments.Right.R8Seg.LTptT8S3NodeR;
    AnyRefNode &Via1 = ....Segments.Right.R9Seg.LTptT8S3Via1NodeR;
    AnyRefNode &Via2 = ....Segments.Right.R10Seg.LTptT8S3Via2NodeR;
    AnyRefNode &Via3 = ....Segments.Right.R11Seg.LTptT8S3Via3NodeR;
    AnyRefNode &Via4 = ....Segments.Right.R12Seg.LTptT8S3Via4NodeR;
    AnyRefNode &Via5 = ....Segments.L1Seg.LTptT8S3Via5NodeR;
    AnyRefNode &Via6 = ....Segments.L2Seg.LTptT8S3Via6NodeR;
    AnyRefNode &Via7 = ....Segments.L3Seg.LTptT8S3Via7NodeR;
    AnyRefNode &Via8 = ....Segments.L4Seg.LTptT8S3Via8NodeR;
    AnyRefNode &Via9 = ....Segments.L5Seg.LTptT8S3Via9NodeR;
    AnyRefNode &Ins = ....Segments.SacrumSeg.LTptT8S3NodeR;
    viewMuscle = {#include "../DrawSettings/MusDrawSettings.any"};
    viewForce.Visible ??= Off;
  };
  AnyMuscleViaPoint LTptC9S4 = {
    AnyMuscleModel &MusMdl = ....MuscleModels.Right.ErectorSpinae.LTptC9S4;
    AnyRefNode &Org = ....Segments.Right.R9Seg.LTptT9S4NodeR;
    AnyRefNode &Via1 = ....Segments.Right.R10Seg.LTptT9S4Via1NodeR;
    AnyRefNode &Via2 = ....Segments.Right.R11Seg.LTptT9S4Via2NodeR;
    AnyRefNode &Via3 = ....Segments.Right.R12Seg.LTptT9S4Via3NodeR;
    AnyRefNode &Via4 = ....Segments.L1Seg.LTptT9S4Via4NodeR;
    AnyRefNode &Via5 = ....Segments.L2Seg.LTptT9S4Via5NodeR;
    AnyRefNode &Via6 = ....Segments.L3Seg.LTptT9S4Via6NodeR;
    AnyRefNode &Via7 = ....Segments.L4Seg.LTptT9S4Via7NodeR;
    AnyRefNode &Via8 = ....Segments.L5Seg.LTptT9S4Via8NodeR;
    AnyRefNode &Ins = ....Segments.SacrumSeg.LTptT9S4NodeR;
    viewMuscle = {#include "../DrawSettings/MusDrawSettings.any"};
    viewForce.Visible ??= Off;
  };
  AnyMuscleViaPoint LTptC10Sacrum = {
    AnyMuscleModel &MusMdl = ....MuscleModels.Right.ErectorSpinae.LTptC10Sacrum;
    AnyRefNode &Org = ....Segments.Right.R10Seg.LTptT10SacrumNodeR;
    AnyRefNode &Via1 = ....Segments.Right.R11Seg.LTptT10SacrumVia1NodeR;
    AnyRefNode &Via2 = ....Segments.Right.R12Seg.LTptT10SacrumVia2NodeR;
    AnyRefNode &Via3 = ....Segments.L1Seg.LTptT10SacrumVia3NodeR;
    AnyRefNode &Via4 = ....Segments.L2Seg.LTptT10SacrumVia4NodeR;
    AnyRefNode &Via5 = ....Segments.L3Seg.LTptT10SacrumVia5NodeR;
    AnyRefNode &Via6 = ....Segments.L4Seg.LTptT10SacrumVia6NodeR;
    AnyRefNode &Via7 = ....Segments.L5Seg.LTptT10SacrumVia7NodeR;
    AnyRefNode &Ins = ....Segments.SacrumSeg.LTptT10SacrumNodeR;
    viewMuscle = {#include "../DrawSettings/MusDrawSettings.any"};
    viewForce.Visible ??= Off;
  };
  AnyMuscleViaPoint LTptT11Sacrum = {
    AnyMuscleModel &MusMdl = ....MuscleModels.Right.ErectorSpinae.LTptT11Sacrum;
    AnyRefNode &Org = ....Segments.Right.R11Seg.LTptT11SacrumNodeR;
    AnyRefNode &Via1 = ....Segments.Right.R12Seg.LTptT11SacrumVia1NodeR;
    AnyRefNode &Via2 = ....Segments.L1Seg.LTptT11SacrumVia2NodeR;
    AnyRefNode &Via3 = ....Segments.L2Seg.LTptT11SacrumVia3NodeR;
    AnyRefNode &Via4 = ....Segments.L3Seg.LTptT11SacrumVia4NodeR;
    AnyRefNode &Via5 = ....Segments.L4Seg.LTptT11SacrumVia5NodeR;
    AnyRefNode &Via6 = ....Segments.L5Seg.LTptT11SacrumVia6NodeR;
    AnyRefNode &Ins = ....Segments.SacrumSeg.LTptT11SacrumNodeR;
    viewMuscle = {#include "../DrawSettings/MusDrawSettings.any"};
    viewForce.Visible ??= Off;
  };
  AnyMuscleViaPoint LTptT12Sacrum = {
    AnyMuscleModel &MusMdl = ....MuscleModels.Right.ErectorSpinae.LTptT12Sacrum;
    AnyRefNode &Org = ....Segments.Right.R12Seg.LTptT12SacrumNodeR;
    AnyRefNode &Via1 = ....Segments.L1Seg.LTptT12SacrumVia1NodeR;
    AnyRefNode &Via2 = ....Segments.L2Seg.LTptT12SacrumVia2NodeR;
    AnyRefNode &Via3 = ....Segments.L3Seg.LTptT12SacrumVia3NodeR;
    AnyRefNode &Via4 = ....Segments.L4Seg.LTptT12SacrumVia4NodeR;
    AnyRefNode &Via5 = ....Segments.L5Seg.LTptT12SacrumVia5NodeR;
    AnyRefNode &Ins = ....Segments.SacrumSeg.LTptT12SacrumNodeR;
    viewMuscle = {#include "../DrawSettings/MusDrawSettings.any"};
    viewForce.Visible ??= Off;
  };
  // Iliocostalis Thoracis
  AnyMuscleViaPoint ITC7R7 = {
    AnyMuscleModel &MusMdl = ....MuscleModels.Right.ErectorSpinae.ITC7R7;
    AnyRefNode &Org = ....Segments.T1Seg.ITC7R7NodeROrg;
    AnyRefNode &Via1 = ....Segments.Right.R1Seg.ITC7R7Via1NodeR;
    AnyRefNode &Via2 = ....Segments.Right.R2Seg.ITC7R7Via2NodeR;
    AnyRefNode &Via3 = ....Segments.Right.R3Seg.ITC7R7Via3NodeR;
    AnyRefNode &Via4 = ....Segments.Right.R4Seg.ITC7R7Via4NodeR;
    AnyRefNode &Via5 = ....Segments.Right.R5Seg.ITC7R7Via5NodeR;
    AnyRefNode &Via6 = ....Segments.Right.R6Seg.ITC7R7Via6NodeR;
    AnyRefNode &Ins = ....Segments.Right.R7Seg.ITC7R7NodeRIns;
    viewMuscle = {#include "../DrawSettings/MusDrawSettings.any"};
    viewForce.Visible ??= Off;
  };
  AnyMuscleViaPoint ITR1R7 = {
    AnyMuscleModel &MusMdl = ....MuscleModels.Right.ErectorSpinae.ITR1R7;
    AnyRefNode &Org = ....Segments.Right.R1Seg.ITR1R7NodeROrg;
    AnyRefNode &Via2 = ....Segments.Right.R2Seg.ITR1R7Via1NodeR;
    AnyRefNode &Via3 = ....Segments.Right.R3Seg.ITR1R7Via2NodeR;
    AnyRefNode &Via4 = ....Segments.Right.R4Seg.ITR1R7Via3NodeR;
    AnyRefNode &Via5 = ....Segments.Right.R5Seg.ITR1R7Via4NodeR;
    AnyRefNode &Via6 = ....Segments.Right.R6Seg.ITR1R7Via5NodeR;
    AnyRefNode &Ins = ....Segments.Right.R7Seg.ITR1R7NodeRIns;
    viewMuscle = {#include "../DrawSettings/MusDrawSettings.any"};
    viewForce.Visible ??= Off;
  };
  AnyMuscleViaPoint ITR2R8 = {
    AnyMuscleModel &MusMdl = ....MuscleModels.Right.ErectorSpinae.ITR2R8;
    AnyRefNode &Org = ....Segments.Right.R2Seg.ITR2R8NodeROrg;
    AnyRefNode &Via2 = ....Segments.Right.R3Seg.ITR2R8Via1NodeR;
    AnyRefNode &Via3 = ....Segments.Right.R4Seg.ITR2R8Via2NodeR;
    AnyRefNode &Via4 = ....Segments.Right.R5Seg.ITR2R8Via3NodeR;
    AnyRefNode &Via5 = ....Segments.Right.R6Seg.ITR2R8Via4NodeR;
    AnyRefNode &Via6 = ....Segments.Right.R7Seg.ITR2R8Via5NodeR;
    AnyRefNode &Ins = ....Segments.Right.R8Seg.ITR2R8NodeRIns;
    viewMuscle = {#include "../DrawSettings/MusDrawSettings.any"};
    viewForce.Visible ??= Off;
  };
  AnyMuscleViaPoint ITR3R9 = {
    AnyMuscleModel &MusMdl = ....MuscleModels.Right.ErectorSpinae.ITR3R9;
    AnyRefNode &Org = ....Segments.Right.R3Seg.ITR3R9NodeROrg;
    AnyRefNode &Via2 = ....Segments.Right.R4Seg.ITR3R9Via1NodeR;
    AnyRefNode &Via3 = ....Segments.Right.R5Seg.ITR3R9Via2NodeR;
    AnyRefNode &Via4 = ....Segments.Right.R6Seg.ITR3R9Via3NodeR;
    AnyRefNode &Via5 = ....Segments.Right.R7Seg.ITR3R9Via4NodeR;
    AnyRefNode &Via6 = ....Segments.Right.R8Seg.ITR3R9Via5NodeR;
    AnyRefNode &Ins = ....Segments.Right.R9Seg.ITR3R9NodeRIns;
    viewMuscle = {#include "../DrawSettings/MusDrawSettings.any"};
    viewForce.Visible ??= Off;
  };
  AnyMuscleViaPoint ITR4R10 = {
    AnyMuscleModel &MusMdl = ....MuscleModels.Right.ErectorSpinae.ITR4R10;
    AnyRefNode &Org = ....Segments.Right.R4Seg.ITR4R10NodeROrg;
    AnyRefNode &Via2 = ....Segments.Right.R5Seg.ITR4R10Via1NodeR;
    AnyRefNode &Via3 = ....Segments.Right.R6Seg.ITR4R10Via2NodeR;
    AnyRefNode &Via4 = ....Segments.Right.R7Seg.ITR4R10Via3NodeR;
    AnyRefNode &Via5 = ....Segments.Right.R8Seg.ITR4R10Via4NodeR;
    AnyRefNode &Via6 = ....Segments.Right.R9Seg.ITR4R10Via5NodeR;
    AnyRefNode &Ins = ....Segments.Right.R10Seg.ITR4R10NodeRIns;
    viewMuscle = {#include "../DrawSettings/MusDrawSettings.any"};
    viewForce.Visible ??= Off;
  };
  AnyMuscleViaPoint ITR5R11 = {
    AnyMuscleModel &MusMdl = ....MuscleModels.Right.ErectorSpinae.ITR5T11;
    AnyRefNode &Org = ....Segments.Right.R5Seg.ITR5R11NodeROrg;
    AnyRefNode &Via2 = ....Segments.Right.R6Seg.ITR5R11Via1NodeR;
    AnyRefNode &Via3 = ....Segments.Right.R7Seg.ITR5R11Via2NodeR;
    AnyRefNode &Via4 = ....Segments.Right.R8Seg.ITR5R11Via3NodeR;
    AnyRefNode &Via5 = ....Segments.Right.R9Seg.ITR5R11Via4NodeR;
    AnyRefNode &Via6 = ....Segments.Right.R10Seg.ITR5R11Via5NodeR;
    AnyRefNode &Ins = ....Segments.Right.R11Seg.ITR5R11NodeRIns;
    viewMuscle = {#include "../DrawSettings/MusDrawSettings.any"};
    viewForce.Visible ??= Off;
  };
  AnyMuscleViaPoint ITR6R12 = {
    AnyMuscleModel &MusMdl = ....MuscleModels.Right.ErectorSpinae.ITR6T12;
    AnyRefNode &Org = ....Segments.Right.R6Seg.ITR6R12NodeR;
    AnyRefNode &Via2 = ....Segments.Right.R7Seg.ITR6R12Via1NodeR;
    AnyRefNode &Via3 = ....Segments.Right.R8Seg.ITR6R12Via2NodeR;
    AnyRefNode &Via4 = ....Segments.Right.R9Seg.ITR6R12Via3NodeR;
    AnyRefNode &Via5 = ....Segments.Right.R10Seg.ITR6R12Via4NodeR;
    AnyRefNode &Via6 = ....Segments.Right.R11Seg.ITR6R12Via5NodeR;
    AnyRefNode &Ins = ....Segments.Right.R12Seg.ITR6R12NodeRIns;
    viewMuscle = {#include "../DrawSettings/MusDrawSettings.any"};
    viewForce.Visible ??= Off;
  };
}; // End of ErectorSpinae

#if BM_TRUNK_THORACIC_MODEL == _THORACIC_MODEL_FLEXIBLE_


#define IC_SIZE 6
  #define IC_MULTIPLIER 1


  #if IC_TYPE == OLD


  MuscleGroup InterCostalisExternal(searchString="*.*") = {
    Muscle_template_Simple IC_Ext_R1R2(
      CREATE_ELEMENTS=IC_MULTIPLIER*(IC_SIZE),
      OriginSegment=....Segments.Right.R1Seg,
      ORIGIN_POINTS=....Data.unscaled.ModelParameters.R1.Right.IC_R1_Ext_Inf.Points,
      InsertionSegment=....Segments.Right.R2Seg,
      INSERTION_POINTS=....Data.unscaled.ModelParameters.R2.Right.IC_R2_Ext_Sup.Points,
      MUSCLE_MODEL_PARAMETERS=....MuscleModels.Right.InterCostalisExternal.IC_Ext_R1R2
    )={};

    Muscle_template_Simple IC_Ext_R2R3 (
      CREATE_ELEMENTS=IC_MULTIPLIER*(IC_SIZE+1),
      OriginSegment=....Segments.Right.R2Seg,
      ORIGIN_POINTS=....Data.unscaled.ModelParameters.R2.Right.IC_R2_Ext_Inf.Points,
      InsertionSegment=....Segments.Right.R5Seg,
      INSERTION_POINTS=....Data.unscaled.ModelParameters.R3.Right.IC_R3_Ext_Sup.Points,
      MUSCLE_MODEL_PARAMETERS=....MuscleModels.Right.InterCostalisExternal.IC_Ext_R2R3
    )={};

    Muscle_template_Simple IC_Ext_R3R4 (
      CREATE_ELEMENTS=IC_MULTIPLIER*(IC_SIZE+1),
      OriginSegment=....Segments.Right.R3Seg,
      ORIGIN_POINTS=....Data.unscaled.ModelParameters.R3.Right.IC_R3_Ext_Inf.Points,
      InsertionSegment=....Segments.Right.R4Seg,
      INSERTION_POINTS=....Data.unscaled.ModelParameters.R4.Right.IC_R4_Ext_Sup.Points,
      MUSCLE_MODEL_PARAMETERS=....MuscleModels.Right.InterCostalisExternal.IC_Ext_R3R4
    )={};

    Muscle_template_Simple IC_Ext_R4R5 (
      CREATE_ELEMENTS=IC_MULTIPLIER*(IC_SIZE+1),
      OriginSegment=....Segments.Right.R4Seg,
      ORIGIN_POINTS=....Data.unscaled.ModelParameters.R4.Right.IC_R4_Ext_Inf.Points,
      InsertionSegment=....Segments.Right.R5Seg,
      INSERTION_POINTS=....Data.unscaled.ModelParameters.R5.Right.IC_R5_Ext_Sup.Points,
      MUSCLE_MODEL_PARAMETERS=....MuscleModels.Right.InterCostalisExternal.IC_Ext_R4R5
    )={};

    Muscle_template_Simple IC_Ext_R5R6 (
      CREATE_ELEMENTS=IC_MULTIPLIER*(IC_SIZE+1),
      OriginSegment=....Segments.Right.R5Seg,
      ORIGIN_POINTS=....Data.unscaled.ModelParameters.R5.Right.IC_R5_Ext_Inf.Points,
      InsertionSegment=....Segments.Right.R6Seg,
      INSERTION_POINTS=....Data.unscaled.ModelParameters.R6.Right.IC_R6_Ext_Sup.Points,
      MUSCLE_MODEL_PARAMETERS=....MuscleModels.Right.InterCostalisExternal.IC_Ext_R5R6
    )={};

    Muscle_template_Simple IC_Ext_R6R7 (
      CREATE_ELEMENTS=IC_MULTIPLIER*(IC_SIZE+1),
      OriginSegment=....Segments.Right.R6Seg,
      ORIGIN_POINTS=....Data.unscaled.ModelParameters.R6.Right.IC_R6_Ext_Inf.Points,
      InsertionSegment=....Segments.Right.R7Seg,
      INSERTION_POINTS=....Data.unscaled.ModelParameters.R7.Right.IC_R7_Ext_Sup.Points,
      MUSCLE_MODEL_PARAMETERS=....MuscleModels.Right.InterCostalisExternal.IC_Ext_R6R7
    )={};

    Muscle_template_Simple IC_Ext_R7R8 (
      CREATE_ELEMENTS=IC_MULTIPLIER*(IC_SIZE+1),
      OriginSegment=....Segments.Right.R7Seg,
      ORIGIN_POINTS=....Data.unscaled.ModelParameters.R7.Right.IC_R7_Ext_Inf.Points,
      InsertionSegment=....Segments.Right.R8Seg,
      INSERTION_POINTS=....Data.unscaled.ModelParameters.R8.Right.IC_R8_Ext_Sup.Points,
      MUSCLE_MODEL_PARAMETERS=....MuscleModels.Right.InterCostalisExternal.IC_Ext_R7R8
    )={};

    Muscle_template_Simple IC_Ext_R8R9 (
      CREATE_ELEMENTS=IC_MULTIPLIER*(IC_SIZE+1),
      OriginSegment=....Segments.Right.R8Seg,
      ORIGIN_POINTS=....Data.unscaled.ModelParameters.R8.Right.IC_R8_Ext_Inf.Points,
      InsertionSegment=....Segments.Right.R9Seg,
      INSERTION_POINTS=....Data.unscaled.ModelParameters.R9.Right.IC_R9_Ext_Sup.Points,
      MUSCLE_MODEL_PARAMETERS=....MuscleModels.Right.InterCostalisExternal.IC_Ext_R8R9
    )={};

    Muscle_template_Simple IC_Ext_R9R10 (
      CREATE_ELEMENTS=IC_MULTIPLIER*(IC_SIZE+1),
      OriginSegment=....Segments.Right.R9Seg,
      ORIGIN_POINTS=....Data.unscaled.ModelParameters.R9.Right.IC_R9_Ext_Inf.Points,
      InsertionSegment=....Segments.Right.R10Seg,
      INSERTION_POINTS=....Data.unscaled.ModelParameters.R10.Right.IC_R10_Ext_Sup.Points,
      MUSCLE_MODEL_PARAMETERS=....MuscleModels.Right.InterCostalisExternal.IC_Ext_R9R10
    )={};

    Muscle_template_Simple IC_Ext_R10R11 (
      CREATE_ELEMENTS=IC_MULTIPLIER*(IC_SIZE),
      OriginSegment=....Segments.Right.R10Seg,
      ORIGIN_POINTS=....Data.unscaled.ModelParameters.R10.Right.IC_R10_Ext_Inf.Points,
      InsertionSegment=....Segments.Right.R11Seg,
      INSERTION_POINTS=....Data.unscaled.ModelParameters.R11.Right.IC_R11_Ext_Sup.Points,
      MUSCLE_MODEL_PARAMETERS=....MuscleModels.Right.InterCostalisExternal.IC_Ext_R10R11
    )={};

    Muscle_template_Simple IC_Ext_R11R12 (
      CREATE_ELEMENTS=IC_MULTIPLIER*(IC_SIZE-2),
      OriginSegment=....Segments.Right.R11Seg,
      ORIGIN_POINTS=....Data.unscaled.ModelParameters.R11.Right.IC_R11_Ext_Inf.Points,
      InsertionSegment=....Segments.Right.R12Seg,
      INSERTION_POINTS=....Data.unscaled.ModelParameters.R12.Right.IC_R12_Ext_Sup.Points,
      MUSCLE_MODEL_PARAMETERS=....MuscleModels.Right.InterCostalisExternal.IC_Ext_R11R12
    )={};
  };

  MuscleGroup InterCostalisInternal(searchString="*.*") = {
    Muscle_template_Simple IC_Int_R1R2 (
      CREATE_ELEMENTS=IC_MULTIPLIER*(IC_SIZE),
      OriginSegment=....Segments.Right.R1Seg,
      ORIGIN_POINTS=....Data.unscaled.ModelParameters.R1.Right.IC_R1_Int_Inf.Points,
      InsertionSegment=....Segments.Right.R2Seg,
      INSERTION_POINTS=....Data.unscaled.ModelParameters.R2.Right.IC_R2_Int_Sup.Points,
      MUSCLE_MODEL_PARAMETERS=....MuscleModels.Right.InterCostalisInternal.IC_Int_R1R2
    )={
      NumberOfElements = IC_MULTIPLIER*(IC_SIZE)+1;
      //The Last element is defined manually
      AnyMuscleViaPoint elem_sternum = {
        AnyRefNode &Org = .....Segments.SternumSeg.Right_IC_Int_R1R2_elem_sternum;
        AnyRefNode &Ins = .InsertionSegment.IC_Int_R1R2_elem_sternum;
        AnyMuscleModel MusMdl = {
          F0=..MuscleModel.F0/..NumberOfElements;
          Lf0=..MuscleModel.F0;
          Vol0=..MuscleModel.Vol0/..NumberOfElements;
        };
        viewMuscle = {#include "../DrawSettings/MusDrawSettings.any"};
        //AnyDrawPLine drwLine ={AnyFloat RGB_Red={1,0,0};AnyFloat RGB_Green={0,1,0};RGB=iffun(gtfun(.LmtDot,0),RGB_Red,RGB_Green);Thickness=0.005;};

      };
    };

    Muscle_template_Simple IC_Int_R2R3 (
     CREATE_ELEMENTS=IC_MULTIPLIER*(IC_SIZE+1),
      OriginSegment=....Segments.Right.R2Seg,
      ORIGIN_POINTS=....Data.unscaled.ModelParameters.R2.Right.IC_R2_Int_Inf.Points,
      InsertionSegment=....Segments.Right.R3Seg,
      INSERTION_POINTS=....Data.unscaled.ModelParameters.R3.Right.IC_R3_Int_Sup.Points,
      MUSCLE_MODEL_PARAMETERS=....MuscleModels.Right.InterCostalisInternal.IC_Int_R2R3
    )={
      NumberOfElements =  IC_MULTIPLIER*(IC_SIZE+1)+1;
      AnyMuscleViaPoint elem_sternum= {
        AnyRefNode &Org = .....Segments.SternalBodySeg.Right_IC_Int_R2R3_elem_sternum;
        AnyRefNode &Ins = .InsertionSegment.IC_Int_R2R3_elem_sternum;
        AnyMuscleModel MusMdl = {
          F0=..MuscleModel.F0/..NumberOfElements;
          Lf0=..MuscleModel.F0;
          Vol0=..MuscleModel.Vol0/..NumberOfElements;
        };
        viewMuscle = {#include "../DrawSettings/MusDrawSettings.any"};
      //AnyDrawPLine drwLine ={AnyFloat RGB_Red={1,0,0};AnyFloat RGB_Green={0,1,0};RGB=iffun(gtfun(.LmtDot,0),RGB_Red,RGB_Green);Thickness=0.005;};

      };
    };

    Muscle_template_Simple IC_Int_R3R4 (
    CREATE_ELEMENTS=IC_MULTIPLIER*(IC_SIZE+1),
      OriginSegment=....Segments.Right.R3Seg,
      ORIGIN_POINTS=....Data.unscaled.ModelParameters.R3.Right.IC_R3_Int_Inf.Points,
      InsertionSegment=....Segments.Right.R4Seg,
      INSERTION_POINTS=....Data.unscaled.ModelParameters.R4.Right.IC_R4_Int_Sup.Points,
      MUSCLE_MODEL_PARAMETERS=....MuscleModels.Right.InterCostalisInternal.IC_Int_R3R4
    )={
      NumberOfElements =  IC_MULTIPLIER*(IC_SIZE+1)+1;
      AnyMuscleViaPoint elem_sternum= {
        AnyRefNode &Org = .....Segments.SternalBodySeg.Right_IC_Int_R3R4_elem_sternum;
        AnyRefNode &Ins = .InsertionSegment.IC_Int_R3R4_elem_sternum;
        AnyMuscleModel MusMdl = {
          F0=..MuscleModel.F0/..NumberOfElements;
          Lf0=..MuscleModel.F0;
          Vol0=..MuscleModel.Vol0/..NumberOfElements;
        };
        viewMuscle = {#include "../DrawSettings/MusDrawSettings.any"};
      //AnyDrawPLine drwLine ={AnyFloat RGB_Red={1,0,0};AnyFloat RGB_Green={0,1,0};RGB=iffun(gtfun(.LmtDot,0),RGB_Red,RGB_Green);Thickness=0.005;};

      };
    };

    Muscle_template_Simple IC_Int_R4R5 (
    CREATE_ELEMENTS=IC_MULTIPLIER*(IC_SIZE+1),
    OriginSegment=....Segments.Right.R4Seg,
      ORIGIN_POINTS=....Data.unscaled.ModelParameters.R4.Right.IC_R4_Int_Inf.Points,
      InsertionSegment=....Segments.Right.R5Seg,
      INSERTION_POINTS=....Data.unscaled.ModelParameters.R5.Right.IC_R5_Int_Sup.Points,
      MUSCLE_MODEL_PARAMETERS=....MuscleModels.Right.InterCostalisInternal.IC_Int_R4R5
    )={
     NumberOfElements =  IC_MULTIPLIER*(IC_SIZE+1)+1;
      AnyMuscleViaPoint elem_sternum= {
        AnyRefNode &Org = .....Segments.SternalBodySeg.Right_IC_Int_R4R5_elem_sternum;
        AnyRefNode &Ins = .InsertionSegment.IC_Int_R4R5_elem_sternum;
        AnyMuscleModel MusMdl = {
          F0=..MuscleModel.F0/..NumberOfElements;
          Lf0=..MuscleModel.F0;
          Vol0=..MuscleModel.Vol0/..NumberOfElements;
        };
        viewMuscle = {#include "../DrawSettings/MusDrawSettings.any"};
       //AnyDrawPLine drwLine ={AnyFloat RGB_Red={1,0,0};AnyFloat RGB_Green={0,1,0};RGB=iffun(gtfun(.LmtDot,0),RGB_Red,RGB_Green);Thickness=0.005;};

      };
    };

    Muscle_template_Simple IC_Int_R5R6 (
       CREATE_ELEMENTS=IC_MULTIPLIER*(IC_SIZE+1),
        OriginSegment=....Segments.Right.R5Seg,
      ORIGIN_POINTS=....Data.unscaled.ModelParameters.R5.Right.IC_R5_Int_Inf.Points,
      InsertionSegment=....Segments.Right.R6Seg,
      INSERTION_POINTS=....Data.unscaled.ModelParameters.R6.Right.IC_R6_Int_Sup.Points,
      MUSCLE_MODEL_PARAMETERS=....MuscleModels.Right.InterCostalisInternal.IC_Int_R5R6
    )={
      NumberOfElements =  IC_MULTIPLIER*(IC_SIZE+1)+1;
      AnyMuscleViaPoint elem_sternum= {
        AnyRefNode &Org = .....Segments.SternalBodySeg.Right_IC_Int_R5R6_elem_sternum;
        AnyRefNode &Ins = .InsertionSegment.IC_Int_R5R6_elem_sternum;
        AnyMuscleModel MusMdl = {
          F0=..MuscleModel.F0/..NumberOfElements;
          Lf0=..MuscleModel.F0;
          Vol0=..MuscleModel.Vol0/..NumberOfElements;
        };
        viewMuscle = {#include "../DrawSettings/MusDrawSettings.any"};
    //AnyDrawPLine drwLine ={AnyFloat RGB_Red={1,0,0};AnyFloat RGB_Green={0,1,0};RGB=iffun(gtfun(.LmtDot,0),RGB_Red,RGB_Green);Thickness=0.005;};

      };
    };

    Muscle_template_Simple IC_Int_R6R7 (
     CREATE_ELEMENTS=IC_MULTIPLIER*(IC_SIZE+1),
        OriginSegment=....Segments.Right.R6Seg,
      ORIGIN_POINTS=....Data.unscaled.ModelParameters.R6.Right.IC_R6_Int_Inf.Points,
      InsertionSegment=....Segments.Right.R7Seg,
      INSERTION_POINTS=....Data.unscaled.ModelParameters.R7.Right.IC_R7_Int_Sup.Points,
      MUSCLE_MODEL_PARAMETERS=....MuscleModels.Right.InterCostalisInternal.IC_Int_R6R7
    )={
   NumberOfElements =  IC_MULTIPLIER*(IC_SIZE+1)+1;
      AnyMuscleViaPoint elem_sternum= {
        AnyRefNode &Org = .....Segments.SternalBodySeg.Right_IC_Int_R6R7_elem_sternum;
        AnyRefNode &Ins = .InsertionSegment.IC_Int_R6R7_elem_sternum;
        AnyMuscleModel MusMdl = {
          F0=..MuscleModel.F0/..NumberOfElements;
          Lf0=..MuscleModel.F0;
          Vol0=..MuscleModel.Vol0/..NumberOfElements;
        };
        viewMuscle = {#include "../DrawSettings/MusDrawSettings.any"};
        //AnyDrawPLine drwLine ={AnyFloat RGB_Red={1,0,0};AnyFloat RGB_Green={0,1,0};RGB=iffun(gtfun(.LmtDot,0),RGB_Red,RGB_Green);Thickness=0.005;};

      };
    };

    Muscle_template_Simple IC_Int_R7R8 (
     CREATE_ELEMENTS=IC_MULTIPLIER*(IC_SIZE+1),
        OriginSegment=....Segments.Right.R7Seg,
      ORIGIN_POINTS=....Data.unscaled.ModelParameters.R7.Right.IC_R7_Int_Inf.Points,
      InsertionSegment=....Segments.Right.R8Seg,
      INSERTION_POINTS=....Data.unscaled.ModelParameters.R8.Right.IC_R8_Int_Sup.Points,
      MUSCLE_MODEL_PARAMETERS=....MuscleModels.Right.InterCostalisInternal.IC_Int_R7R8
    )={
      NumberOfElements =  IC_MULTIPLIER*(IC_SIZE+1)+1;
      AnyMuscleViaPoint elem_sternum= {
        #if BM_TRUNK_THORACIC_STERNUM_TOPOLOGY == 4
          AnyRefNode &Org = .....Segments.Right.CostalCartilageSeg.Right_IC_Int_R7R8_elem_sternum;
        #else
          AnyRefNode &Org = .....Segments.SternalBodySeg.Right_IC_Int_R7R8_elem_sternum;
        #endif
        AnyRefNode &Ins = .InsertionSegment.IC_Int_R7R8_elem_sternum;
        AnyMuscleModel MusMdl = {
          F0=..MuscleModel.F0/..NumberOfElements;
          Lf0=..MuscleModel.F0;
          Vol0=..MuscleModel.Vol0/..NumberOfElements;
        };
        viewMuscle = {#include "../DrawSettings/MusDrawSettings.any"};
     // AnyDrawPLine drwLine ={AnyFloat RGB_Red={1,0,0};AnyFloat RGB_Green={0,1,0};RGB=iffun(gtfun(.LmtDot,0),RGB_Red,RGB_Green);Thickness=0.005;};

      };
    };

    Muscle_template_Simple IC_Int_R8R9 (
       CREATE_ELEMENTS=IC_MULTIPLIER*(IC_SIZE+1),
        OriginSegment=....Segments.Right.R8Seg,
      ORIGIN_POINTS=....Data.unscaled.ModelParameters.R8.Right.IC_R8_Int_Inf.Points,
      InsertionSegment=....Segments.Right.R9Seg,
      INSERTION_POINTS=....Data.unscaled.ModelParameters.R9.Right.IC_R9_Int_Sup.Points,
      MUSCLE_MODEL_PARAMETERS=....MuscleModels.Right.InterCostalisInternal.IC_Int_R8R9
    )={
     NumberOfElements =  IC_MULTIPLIER*(IC_SIZE+1)+1;
      AnyMuscleViaPoint elem_sternum= {
      #if BM_TRUNK_THORACIC_STERNUM_TOPOLOGY == 4
        AnyRefNode &Org = .....Segments.Right.CostalCartilageSeg.Right_IC_Int_R8R9_elem_sternum;
      #else
        AnyRefNode &Org = .....Segments.SternalBodySeg.Right_IC_Int_R8R9_elem_sternum;
      #endif
        AnyRefNode &Ins = .InsertionSegment.IC_Int_R8R9_elem_sternum;
        AnyMuscleModel MusMdl = {
          F0=..MuscleModel.F0/..NumberOfElements;
          Lf0=..MuscleModel.F0;
          Vol0=..MuscleModel.Vol0/..NumberOfElements;
        };
        viewMuscle = {#include "../DrawSettings/MusDrawSettings.any"};
      };
    };

    Muscle_template_Simple IC_Int_R9R10 (
      CREATE_ELEMENTS=IC_MULTIPLIER*(IC_SIZE+1),
        OriginSegment=....Segments.Right.R9Seg,
      ORIGIN_POINTS=....Data.unscaled.ModelParameters.R9.Right.IC_R9_Int_Inf.Points,
      InsertionSegment=....Segments.Right.R10Seg,
      INSERTION_POINTS=....Data.unscaled.ModelParameters.R10.Right.IC_R10_Int_Sup.Points,
      MUSCLE_MODEL_PARAMETERS=....MuscleModels.Right.InterCostalisInternal.IC_Int_R9R10
    )={
      NumberOfElements =  IC_MULTIPLIER*(IC_SIZE+1)+1;
      AnyMuscleViaPoint elem_sternum= {
      #if BM_TRUNK_THORACIC_STERNUM_TOPOLOGY == 4
        AnyRefNode &Org = .....Segments.Right.CostalCartilageSeg.Right_IC_Int_R9R10_elem_sternum;
      #else
        AnyRefNode &Org = .....Segments.SternalBodySeg.Right_IC_Int_R9R10_elem_sternum;
      #endif
        AnyRefNode &Ins = .InsertionSegment.IC_Int_R9R10_elem_sternum;
        AnyMuscleModel MusMdl = {
          F0=..MuscleModel.F0/..NumberOfElements;
          Lf0=..MuscleModel.F0;
          Vol0=..MuscleModel.Vol0/..NumberOfElements;
        };
        viewMuscle = {#include "../DrawSettings/MusDrawSettings.any"};
      };
    };

    Muscle_template_Simple IC_Int_R10R11 (
       CREATE_ELEMENTS=IC_MULTIPLIER*(IC_SIZE),
        OriginSegment=....Segments.Right.R10Seg,
      ORIGIN_POINTS=....Data.unscaled.ModelParameters.R10.Right.IC_R10_Int_Inf.Points,
      InsertionSegment=....Segments.Right.R11Seg,
      INSERTION_POINTS=....Data.unscaled.ModelParameters.R11.Right.IC_R11_Int_Sup.Points,
      MUSCLE_MODEL_PARAMETERS=....MuscleModels.Right.InterCostalisInternal.IC_Int_R10R11
    )={};

    Muscle_template_Simple IC_Int_R11R12 (
       CREATE_ELEMENTS=IC_MULTIPLIER*(IC_SIZE-1),
        OriginSegment=....Segments.Right.R11Seg,
      ORIGIN_POINTS=....Data.unscaled.ModelParameters.R11.Right.IC_R11_Int_Inf.Points,
      InsertionSegment=....Segments.Right.R12Seg,
      INSERTION_POINTS=....Data.unscaled.ModelParameters.R12.Right.IC_R12_Int_Sup.Points,
      MUSCLE_MODEL_PARAMETERS=....MuscleModels.Right.InterCostalisInternal.IC_Int_R11R12
    )={};
  };

  MuscleGroup InnermostInterCostalis(searchString="*.*") = {
    Muscle_template_Simple IC_Inn_R1R2(
       CREATE_ELEMENTS=IC_MULTIPLIER*(IC_SIZE),
        OriginSegment=....Segments.Right.R1Seg,
      ORIGIN_POINTS=....Data.unscaled.ModelParameters.R1.Right.IC_R1_Inn_Inf.Points,
      InsertionSegment=....Segments.Right.R2Seg,
      INSERTION_POINTS=....Data.unscaled.ModelParameters.R2.Right.IC_R2_Inn_Sup.Points,
      MUSCLE_MODEL_PARAMETERS=....MuscleModels.Right.InterCostalisExternal.IC_Ext_R1R2
    )={};

    Muscle_template_Simple IC_Inn_R2R3 (
      CREATE_ELEMENTS=IC_MULTIPLIER*(IC_SIZE+1),
        OriginSegment=....Segments.Right.R2Seg,
      ORIGIN_POINTS=....Data.unscaled.ModelParameters.R2.Right.IC_R2_Inn_Inf.Points,
      InsertionSegment=....Segments.Right.R5Seg,
      INSERTION_POINTS=....Data.unscaled.ModelParameters.R3.Right.IC_R3_Inn_Sup.Points,
      MUSCLE_MODEL_PARAMETERS=....MuscleModels.Right.InterCostalisExternal.IC_Ext_R2R3
    )={};

    Muscle_template_Simple IC_Inn_R3R4 (
       CREATE_ELEMENTS=IC_MULTIPLIER*(IC_SIZE+1),
        OriginSegment=....Segments.Right.R3Seg,
      ORIGIN_POINTS=....Data.unscaled.ModelParameters.R3.Right.IC_R3_Inn_Inf.Points,
      InsertionSegment=....Segments.Right.R4Seg,
      INSERTION_POINTS=....Data.unscaled.ModelParameters.R4.Right.IC_R4_Inn_Sup.Points,
      MUSCLE_MODEL_PARAMETERS=....MuscleModels.Right.InterCostalisExternal.IC_Ext_R3R4
    )={};

    Muscle_template_Simple IC_Inn_R4R5 (
       CREATE_ELEMENTS=IC_MULTIPLIER*(IC_SIZE+1),
        OriginSegment=....Segments.Right.R4Seg,
      ORIGIN_POINTS=....Data.unscaled.ModelParameters.R4.Right.IC_R4_Inn_Inf.Points,
      InsertionSegment=....Segments.Right.R5Seg,
      INSERTION_POINTS=....Data.unscaled.ModelParameters.R5.Right.IC_R5_Inn_Sup.Points,
      MUSCLE_MODEL_PARAMETERS=....MuscleModels.Right.InterCostalisExternal.IC_Ext_R4R5
    )={};

    Muscle_template_Simple IC_Inn_R5R6 (
       CREATE_ELEMENTS=IC_MULTIPLIER*(IC_SIZE+1),
        OriginSegment=....Segments.Right.R5Seg,
      ORIGIN_POINTS=....Data.unscaled.ModelParameters.R5.Right.IC_R5_Inn_Inf.Points,
      InsertionSegment=....Segments.Right.R6Seg,
      INSERTION_POINTS=....Data.unscaled.ModelParameters.R6.Right.IC_R6_Inn_Sup.Points,
      MUSCLE_MODEL_PARAMETERS=....MuscleModels.Right.InterCostalisExternal.IC_Ext_R5R6
    )={};

    Muscle_template_Simple IC_Inn_R6R7 (
      CREATE_ELEMENTS=IC_MULTIPLIER*(IC_SIZE+1),
        OriginSegment=....Segments.Right.R6Seg,
      ORIGIN_POINTS=....Data.unscaled.ModelParameters.R6.Right.IC_R6_Inn_Inf.Points,
      InsertionSegment=....Segments.Right.R7Seg,
      INSERTION_POINTS=....Data.unscaled.ModelParameters.R7.Right.IC_R7_Inn_Sup.Points,
      MUSCLE_MODEL_PARAMETERS=....MuscleModels.Right.InterCostalisExternal.IC_Ext_R6R7
    )={};

    Muscle_template_Simple IC_Inn_R7R8 (
        CREATE_ELEMENTS=IC_MULTIPLIER*(IC_SIZE+1),
        OriginSegment=....Segments.Right.R7Seg,
      ORIGIN_POINTS=....Data.unscaled.ModelParameters.R7.Right.IC_R7_Inn_Inf.Points,
      InsertionSegment=....Segments.Right.R8Seg,
      INSERTION_POINTS=....Data.unscaled.ModelParameters.R8.Right.IC_R8_Inn_Sup.Points,
      MUSCLE_MODEL_PARAMETERS=....MuscleModels.Right.InterCostalisExternal.IC_Ext_R7R8
    )={};

    Muscle_template_Simple IC_Inn_R8R9 (
       CREATE_ELEMENTS=IC_MULTIPLIER*(IC_SIZE+1),
        OriginSegment=....Segments.Right.R8Seg,
      ORIGIN_POINTS=....Data.unscaled.ModelParameters.R8.Right.IC_R8_Inn_Inf.Points,
      InsertionSegment=....Segments.Right.R9Seg,
      INSERTION_POINTS=....Data.unscaled.ModelParameters.R9.Right.IC_R9_Inn_Sup.Points,
      MUSCLE_MODEL_PARAMETERS=....MuscleModels.Right.InterCostalisExternal.IC_Ext_R8R9
    )={};

    Muscle_template_Simple IC_Inn_R9R10 (
       CREATE_ELEMENTS=IC_MULTIPLIER*(IC_SIZE+1),
        OriginSegment=....Segments.Right.R9Seg,
      ORIGIN_POINTS=....Data.unscaled.ModelParameters.R9.Right.IC_R9_Inn_Inf.Points,
      InsertionSegment=....Segments.Right.R10Seg,
      INSERTION_POINTS=....Data.unscaled.ModelParameters.R10.Right.IC_R10_Inn_Sup.Points,
      MUSCLE_MODEL_PARAMETERS=....MuscleModels.Right.InterCostalisExternal.IC_Ext_R9R10
    )={};

    Muscle_template_Simple IC_Inn_R10R11 (
       CREATE_ELEMENTS=IC_MULTIPLIER*(IC_SIZE),
        OriginSegment=....Segments.Right.R10Seg,
      ORIGIN_POINTS=....Data.unscaled.ModelParameters.R10.Right.IC_R10_Inn_Inf.Points,
      InsertionSegment=....Segments.Right.R11Seg,
      INSERTION_POINTS=....Data.unscaled.ModelParameters.R11.Right.IC_R11_Inn_Sup.Points,
      MUSCLE_MODEL_PARAMETERS=....MuscleModels.Right.InterCostalisExternal.IC_Ext_R10R11
    )={};

    Muscle_template_Simple IC_Inn_R11R12 (
        CREATE_ELEMENTS=IC_MULTIPLIER*(IC_SIZE-2),
        OriginSegment=....Segments.Right.R11Seg,
      ORIGIN_POINTS=....Data.unscaled.ModelParameters.R11.Right.IC_R11_Inn_Inf.Points,
      InsertionSegment=....Segments.Right.R12Seg,
      INSERTION_POINTS=....Data.unscaled.ModelParameters.R12.Right.IC_R12_Inn_Sup.Points,
      MUSCLE_MODEL_PARAMETERS=....MuscleModels.Right.InterCostalisExternal.IC_Ext_R11R12
    )={};
  };
#endif


  #if IC_TYPE != OLD
  //  #if IC_TYPE== MULTI_OFFSET

    MuscleGroup InnermostInterCostalis(searchString="IC*.*") = {

      Muscle_template_Simple_Angle_MultiOffset IC_Inn_R1R2 (
        CREATE_ELEMENTS= IC_MULTIPLIER*IC_SIZE,
        OriginSegment=....Segments.Right.R1Seg,
        ORIGIN_POINTS=....Segments.Right.R1Seg.IC_points.Inn_InfPoints,
        InsertionSegment=....Segments.Right.R2Seg,
        INSERTION_POINTS=....Segments.Right.R2Seg.IC_points.Inn_SupPoints,
        MUSCLE_MODEL_PARAMETERS=....MuscleModels.Right.InterCostalisExternal.IC_Ext_R1R2
      )={DesiredAngle = 0;};

    Muscle_template_Simple_Angle_MultiOffset IC_Inn_R2R3 (
      CREATE_ELEMENTS=IC_MULTIPLIER*(IC_SIZE+3),
        OriginSegment=....Segments.Right.R2Seg,
        ORIGIN_POINTS=....Segments.Right.R2Seg.IC_points.Inn_InfPoints,
        InsertionSegment=....Segments.Right.R3Seg,
        INSERTION_POINTS=....Segments.Right.R3Seg.IC_points.Inn_SupPoints,
        MUSCLE_MODEL_PARAMETERS=....MuscleModels.Right.InterCostalisExternal.IC_Ext_R2R3
      )={DesiredAngle = 0;};


      Muscle_template_Simple_Angle_MultiOffset IC_Inn_R3R4 (
      CREATE_ELEMENTS=IC_MULTIPLIER*(IC_SIZE+3),
        OriginSegment=....Segments.Right.R3Seg,
        ORIGIN_POINTS=....Segments.Right.R3Seg.IC_points.Inn_InfPoints,
        InsertionSegment=....Segments.Right.R4Seg,
        INSERTION_POINTS=....Segments.Right.R4Seg.IC_points.Inn_SupPoints,
        MUSCLE_MODEL_PARAMETERS=....MuscleModels.Right.InterCostalisExternal.IC_Ext_R3R4
      )={DesiredAngle = 0;};

    Muscle_template_Simple_Angle_MultiOffset IC_Inn_R4R5 (
      CREATE_ELEMENTS=IC_MULTIPLIER*(IC_SIZE+3),
        OriginSegment=....Segments.Right.R4Seg,
        ORIGIN_POINTS=....Segments.Right.R4Seg.IC_points.Inn_InfPoints,
        InsertionSegment=....Segments.Right.R5Seg,
        INSERTION_POINTS=....Segments.Right.R5Seg.IC_points.Inn_SupPoints,
        MUSCLE_MODEL_PARAMETERS=....MuscleModels.Right.InterCostalisExternal.IC_Ext_R4R5
      )={DesiredAngle = 0;};


        Muscle_template_Simple_Angle_MultiOffset IC_Inn_R5R6 (
      CREATE_ELEMENTS=IC_MULTIPLIER*(IC_SIZE+3),
        OriginSegment=....Segments.Right.R5Seg,
        ORIGIN_POINTS=....Segments.Right.R5Seg.IC_points.Inn_InfPoints,
        InsertionSegment=....Segments.Right.R6Seg,
        INSERTION_POINTS=....Segments.Right.R6Seg.IC_points.Inn_SupPoints,
        MUSCLE_MODEL_PARAMETERS=....MuscleModels.Right.InterCostalisExternal.IC_Ext_R5R6
      )={DesiredAngle = 0;};


        Muscle_template_Simple_Angle_MultiOffset IC_Inn_R6R7 (
      CREATE_ELEMENTS=IC_MULTIPLIER*(IC_SIZE+3),
        OriginSegment=....Segments.Right.R6Seg,
        ORIGIN_POINTS=....Segments.Right.R6Seg.IC_points.Inn_InfPoints,
        InsertionSegment=....Segments.Right.R7Seg,
        INSERTION_POINTS=....Segments.Right.R7Seg.IC_points.Inn_SupPoints,
        MUSCLE_MODEL_PARAMETERS=....MuscleModels.Right.InterCostalisExternal.IC_Ext_R6R7
      )={DesiredAngle = 0;};

        Muscle_template_Simple_Angle_MultiOffset IC_Inn_R7R8 (
      CREATE_ELEMENTS=IC_MULTIPLIER*(IC_SIZE+3),
        OriginSegment=....Segments.Right.R7Seg,
        ORIGIN_POINTS=....Segments.Right.R7Seg.IC_points.Inn_InfPoints,
        InsertionSegment=....Segments.Right.R8Seg,
        INSERTION_POINTS=....Segments.Right.R8Seg.IC_points.Inn_SupPoints,
        MUSCLE_MODEL_PARAMETERS=....MuscleModels.Right.InterCostalisExternal.IC_Ext_R7R8
      )={DesiredAngle = 0;};


        Muscle_template_Simple_Angle_MultiOffset IC_Inn_R8R9 (
        CREATE_ELEMENTS=IC_MULTIPLIER*(IC_SIZE+3),
        OriginSegment=....Segments.Right.R8Seg,
        ORIGIN_POINTS=....Segments.Right.R8Seg.IC_points.Inn_InfPoints,
        InsertionSegment=....Segments.Right.R9Seg,
        INSERTION_POINTS=....Segments.Right.R9Seg.IC_points.Inn_SupPoints,
        MUSCLE_MODEL_PARAMETERS=....MuscleModels.Right.InterCostalisExternal.IC_Ext_R8R9
      )={DesiredAngle = 0;};

      Muscle_template_Simple_Angle_MultiOffset IC_Inn_R9R10 (
      CREATE_ELEMENTS=IC_MULTIPLIER*(IC_SIZE+3),
        OriginSegment=....Segments.Right.R9Seg,
        ORIGIN_POINTS=....Segments.Right.R9Seg.IC_points.Inn_InfPoints,
        InsertionSegment=....Segments.Right.R10Seg,
        INSERTION_POINTS=....Segments.Right.R10Seg.IC_points.Inn_SupPoints,
        MUSCLE_MODEL_PARAMETERS=....MuscleModels.Right.InterCostalisExternal.IC_Ext_R9R10
      )={DesiredAngle = 0;};

      Muscle_template_Simple_Angle_MultiOffset IC_Inn_R10R11 (
    CREATE_ELEMENTS=IC_MULTIPLIER*(IC_SIZE),
        OriginSegment=....Segments.Right.R10Seg,
        ORIGIN_POINTS=....Segments.Right.R10Seg.IC_points.Inn_InfPoints,
        InsertionSegment=....Segments.Right.R11Seg,
        INSERTION_POINTS=....Segments.Right.R11Seg.IC_points.Inn_SupPoints,
        MUSCLE_MODEL_PARAMETERS=....MuscleModels.Right.InterCostalisExternal.IC_Ext_R10R11
      )={DesiredAngle = 0;};


        Muscle_template_Simple_Angle_MultiOffset IC_Inn_R11R12 (
        CREATE_ELEMENTS=IC_MULTIPLIER*(IC_SIZE-4),
        OriginSegment=....Segments.Right.R11Seg,
        ORIGIN_POINTS=....Segments.Right.R11Seg.IC_points.Inn_InfPoints,
        InsertionSegment=....Segments.Right.R12Seg,
        INSERTION_POINTS=....Segments.Right.R12Seg.IC_points.Inn_SupPoints,
        MUSCLE_MODEL_PARAMETERS=....MuscleModels.Right.InterCostalisExternal.IC_Ext_R11R12
      )={DesiredAngle = 0;};
    };


    MuscleGroup InternalInterCostalis(searchString="*.*") = {

      Muscle_template_Simple_Angle_MultiOffset IC_Int_R1R2 (
        CREATE_ELEMENTS=IC_MULTIPLIER*(IC_SIZE+1-3),
        OriginSegment=....Segments.Right.R1Seg,
        ORIGIN_POINTS=....Segments.Right.R1Seg.IC_points.Int_InfPoints,
        InsertionSegment=....Segments.Right.R2Seg,
        INSERTION_POINTS=....Segments.Right.R2Seg.IC_points.Int_SupPoints,
        MUSCLE_MODEL_PARAMETERS=....MuscleModels.Right.InterCostalisExternal.IC_Ext_R1R2
      )={
        DesiredAngle =-45;
        NumberOfElements = IC_MULTIPLIER*(IC_SIZE+1-3);
      //The Last element is defined manually
        AnyMuscleViaPoint elem_sternum = {
          AnyRefNode &Org = .....Segments.SternumSeg.Right_IC_Int_R1R2_elem_sternum;
          AnyRefNode &Ins = .InsertionSegment.IC_Int_R1R2_elem_sternum;
          AnyMuscleModel MusMdl = {
            F0=..MuscleModel.F0/..NumberOfElements;
            Lf0=..MuscleModel.F0;
            Vol0=..MuscleModel.Vol0/..NumberOfElements;
          };
          viewMuscle = {#include "../DrawSettings/MusDrawSettings.any"};
          //AnyDrawPLine drwLine ={AnyFloat RGB_Red={1,0,0};AnyFloat RGB_Green={0,1,0};RGB=iffun(gtfun(.LmtDot,0),RGB_Red,RGB_Green);Thickness=0.005;};
        };
      };

    Muscle_template_Simple_Angle_MultiOffset IC_Int_R2R3 (
        CREATE_ELEMENTS=IC_MULTIPLIER*(IC_SIZE+1),
        OriginSegment=....Segments.Right.R2Seg,
        ORIGIN_POINTS=....Segments.Right.R2Seg.IC_points.Int_InfPoints,
        InsertionSegment=....Segments.Right.R3Seg,
        INSERTION_POINTS=....Segments.Right.R3Seg.IC_points.Int_SupPoints,
        MUSCLE_MODEL_PARAMETERS=....MuscleModels.Right.InterCostalisExternal.IC_Ext_R2R3
      )={
        DesiredAngle=-45;
        NumberOfElements =  IC_MULTIPLIER*(IC_SIZE+1);
        AnyMuscleViaPoint elem_sternum= {
          AnyRefNode &Org = .....Segments.SternalBodySeg.Right_IC_Int_R2R3_elem_sternum;
          AnyRefNode &Ins = .InsertionSegment.IC_Int_R2R3_elem_sternum;
          AnyMuscleModel MusMdl = {
            F0=..MuscleModel.F0/..NumberOfElements;
            Lf0=..MuscleModel.F0;
            Vol0=..MuscleModel.Vol0/..NumberOfElements;
          };
          viewMuscle = {#include "../DrawSettings/MusDrawSettings.any"};
          //AnyDrawPLine drwLine ={AnyFloat RGB_Red={1,0,0};AnyFloat RGB_Green={0,1,0};RGB=iffun(gtfun(.LmtDot,0),RGB_Red,RGB_Green);Thickness=0.005;};
        };
      };

      Muscle_template_Simple_Angle_MultiOffset IC_Int_R3R4 (
        CREATE_ELEMENTS=IC_MULTIPLIER*(IC_SIZE+1),
        OriginSegment=....Segments.Right.R3Seg,
        ORIGIN_POINTS=....Segments.Right.R3Seg.IC_points.Int_InfPoints,
        InsertionSegment=....Segments.Right.R4Seg,
        INSERTION_POINTS=....Segments.Right.R4Seg.IC_points.Int_SupPoints,
        MUSCLE_MODEL_PARAMETERS=....MuscleModels.Right.InterCostalisExternal.IC_Ext_R3R4
      )={
        DesiredAngle=-45;
        NumberOfElements =  IC_MULTIPLIER*(IC_SIZE+1);
        AnyMuscleViaPoint elem_sternum= {
          AnyRefNode &Org = .....Segments.SternalBodySeg.Right_IC_Int_R3R4_elem_sternum;
          AnyRefNode &Ins = .InsertionSegment.IC_Int_R3R4_elem_sternum;
          AnyMuscleModel MusMdl = {
            F0=..MuscleModel.F0/..NumberOfElements;
            Lf0=..MuscleModel.F0;
            Vol0=..MuscleModel.Vol0/..NumberOfElements;
          };
          viewMuscle = {#include "../DrawSettings/MusDrawSettings.any"};
          // AnyDrawPLine drwLine ={AnyFloat RGB_Red={1,0,0};AnyFloat RGB_Green={0,1,0};RGB=iffun(gtfun(.LmtDot,0),RGB_Red,RGB_Green);Thickness=0.005;};
        };
      };

    Muscle_template_Simple_Angle_MultiOffset IC_Int_R4R5 (
        CREATE_ELEMENTS=IC_MULTIPLIER*(IC_SIZE+1),
        OriginSegment=....Segments.Right.R4Seg,
        ORIGIN_POINTS=....Segments.Right.R4Seg.IC_points.Int_InfPoints,
        InsertionSegment=....Segments.Right.R5Seg,
        INSERTION_POINTS=....Segments.Right.R5Seg.IC_points.Int_SupPoints,
        MUSCLE_MODEL_PARAMETERS=....MuscleModels.Right.InterCostalisExternal.IC_Ext_R4R5
      )={
        DesiredAngle=-45;
        NumberOfElements =  IC_MULTIPLIER*(IC_SIZE+1);
        AnyMuscleViaPoint elem_sternum= {
          AnyRefNode &Org = .....Segments.SternalBodySeg.Right_IC_Int_R4R5_elem_sternum;
          AnyRefNode &Ins = .InsertionSegment.IC_Int_R4R5_elem_sternum;
          AnyMuscleModel MusMdl = {
            F0=..MuscleModel.F0/..NumberOfElements;
            Lf0=..MuscleModel.F0;
            Vol0=..MuscleModel.Vol0/..NumberOfElements;
          };
          viewMuscle = {#include "../DrawSettings/MusDrawSettings.any"};
        //  AnyDrawPLine drwLine ={AnyFloat RGB_Red={1,0,0};AnyFloat RGB_Green={0,1,0};RGB=iffun(gtfun(.LmtDot,0),RGB_Red,RGB_Green);Thickness=0.005;};
        };
      };

      Muscle_template_Simple_Angle_MultiOffset IC_Int_R5R6 (
        CREATE_ELEMENTS=IC_MULTIPLIER*(IC_SIZE+1),
        OriginSegment=....Segments.Right.R5Seg,
        ORIGIN_POINTS=....Segments.Right.R5Seg.IC_points.Int_InfPoints,
        InsertionSegment=....Segments.Right.R6Seg,
        INSERTION_POINTS=....Segments.Right.R6Seg.IC_points.Int_SupPoints,
        MUSCLE_MODEL_PARAMETERS=....MuscleModels.Right.InterCostalisExternal.IC_Ext_R5R6
      )={
        DesiredAngle=-45;
        NumberOfElements =  IC_MULTIPLIER*(IC_SIZE+1);
        AnyMuscleViaPoint elem_sternum= {
          AnyRefNode &Org = .....Segments.SternalBodySeg.Right_IC_Int_R5R6_elem_sternum;
          AnyRefNode &Ins = .InsertionSegment.IC_Int_R5R6_elem_sternum;
          AnyMuscleModel MusMdl = {
            F0=..MuscleModel.F0/..NumberOfElements;
            Lf0=..MuscleModel.F0;
            Vol0=..MuscleModel.Vol0/..NumberOfElements;
          };
          viewMuscle = {#include "../DrawSettings/MusDrawSettings.any"};
          // AnyDrawPLine drwLine ={AnyFloat RGB_Red={1,0,0};AnyFloat RGB_Green={0,1,0};RGB=iffun(gtfun(.LmtDot,0),RGB_Red,RGB_Green);Thickness=0.005;};
        };
      };

      Muscle_template_Simple_Angle_MultiOffset IC_Int_R6R7 (
        CREATE_ELEMENTS=IC_MULTIPLIER*(IC_SIZE+1),
        OriginSegment=....Segments.Right.R6Seg,
        ORIGIN_POINTS=....Segments.Right.R6Seg.IC_points.Int_InfPoints,
        InsertionSegment=....Segments.Right.R7Seg,
        INSERTION_POINTS=....Segments.Right.R7Seg.IC_points.Int_SupPoints,
        MUSCLE_MODEL_PARAMETERS=....MuscleModels.Right.InterCostalisExternal.IC_Ext_R6R7
      )={
        DesiredAngle=-45;
        NumberOfElements =  IC_MULTIPLIER*(IC_SIZE+1);
        AnyMuscleViaPoint elem_sternum= {
          AnyRefNode &Org = .....Segments.SternalBodySeg.Right_IC_Int_R6R7_elem_sternum;
          AnyRefNode &Ins = .InsertionSegment.IC_Int_R6R7_elem_sternum;
          AnyMuscleModel MusMdl = {
            F0=..MuscleModel.F0/..NumberOfElements;
            Lf0=..MuscleModel.F0;
            Vol0=..MuscleModel.Vol0/..NumberOfElements;
          };
          viewMuscle = {#include "../DrawSettings/MusDrawSettings.any"};
          //AnyDrawPLine drwLine ={AnyFloat RGB_Red={1,0,0};AnyFloat RGB_Green={0,1,0};RGB=iffun(gtfun(.LmtDot,0),RGB_Red,RGB_Green);Thickness=0.005;};
        };
      };

      Muscle_template_Simple_Angle_MultiOffset IC_Int_R7R8 (
        CREATE_ELEMENTS=IC_MULTIPLIER*(IC_SIZE+1),
        OriginSegment=....Segments.Right.R7Seg,
        ORIGIN_POINTS=....Segments.Right.R7Seg.IC_points.Int_InfPoints,
        InsertionSegment=....Segments.Right.R8Seg,
        INSERTION_POINTS=....Segments.Right.R8Seg.IC_points.Int_SupPoints,
        MUSCLE_MODEL_PARAMETERS=....MuscleModels.Right.InterCostalisExternal.IC_Ext_R7R8
      )={
        DesiredAngle=-45;
        NumberOfElements =  IC_MULTIPLIER*(IC_SIZE+1);
        AnyMuscleViaPoint elem_sternum= {

          #if BM_TRUNK_THORACIC_STERNUM_TOPOLOGY == 4
            AnyRefNode &Org = .....Segments.Right.CostalCartilageSeg.Right_IC_Int_R7R8_elem_sternum;
          #else
            AnyRefNode &Org = .....Segments.SternalBodySeg.Right_IC_Int_R7R8_elem_sternum;
          #endif

          AnyRefNode &Ins = .InsertionSegment.IC_Int_R7R8_elem_sternum;
          AnyMuscleModel MusMdl = {
            F0=..MuscleModel.F0/..NumberOfElements;
            Lf0=..MuscleModel.F0;
            Vol0=..MuscleModel.Vol0/..NumberOfElements;
          };
          viewMuscle = {#include "../DrawSettings/MusDrawSettings.any"};
          //AnyDrawPLine drwLine ={AnyFloat RGB_Red={1,0,0};AnyFloat RGB_Green={0,1,0};RGB=iffun(gtfun(.LmtDot,0),RGB_Red,RGB_Green);Thickness=0.005;};
        };
      };

      Muscle_template_Simple_Angle_MultiOffset IC_Int_R8R9 (
        CREATE_ELEMENTS=IC_MULTIPLIER*(IC_SIZE+1),
        OriginSegment=....Segments.Right.R8Seg,
        ORIGIN_POINTS=....Segments.Right.R8Seg.IC_points.Int_InfPoints,
        InsertionSegment=....Segments.Right.R9Seg,
        INSERTION_POINTS=....Segments.Right.R9Seg.IC_points.Int_SupPoints,
        MUSCLE_MODEL_PARAMETERS=....MuscleModels.Right.InterCostalisExternal.IC_Ext_R8R9
      )={
        DesiredAngle=-45;
        NumberOfElements =  IC_MULTIPLIER*(IC_SIZE+1);
        AnyMuscleViaPoint elem_sternum= {

          #if BM_TRUNK_THORACIC_STERNUM_TOPOLOGY == 4
            AnyRefNode &Org = .....Segments.Right.CostalCartilageSeg.Right_IC_Int_R8R9_elem_sternum;
          #else
            AnyRefNode &Org = .....Segments.SternalBodySeg.Right_IC_Int_R8R9_elem_sternum;
          #endif

          AnyRefNode &Ins = .InsertionSegment.IC_Int_R8R9_elem_sternum;
          AnyMuscleModel MusMdl = {
            F0=..MuscleModel.F0/..NumberOfElements;
            Lf0=..MuscleModel.F0;
            Vol0=..MuscleModel.Vol0/..NumberOfElements;
          };
          viewMuscle = {#include "../DrawSettings/MusDrawSettings.any"};
        };
      };

    Muscle_template_Simple_Angle_MultiOffset IC_Int_R9R10 (
      CREATE_ELEMENTS=IC_MULTIPLIER*(IC_SIZE+1),
      OriginSegment=....Segments.Right.R9Seg,
      ORIGIN_POINTS=....Segments.Right.R9Seg.IC_points.Int_InfPoints,
      InsertionSegment=....Segments.Right.R10Seg,
      INSERTION_POINTS=....Segments.Right.R10Seg.IC_points.Int_SupPoints,
      MUSCLE_MODEL_PARAMETERS=....MuscleModels.Right.InterCostalisExternal.IC_Ext_R9R10
    )={
      DesiredAngle=-45;
     NumberOfElements =  IC_MULTIPLIER*(IC_SIZE+1);
      AnyMuscleViaPoint elem_sternum= {
      #if BM_TRUNK_THORACIC_STERNUM_TOPOLOGY == 4
        AnyRefNode &Org = .....Segments.Right.CostalCartilageSeg.Right_IC_Int_R9R10_elem_sternum;
      #else
        AnyRefNode &Org = .....Segments.SternalBodySeg.Right_IC_Int_R9R10_elem_sternum;
      #endif
        AnyRefNode &Ins = .InsertionSegment.IC_Int_R9R10_elem_sternum;
        AnyMuscleModel MusMdl = {
          F0=..MuscleModel.F0/..NumberOfElements;
          Lf0=..MuscleModel.F0;
          Vol0=..MuscleModel.Vol0/..NumberOfElements;
        };
        viewMuscle = {#include "../DrawSettings/MusDrawSettings.any"};
      };
    };


    Muscle_template_Simple_Angle_MultiOffset IC_Int_R10R11 (
      CREATE_ELEMENTS=IC_MULTIPLIER*(IC_SIZE),
      OriginSegment=....Segments.Right.R10Seg,
      ORIGIN_POINTS=....Segments.Right.R10Seg.IC_points.Int_InfPoints,
      InsertionSegment=....Segments.Right.R11Seg,
      INSERTION_POINTS=....Segments.Right.R11Seg.IC_points.Int_SupPoints,
      MUSCLE_MODEL_PARAMETERS=....MuscleModels.Right.InterCostalisExternal.IC_Ext_R10R11
    )={DesiredAngle=-45;};


       Muscle_template_Simple_Angle_MultiOffset IC_Int_R11R12 (
       CREATE_ELEMENTS=IC_MULTIPLIER*(IC_SIZE-4),
      OriginSegment=....Segments.Right.R11Seg,
      ORIGIN_POINTS=....Segments.Right.R11Seg.IC_points.Int_InfPoints,
      InsertionSegment=....Segments.Right.R12Seg,
      INSERTION_POINTS=....Segments.Right.R12Seg.IC_points.Int_SupPoints,
      MUSCLE_MODEL_PARAMETERS=....MuscleModels.Right.InterCostalisExternal.IC_Ext_R11R12
    )={DesiredAngle=-45;};
  };


  MuscleGroup ExternalInterCostalis(searchString="*.*") = {

    Muscle_template_Simple_Angle_MultiOffset IC_Ext_R1R2 (
      CREATE_ELEMENTS=IC_MULTIPLIER*(IC_SIZE+1),
      OriginSegment=....Segments.Right.R1Seg,
      ORIGIN_POINTS=....Segments.Right.R1Seg.IC_points.Ext_InfPoints,
      InsertionSegment=....Segments.Right.R2Seg,
      INSERTION_POINTS=....Segments.Right.R2Seg.IC_points.Ext_SupPoints,
      MUSCLE_MODEL_PARAMETERS=....MuscleModels.Right.InterCostalisExternal.IC_Ext_R1R2
    )={DesiredAngle=45;};

    Muscle_template_Simple_Angle_MultiOffset IC_Ext_R2R3 (
      CREATE_ELEMENTS=IC_MULTIPLIER*(IC_SIZE+1),
      OriginSegment=....Segments.Right.R2Seg,
      ORIGIN_POINTS=....Segments.Right.R2Seg.IC_points.Ext_InfPoints,
      InsertionSegment=....Segments.Right.R3Seg,
      INSERTION_POINTS=....Segments.Right.R3Seg.IC_points.Ext_SupPoints,
      MUSCLE_MODEL_PARAMETERS=....MuscleModels.Right.InterCostalisExternal.IC_Ext_R2R3
    )={DesiredAngle=45;};


    Muscle_template_Simple_Angle_MultiOffset IC_Ext_R3R4 (
      CREATE_ELEMENTS=IC_MULTIPLIER*(IC_SIZE+1),
      OriginSegment=....Segments.Right.R3Seg,
      ORIGIN_POINTS=....Segments.Right.R3Seg.IC_points.Ext_InfPoints,
      InsertionSegment=....Segments.Right.R4Seg,
      INSERTION_POINTS=....Segments.Right.R4Seg.IC_points.Ext_SupPoints,
      MUSCLE_MODEL_PARAMETERS=....MuscleModels.Right.InterCostalisExternal.IC_Ext_R3R4
    )={DesiredAngle=45;};

    Muscle_template_Simple_Angle_MultiOffset IC_Ext_R4R5 (
      CREATE_ELEMENTS=IC_MULTIPLIER*(IC_SIZE+1),
      OriginSegment=....Segments.Right.R4Seg,
      ORIGIN_POINTS=....Segments.Right.R4Seg.IC_points.Ext_InfPoints,
      InsertionSegment=....Segments.Right.R5Seg,
      INSERTION_POINTS=....Segments.Right.R5Seg.IC_points.Ext_SupPoints,
      MUSCLE_MODEL_PARAMETERS=....MuscleModels.Right.InterCostalisExternal.IC_Ext_R4R5
    )={DesiredAngle=45;};


    Muscle_template_Simple_Angle_MultiOffset IC_Ext_R5R6 (
      CREATE_ELEMENTS=IC_MULTIPLIER*(IC_SIZE+1),
      OriginSegment=....Segments.Right.R5Seg,
      ORIGIN_POINTS=....Segments.Right.R5Seg.IC_points.Ext_InfPoints,
      InsertionSegment=....Segments.Right.R6Seg,
      INSERTION_POINTS=....Segments.Right.R6Seg.IC_points.Ext_SupPoints,
      MUSCLE_MODEL_PARAMETERS=....MuscleModels.Right.InterCostalisExternal.IC_Ext_R5R6
    )={DesiredAngle=45;};


    Muscle_template_Simple_Angle_MultiOffset IC_Ext_R6R7 (
      CREATE_ELEMENTS=IC_MULTIPLIER*(IC_SIZE+1),
      OriginSegment=....Segments.Right.R6Seg,
      ORIGIN_POINTS=....Segments.Right.R6Seg.IC_points.Ext_InfPoints,
      InsertionSegment=....Segments.Right.R7Seg,
      INSERTION_POINTS=....Segments.Right.R7Seg.IC_points.Ext_SupPoints,
      MUSCLE_MODEL_PARAMETERS=....MuscleModels.Right.InterCostalisExternal.IC_Ext_R6R7
    )={DesiredAngle=45;};

    Muscle_template_Simple_Angle_MultiOffset IC_Ext_R7R8 (
      CREATE_ELEMENTS=IC_MULTIPLIER*(IC_SIZE+1),
      OriginSegment=....Segments.Right.R7Seg,
      ORIGIN_POINTS=....Segments.Right.R7Seg.IC_points.Ext_InfPoints,
      InsertionSegment=....Segments.Right.R8Seg,
      INSERTION_POINTS=....Segments.Right.R8Seg.IC_points.Ext_SupPoints,
      MUSCLE_MODEL_PARAMETERS=....MuscleModels.Right.InterCostalisExternal.IC_Ext_R7R8
    )={DesiredAngle=45;};


    Muscle_template_Simple_Angle_MultiOffset IC_Ext_R8R9 (
      CREATE_ELEMENTS=IC_MULTIPLIER*(IC_SIZE+1),
      OriginSegment=....Segments.Right.R8Seg,
      ORIGIN_POINTS=....Segments.Right.R8Seg.IC_points.Ext_InfPoints,
      InsertionSegment=....Segments.Right.R9Seg,
      INSERTION_POINTS=....Segments.Right.R9Seg.IC_points.Ext_SupPoints,
      MUSCLE_MODEL_PARAMETERS=....MuscleModels.Right.InterCostalisExternal.IC_Ext_R8R9
    )={DesiredAngle=45;};

    Muscle_template_Simple_Angle_MultiOffset IC_Ext_R9R10 (
      CREATE_ELEMENTS=IC_MULTIPLIER*(IC_SIZE+1),
      OriginSegment=....Segments.Right.R9Seg,
      ORIGIN_POINTS=....Segments.Right.R9Seg.IC_points.Ext_InfPoints,
      InsertionSegment=....Segments.Right.R10Seg,
      INSERTION_POINTS=....Segments.Right.R10Seg.IC_points.Ext_SupPoints,
      MUSCLE_MODEL_PARAMETERS=....MuscleModels.Right.InterCostalisExternal.IC_Ext_R9R10
    )={DesiredAngle=45;};


    Muscle_template_Simple_Angle_MultiOffset IC_Ext_R10R11 (
      CREATE_ELEMENTS=IC_MULTIPLIER*(IC_SIZE),
      OriginSegment=....Segments.Right.R10Seg,
      ORIGIN_POINTS=....Segments.Right.R10Seg.IC_points.Ext_InfPoints,
      InsertionSegment=....Segments.Right.R11Seg,
      INSERTION_POINTS=....Segments.Right.R11Seg.IC_points.Ext_SupPoints,
      MUSCLE_MODEL_PARAMETERS=....MuscleModels.Right.InterCostalisExternal.IC_Ext_R10R11
    )={DesiredAngle=45;};


    Muscle_template_Simple_Angle_MultiOffset IC_Ext_R11R12 (
      CREATE_ELEMENTS=IC_MULTIPLIER*(IC_SIZE-4),
      OriginSegment=....Segments.Right.R11Seg,
      ORIGIN_POINTS=....Segments.Right.R11Seg.IC_points.Ext_InfPoints,
      InsertionSegment=....Segments.Right.R12Seg,
      INSERTION_POINTS=....Segments.Right.R12Seg.IC_points.Ext_SupPoints,
      MUSCLE_MODEL_PARAMETERS=....MuscleModels.Right.InterCostalisExternal.IC_Ext_R11R12
    )={DesiredAngle=45;};
  };
#endif

#endif
MuscleGroup LevatorCostarum = {

  AnyMuscleViaPoint LCBrC7R1 = {
    AnyMuscleModel &MusMdl = ....MuscleModels.Right.LevatorCostarum.LCModel_1;
    AnyRefNode &S4 = ....Segments.C7Seg.LCBrC7R1ROrg;
    AnyRefNode &R1 = ....Segments.Right.R1Seg.LCBrC7R1_R_Ins;
    viewMuscle = {#include "../DrawSettings/MusDrawSettings.any"};
    viewForce.Visible ??= Off;
  };

  AnyMuscleViaPoint LCBrT1R2 = {
    AnyMuscleModel &MusMdl = ....MuscleModels.Right.LevatorCostarum.LCModel_2;
    AnyRefNode &S4 = ....Segments.T1Seg.LCBrT1R2ROrg;
    AnyRefNode &R1 = ....Segments.Right.R2Seg.LCBrT1R2_R_Ins;
    viewMuscle = {#include "../DrawSettings/MusDrawSettings.any"};
    viewForce.Visible ??= Off;
  };

  AnyMuscleViaPoint LCBrT2R3 = {
    AnyMuscleModel &MusMdl = ....MuscleModels.Right.LevatorCostarum.LCModel_3;
    AnyRefNode &S4 = ....Segments.T2Seg.LCBrT2R3ROrg;
    AnyRefNode &R1 = ....Segments.Right.R3Seg.LCBrT2R3_R_Ins;
    viewMuscle = {#include "../DrawSettings/MusDrawSettings.any"};
    viewForce.Visible ??= Off;
  };

  AnyMuscleViaPoint LCBrT3R4 = {
    AnyMuscleModel &MusMdl = ....MuscleModels.Right.LevatorCostarum.LCModel_4;
    AnyRefNode &S4 = ....Segments.T3Seg.LCBrT3R4ROrg;
    AnyRefNode &R1 = ....Segments.Right.R4Seg.LCBrT3R4_R_Ins;
    viewMuscle = {#include "../DrawSettings/MusDrawSettings.any"};
    viewForce.Visible ??= Off;
  };

  AnyMuscleViaPoint LCBrT4R5 = {
    AnyMuscleModel &MusMdl = ....MuscleModels.Right.LevatorCostarum.LCModel_5;
    AnyRefNode &S4 = ....Segments.T4Seg.LCBrT4R5ROrg;
    AnyRefNode &R1 = ....Segments.Right.R5Seg.LCBrT4R5_R_Ins;
    viewMuscle = {#include "../DrawSettings/MusDrawSettings.any"};
    viewForce.Visible ??= Off;
  };

  AnyMuscleViaPoint LCBrT5R6 = {
    AnyMuscleModel &MusMdl = ....MuscleModels.Right.LevatorCostarum.LCModel_6;
    AnyRefNode &S4 = ....Segments.T5Seg.LCBrT5R6ROrg;
    AnyRefNode &R1 = ....Segments.Right.R6Seg.LCBrT5R6_R_Ins;
    viewMuscle = {#include "../DrawSettings/MusDrawSettings.any"};
    viewForce.Visible ??= Off;
  };

  AnyMuscleViaPoint LCBrT6R7 = {
    AnyMuscleModel &MusMdl = ....MuscleModels.Right.LevatorCostarum.LCModel_7;
    AnyRefNode &S4 = ....Segments.T6Seg.LCBrT6R7ROrg;
    AnyRefNode &R1 = ....Segments.Right.R7Seg.LCBrT6R7_R_Ins;
    viewMuscle = {#include "../DrawSettings/MusDrawSettings.any"};
    viewForce.Visible ??= Off;
  };

  AnyMuscleViaPoint LCBrT7R8 = {
    AnyMuscleModel &MusMdl = ....MuscleModels.Right.LevatorCostarum.LCModel_8;
    AnyRefNode &S4 = ....Segments.T7Seg.LCBrT7R8ROrg;
    AnyRefNode &R1 = ....Segments.Right.R8Seg.LCBrT7R8_R_Ins;
    viewMuscle = {#include "../DrawSettings/MusDrawSettings.any"};
    viewForce.Visible ??= Off;
  };

  AnyMuscleViaPoint LCBrT8R9 = {
    AnyMuscleModel &MusMdl = ....MuscleModels.Right.LevatorCostarum.LCModel_9;
    AnyRefNode &S4 = ....Segments.T8Seg.LCBrT8R9ROrg;
    AnyRefNode &R1 = ....Segments.Right.R9Seg.LCBrT8R9_R_Ins;
    viewMuscle = {#include "../DrawSettings/MusDrawSettings.any"};
    viewForce.Visible ??= Off;
  };

  AnyMuscleViaPoint LCBrT9R10 = {
    AnyMuscleModel &MusMdl = ....MuscleModels.Right.LevatorCostarum.LCModel_10;
    AnyRefNode &S4 = ....Segments.T9Seg.LCBrT9R10ROrg;
    AnyRefNode &R1 = ....Segments.Right.R10Seg.LCBrT9R10_R_Ins;
    viewMuscle = {#include "../DrawSettings/MusDrawSettings.any"};
    viewForce.Visible ??= Off;
  };

  AnyMuscleViaPoint LCBrT10R11 = {
    AnyMuscleModel &MusMdl = ....MuscleModels.Right.LevatorCostarum.LCModel_11;
    AnyRefNode &S4 = ....Segments.T10Seg.LCBrT10R11ROrg;
    AnyRefNode &R1 = ....Segments.Right.R11Seg.LCBrT10R11_R_Ins;
    viewMuscle = {#include "../DrawSettings/MusDrawSettings.any"};
    viewForce.Visible ??= Off;
  };

  AnyMuscleViaPoint LCBrT11R12 = {
    AnyMuscleModel &MusMdl = ....MuscleModels.Right.LevatorCostarum.LCModel_12;
    AnyRefNode &S4 = ....Segments.T11Seg.LCBrT11R12ROrg;
    AnyRefNode &R1 = ....Segments.Right.R12Seg.LCBrT11R12_R_Ins;
    viewMuscle = {#include "../DrawSettings/MusDrawSettings.any"};
    viewForce.Visible ??= Off;
  };

  // LONGUS
  AnyMuscleViaPoint LCLgT5R7 = {
    AnyMuscleModel &MusMdl = ....MuscleModels.Right.LevatorCostarum.LCModel_13;
    AnyRefNode &S4 = ....Segments.T5Seg.LCLgT5R7ROrg;
    AnyRefNode &R1 = ....Segments.Right.R7Seg.LCLgT5R7_R_Ins;
    viewMuscle = {#include "../DrawSettings/MusDrawSettings.any"};
    viewForce.Visible ??= Off;
  };

  AnyMuscleViaPoint LCLgT6R8 = {
    AnyMuscleModel &MusMdl = ....MuscleModels.Right.LevatorCostarum.LCModel_14;
    AnyRefNode &S4 = ....Segments.T6Seg.LCLgT6R8ROrg;
    AnyRefNode &R1 = ....Segments.Right.R8Seg.LCLgT6R8_R_Ins;
    viewMuscle = {#include "../DrawSettings/MusDrawSettings.any"};
    viewForce.Visible ??= Off;
  };

  AnyMuscleViaPoint LCLgT7R9 = {
    AnyMuscleModel &MusMdl = ....MuscleModels.Right.LevatorCostarum.LCModel_15;
    AnyRefNode &S4 = ....Segments.T7Seg.LCLgT7R9ROrg;
    AnyRefNode &R1 = ....Segments.Right.R9Seg.LCLgT7R9_R_Ins;
    viewMuscle = {#include "../DrawSettings/MusDrawSettings.any"};
    viewForce.Visible ??= Off;
  };

  AnyMuscleViaPoint LCLgT8R10 = {
    AnyMuscleModel &MusMdl = ....MuscleModels.Right.LevatorCostarum.LCModel_16;
    AnyRefNode &S4 = ....Segments.T8Seg.LCLgT8R10ROrg;
    AnyRefNode &R1 = ....Segments.Right.R10Seg.LCLgT8R10_R_Ins;
    viewMuscle = {#include "../DrawSettings/MusDrawSettings.any"};
    viewForce.Visible ??= Off;
  };

  AnyMuscleViaPoint LCLgT9R11 = {
    AnyMuscleModel &MusMdl = ....MuscleModels.Right.LevatorCostarum.LCModel_17;
    AnyRefNode &S4 = ....Segments.T9Seg.LCLgT9R11ROrg;
    AnyRefNode &R1 = ....Segments.Right.R11Seg.LCLgT9R11_R_Ins;
    viewMuscle = {#include "../DrawSettings/MusDrawSettings.any"};
    viewForce.Visible ??= Off;
  };

  AnyMuscleViaPoint LCLgT10R12 = {
    AnyMuscleModel &MusMdl = ....MuscleModels.Right.LevatorCostarum.LCModel_18;
    AnyRefNode &S4 = ....Segments.T10Seg.LCLgT10R12ROrg;
    AnyRefNode &R1 = ....Segments.Right.R12Seg.LCLgT10R12_R_Ins;
    viewMuscle = {#include "../DrawSettings/MusDrawSettings.any"};
    viewForce.Visible ??= Off;
  };

};

MuscleGroup LongissimusCapitis = {
  AnyMuscleViaPoint LongissimusCapitisC3C0 = {
    AnyMuscleModel &MusMdl = ....MuscleModels.Right.LongissimusCapitis.LongissimusCapitisC3C0;
    AnyRefNode &Org = ....Segments.C3Seg.LongissimusCapitisC3C0NodeR;
    AnyRefNode &Ins = ....Segments.SkullSeg.LongissimusCapitisNodeR;
    viewMuscle = {#include "../DrawSettings/MusDrawSettings.any"};
    viewForce.Visible ??= Off;
  };
  AnyMuscleViaPoint LongissimusCapitisC4C0 = {
    AnyMuscleModel &MusMdl = ....MuscleModels.Right.LongissimusCapitis.LongissimusCapitisC4C0;
    AnyRefNode &Org = ....Segments.C4Seg.LongissimusCapitisC4C0NodeR;
    AnyRefNode &Ins = ....Segments.SkullSeg.LongissimusCapitisNodeR;
    viewMuscle = {#include "../DrawSettings/MusDrawSettings.any"};
    viewForce.Visible ??= Off;
  };
  AnyMuscleViaPoint LongissimusCapitisC5C0 = {
    AnyMuscleModel &MusMdl = ....MuscleModels.Right.LongissimusCapitis.LongissimusCapitisC5C0;
    AnyRefNode &Org = ....Segments.C5Seg.LongissimusCapitisC5C0NodeR;
    AnyRefNode &Ins = ....Segments.SkullSeg.LongissimusCapitisNodeR;
    viewMuscle = {#include "../DrawSettings/MusDrawSettings.any"};
    viewForce.Visible ??= Off;
  };
  AnyMuscleViaPoint LongissimusCapitisC6C0 = {
    AnyMuscleModel &MusMdl = ....MuscleModels.Right.LongissimusCapitis.LongissimusCapitisC6C0;
    AnyRefNode &Org = ....Segments.C6Seg.LongissimusCapitisC6C0NodeR;
    AnyRefNode &Ins = ....Segments.SkullSeg.LongissimusCapitisNodeR;
    viewMuscle = {#include "../DrawSettings/MusDrawSettings.any"};
    viewForce.Visible ??= Off;
  };
  AnyMuscleViaPoint LongissimusCapitisC7C0 = {
    AnyMuscleModel &MusMdl = ....MuscleModels.Right.LongissimusCapitis.LongissimusCapitisC7C0;
    AnyRefNode &Org = ....Segments.C7Seg.LongissimusCapitisC7C0NodeR;
    AnyRefNode &Ins = ....Segments.SkullSeg.LongissimusCapitisNodeR;
    viewMuscle = {#include "../DrawSettings/MusDrawSettings.any"};
    viewForce.Visible ??= Off;
  };
  AnyMuscleViaPoint LongissimusCapitisT1C0 = {
    AnyMuscleModel &MusMdl = ....MuscleModels.Right.LongissimusCapitis.LongissimusCapitisT1C0;
    AnyRefNode &Org = ....Segments.T1Seg.Right.LongissimusCapitisT1C0Node;
    AnyRefNode &Ins = ....Segments.SkullSeg.LongissimusCapitisNodeR;
    viewMuscle = {#include "../DrawSettings/MusDrawSettings.any"};
    viewForce.Visible ??= Off;
  };
  AnyMuscleViaPoint LongissimusCapitisT2C0 = {
    AnyMuscleModel &MusMdl = ....MuscleModels.Right.LongissimusCapitis.LongissimusCapitisT2C0;
    AnyRefNode &Org = ....Segments.T2Seg.Right.LongissimusCapitisT2C0Node;
    AnyRefNode &Ins = ....Segments.SkullSeg.LongissimusCapitisNodeR;
    viewMuscle = {#include "../DrawSettings/MusDrawSettings.any"};
    viewForce.Visible ??= Off;
  };
  AnyMuscleViaPoint LongissimusCapitisT3C0 = {
    AnyMuscleModel &MusMdl = ....MuscleModels.Right.LongissimusCapitis.LongissimusCapitisT3C0;
    AnyRefNode &Org = ....Segments.T3Seg.Right.LongissimusCapitisT3C0Node;
    AnyRefNode &Ins = ....Segments.SkullSeg.LongissimusCapitisNodeR;
    viewMuscle = {#include "../DrawSettings/MusDrawSettings.any"};
    viewForce.Visible ??= Off;
  };
  AnyMuscleViaPoint LongissimusCapitisT4C0 = {
    AnyMuscleModel &MusMdl = ....MuscleModels.Right.LongissimusCapitis.LongissimusCapitisT4C0;
    AnyRefNode &Org = ....Segments.T4Seg.Right.LongissimusCapitisT4C0Node;
    AnyRefNode &Ins = ....Segments.SkullSeg.LongissimusCapitisNodeR;
    viewMuscle = {#include "../DrawSettings/MusDrawSettings.any"};
    viewForce.Visible ??= Off;
  };
  AnyMuscleViaPoint LongissimusCapitisT5C0 = {
    AnyMuscleModel &MusMdl = ....MuscleModels.Right.LongissimusCapitis.LongissimusCapitisT5C0;
    AnyRefNode &Org = ....Segments.T5Seg.Right.LongissimusCapitisT5C0Node;
    AnyRefNode &Ins = ....Segments.SkullSeg.LongissimusCapitisNodeR;
    viewMuscle = {#include "../DrawSettings/MusDrawSettings.any"};
    viewForce.Visible ??= Off;
  };
};

MuscleGroup LongissimusCervicis = {
  AnyMuscleViaPoint LongissimusCervicisT1C2 = {
    AnyMuscleModel &MusMdl = ....MuscleModels.Right.LongissimusCervicis.LongissimusCervicisT1C2;
    AnyRefNode &Org = ....Segments.T1Seg.Right.LongissimusCervicisT1Node;
    AnyRefNode &Ins = ....Segments.C2Seg.Right.LongissimusCervicisT1C2Node;
    viewMuscle = {#include "../DrawSettings/MusDrawSettings.any"};
    viewForce.Visible ??= Off;
  };

  AnyMuscleViaPoint LongissimusCervicisT2C3 = {
    AnyMuscleModel &MusMdl = ....MuscleModels.Right.LongissimusCervicis.LongissimusCervicisT2C3;
    AnyRefNode &Org = ....Segments.T2Seg.Right.LongissimusCervicisT2Node;
    AnyRefNode &Ins = ....Segments.C3Seg.Right.LongissimusCervicisT2C3Node;
    viewMuscle = {#include "../DrawSettings/MusDrawSettings.any"};
    viewForce.Visible ??= Off;
  };

  AnyMuscleViaPoint LongissimusCervicisT3C4 = {
    AnyMuscleModel &MusMdl = ....MuscleModels.Right.LongissimusCervicis.LongissimusCervicisT3C4;
    AnyRefNode &Org = ....Segments.T3Seg.Right.LongissimusCervicisT3Node;
    AnyRefNode &Ins = ....Segments.C4Seg.Right.LongissimusCervicisT3C4Node;
    viewMuscle = {#include "../DrawSettings/MusDrawSettings.any"};
    viewForce.Visible ??= Off;
  };

  AnyMuscleViaPoint LongissimusCervicisT4C5 = {
    AnyMuscleModel &MusMdl = ....MuscleModels.Right.LongissimusCervicis.LongissimusCervicisT4C5;
    AnyRefNode &Org = ....Segments.T4Seg.Right.LongissimusCervicisT4Node;
    AnyRefNode &Ins = ....Segments.C5Seg.Right.LongissimusCervicisT4C5Node;
    viewMuscle = {#include "../DrawSettings/MusDrawSettings.any"};
    viewForce.Visible ??= Off;
  };

  AnyMuscleViaPoint LongissimusCervicisT5C6 = {
    AnyMuscleModel &MusMdl = ....MuscleModels.Right.LongissimusCervicis.LongissimusCervicisT5C6;
    AnyRefNode &Org = ....Segments.T5Seg.Right.LongissimusCervicisT5Node;
    AnyRefNode &Ins = ....Segments.C6Seg.Right.LongissimusCervicisT5C6Node;
    viewMuscle = {#include "../DrawSettings/MusDrawSettings.any"};
    viewForce.Visible ??= Off;
  };
};

MuscleGroup LongusCapitis = {
  AnyMuscleViaPoint LongusCapitisC6C0 = {
    AnyMuscleModel &MusMdl = ....MuscleModels.Right.LongusCapitis.LongusCapitisC6C0;
    AnyRefNode &Org = ....Segments.C6Seg.LongusCapitisC6C0NodeR;
    AnyRefNode &Ins = ....Segments.SkullSeg.LongusCapitisC0NodeR;
    viewMuscle = {#include "../DrawSettings/MusDrawSettings.any"};
    viewForce.Visible ??= Off;
  };

  AnyMuscleViaPoint LongusCapitisC5C0 = {
    AnyMuscleModel &MusMdl = ....MuscleModels.Right.LongusCapitis.LongusCapitisC5C0;
    AnyRefNode &Org = ....Segments.C5Seg.LongusCapitisC5C0NodeR;
    AnyRefNode &Ins = ....Segments.SkullSeg.LongusCapitisC0NodeR;
    viewMuscle = {#include "../DrawSettings/MusDrawSettings.any"};
    viewForce.Visible ??= Off;
  };

  AnyMuscleViaPoint LongusCapitisC4C0 = {
    AnyMuscleModel &MusMdl = ....MuscleModels.Right.LongusCapitis.LongusCapitisC4C0;
    AnyRefNode &Org = ....Segments.C4Seg.LongusCapitisC4C0NodeR;
    AnyRefNode &Ins = ....Segments.SkullSeg.LongusCapitisC0NodeR;
    viewMuscle = {#include "../DrawSettings/MusDrawSettings.any"};
    viewForce.Visible ??= Off;
  };

  AnyMuscleViaPoint LongusCapitisC3C0 = {
    AnyMuscleModel &MusMdl = ....MuscleModels.Right.LongusCapitis.LongusCapitisC3C0;
    AnyRefNode &Org = ....Segments.C3Seg.LongusCapitisC3C0NodeR;
    AnyRefNode &Ins = ....Segments.SkullSeg.LongusCapitisC0NodeR;
    viewMuscle = {#include "../DrawSettings/MusDrawSettings.any"};
    viewForce.Visible ??= Off;
  };
};

MuscleGroup LongusColli = {
  AnyMuscleViaPoint LongusColliT3C6 = {
    AnyMuscleModel &MusMdl = ....MuscleModels.Right.LongusColli.LongusColliT3C6;
    AnyRefNode &Org = ....Segments.T3Seg.Right.LongusColliT3C6Node;
    AnyRefNode &Via1 = ....Segments.T2Seg.Right.LongusColliT3C6Node;
    AnyRefNode &Via2 = ....Segments.T1Seg.Right.LongusColliT3C6Node;
    AnyRefNode &Via3 = ....Segments.C7Seg.Right.LongusColliT3C6Node;
    AnyRefNode &Ins = ....Segments.C6Seg.Right.LongusColliT3C6Node;
    viewMuscle = {#include "../DrawSettings/MusDrawSettings.any"};
    viewForce.Visible ??= Off;
  };
  AnyMuscleViaPoint LongusColliT2C5 = {
    AnyMuscleModel &MusMdl = ....MuscleModels.Right.LongusColli.LongusColliT2C5;
    AnyRefNode &Org = ....Segments.T2Seg.Right.LongusColliT2C5Node;
    AnyRefNode &Via1 = ....Segments.T1Seg.Right.LongusColliT2C5Node;
    AnyRefNode &Via2 = ....Segments.C7Seg.Right.LongusColliT2C5Node;
    AnyRefNode &Via3 = ....Segments.C6Seg.Right.LongusColliT2C5Node;
    AnyRefNode &Ins = ....Segments.C5Seg.Right.LongusColliT2C5Node;
    viewMuscle = {#include "../DrawSettings/MusDrawSettings.any"};
    viewForce.Visible ??= Off;
  };
  AnyMuscleViaPoint LongusColliT1C4 = {
    AnyMuscleModel &MusMdl = ....MuscleModels.Right.LongusColli.LongusColliT1C4;
    AnyRefNode &Org = ....Segments.T1Seg.Right.LongusColliT1C4Node;
    AnyRefNode &Via1 = ....Segments.C7Seg.Right.LongusColliT1C4Node;
    AnyRefNode &Via2 = ....Segments.C6Seg.Right.LongusColliT1C4Node;
    AnyRefNode &Via3 = ....Segments.C5Seg.Right.LongusColliT1C4Node;
    AnyRefNode &Ins = ....Segments.C4Seg.Right.LongusColliT1C4Node;
    viewMuscle = {#include "../DrawSettings/MusDrawSettings.any"};
    viewForce.Visible ??= Off;
  };
  AnyMuscleViaPoint LongusColliC7C3 = {
    AnyMuscleModel &MusMdl = ....MuscleModels.Right.LongusColli.LongusColliC7C3;
    AnyRefNode &Org = ....Segments.C7Seg.Right.LongusColliC7C3Node;
    AnyRefNode &Via1 = ....Segments.C6Seg.Right.LongusColliC7C3Node;
    AnyRefNode &Via2 = ....Segments.C5Seg.Right.LongusColliC7C3Node;
    AnyRefNode &Via3 = ....Segments.C4Seg.Right.LongusColliC7C3Node;
    AnyRefNode &Ins = ....Segments.C3Seg.Right.LongusColliC7C3Node;
    viewMuscle = {#include "../DrawSettings/MusDrawSettings.any"};
    viewForce.Visible ??= Off;
  };
  AnyMuscleViaPoint LongusColliC6C2 = {
    AnyMuscleModel &MusMdl = ....MuscleModels.Right.LongusColli.LongusColliC6C2;
    AnyRefNode &Org = ....Segments.C6Seg.Right.LongusColliC6C2Node;
    AnyRefNode &Via1 = ....Segments.C5Seg.Right.LongusColliC6C2Node;
    AnyRefNode &Via2 = ....Segments.C4Seg.Right.LongusColliC6C2Node;
    AnyRefNode &Via3 = ....Segments.C3Seg.Right.LongusColliC6C2Node;
    AnyRefNode &Ins = ....Segments.C2Seg.Right.LongusColliC6C2Node;
    viewMuscle = {#include "../DrawSettings/MusDrawSettings.any"};
    viewForce.Visible ??= Off;
  };
  AnyMuscleViaPoint LongusColliC5C1 = {
    AnyMuscleModel &MusMdl = ....MuscleModels.Right.LongusColli.LongusColliC5C1;
    AnyRefNode &Org = ....Segments.C5Seg.Right.LongusColliC5C1Node;
    AnyRefNode &Via1 = ....Segments.C4Seg.Right.LongusColliC5C1Node;
    AnyRefNode &Via2 = ....Segments.C3Seg.Right.LongusColliC5C1Node;
    AnyRefNode &Via3 = ....Segments.C2Seg.Right.LongusColliC5C1Node;
    AnyRefNode &Ins = ....Segments.C1Seg.Right.LongusColliC5C1Node;
    viewMuscle = {#include "../DrawSettings/MusDrawSettings.any"};
    viewForce.Visible ??= Off;
  };
};

MuscleGroup Multifidi = {
  AnyMuscleViaPoint MFdL1L3 = {
    AnyMuscleModel &MusMdl = ....MuscleModels.Right.Multifidi.MFdL1L3;
    AnyRefNode &Org = ....Segments.L1Seg.MFdL1L3NodeR;
    AnyRefNode &Ins = ....Segments.L3Seg.MFdL1L3NodeR;
    viewMuscle = {#include "../DrawSettings/MusDrawSettings.any"};
    viewForce.Visible ??= Off;
  };

  AnyMuscleViaPoint MFdL2L4 = {
    AnyMuscleModel &MusMdl = ....MuscleModels.Right.Multifidi.MFdL2L4;
    AnyRefNode &Org = ....Segments.L2Seg.MFdL2L4NodeR;
    AnyRefNode &Ins = ....Segments.L4Seg.MFdL2L4NodeR;
    viewMuscle = {#include "../DrawSettings/MusDrawSettings.any"};
    viewForce.Visible ??= Off;
  };

  AnyMuscleViaPoint MFdL3L5 = {
    AnyMuscleModel &MusMdl = ....MuscleModels.Right.Multifidi.MFdL3L5;
    AnyRefNode &Org = ....Segments.L3Seg.MFdL3L5NodeR;
    AnyRefNode &Ins = ....Segments.L5Seg.MFdL3L5NodeR;
    viewMuscle = {#include "../DrawSettings/MusDrawSettings.any"};
    viewForce.Visible ??= Off;
  };

  AnyMuscleViaPoint MFdL4S1 = {
    AnyMuscleModel &MusMdl = ....MuscleModels.Right.Multifidi.MFdL4S1;
    AnyRefNode &Org = ....Segments.L4Seg.MFdL4S1NodeR;
    AnyRefNode &Ins = ....Segments.SacrumSeg.MFdL4S1NodeR;
    viewMuscle = {#include "../DrawSettings/MusDrawSettings.any"};
    viewForce.Visible ??= Off;
  };

  AnyMuscleViaPoint MFdL5S1 = {
    AnyMuscleModel &MusMdl = ....MuscleModels.Right.Multifidi.MFdL5S1;
    AnyRefNode &Org = ....Segments.L5Seg.MFdL5S1NodeR;
    AnyRefNode &Ins = ....Segments.SacrumSeg.MFdL5S1NodeR;
    viewMuscle = {#include "../DrawSettings/MusDrawSettings.any"};
    viewForce.Visible ??= Off;
  };

  AnyMuscleViaPoint MFmL1L4 = {
    AnyMuscleModel &MusMdl = ....MuscleModels.Right.Multifidi.MFmL1L4;
    AnyRefNode &Org = ....Segments.L1Seg.MFmL1L4NodeR;
    AnyRefNode &Ins = ....Segments.L4Seg.MFmL1L4NodeR;
    viewMuscle = {#include "../DrawSettings/MusDrawSettings.any"};
    viewForce.Visible ??= Off;
  };

  AnyMuscleViaPoint MFmL2L5 = {
    AnyMuscleModel &MusMdl = ....MuscleModels.Right.Multifidi.MFmL2L5;
    AnyRefNode &Org = ....Segments.L2Seg.MFmL2L5NodeR;
    AnyRefNode &Ins = ....Segments.L5Seg.MFmL2L5NodeR;
    viewMuscle = {#include "../DrawSettings/MusDrawSettings.any"};
    viewForce.Visible ??= Off;
  };

  AnyMuscleViaPoint MFmL3S1 = {
    AnyMuscleModel &MusMdl = ....MuscleModels.Right.Multifidi.MFmL3S1;
    AnyRefNode &Org = ....Segments.L3Seg.MFmL3S1NodeR;
    AnyRefNode &Ins = ....Segments.SacrumSeg.MFmL3S1NodeR;
    viewMuscle = {#include "../DrawSettings/MusDrawSettings.any"};
    viewForce.Visible ??= Off;
  };

  AnyMuscleViaPoint MFmL4Sacrum = {
    AnyMuscleModel &MusMdl = ....MuscleModels.Right.Multifidi.MFmL4Sacrum;
    AnyRefNode &Org = ....Segments.L4Seg.MFmL4SacrumNodeR;
    AnyRefNode &Ins = ....Segments.SacrumSeg.MFmL4SacrumNodeR;
    viewMuscle = {#include "../DrawSettings/MusDrawSettings.any"};
    viewForce.Visible ??= Off;
  };

  AnyMuscleViaPoint MFmL5Sacrum = {
    AnyMuscleModel &MusMdl = ....MuscleModels.Right.Multifidi.MFmL5Sacrum;
    AnyRefNode &Org = ....Segments.L5Seg.MFmL5SacrumNodeR;
    AnyRefNode &Ins = ....Segments.SacrumSeg.MFmL5SacrumNodeR;
    viewMuscle = {#include "../DrawSettings/MusDrawSettings.any"};
    viewForce.Visible ??= Off;
  };

  AnyMuscleViaPoint MFtsL1L5 = {
    AnyMuscleModel &MusMdl = ....MuscleModels.Right.Multifidi.MFtsL1L5;
    AnyRefNode &Org = ....Segments.L1Seg.MFtsL1L5NodeR;
    AnyRefNode &Ins = ....Segments.L5Seg.MFtsL1L5NodeR;
    viewMuscle = {#include "../DrawSettings/MusDrawSettings.any"};
    viewForce.Visible ??= Off;
  };

  AnyMuscleViaPoint MFtsL1S1 = {
    AnyMuscleModel &MusMdl = ....MuscleModels.Right.Multifidi.MFtsL1S1;
    AnyRefNode &Org = ....Segments.L1Seg.MFtsL1S1NodeR;
    AnyRefNode &Ins = ....Segments.SacrumSeg.MFtsL1S1NodeR;
    viewMuscle = {#include "../DrawSettings/MusDrawSettings.any"};
    viewForce.Visible ??= Off;
  };

  AnyMuscleViaPoint MFtsL2L5 = {
    AnyMuscleModel &MusMdl = ....MuscleModels.Right.Multifidi.MFtsL2L5;
    AnyRefNode &Org = ....Segments.L2Seg.MFtsL2L5NodeR;
    AnyRefNode &Ins = ....Segments.L5Seg.MFtsL2L5NodeR;
    viewMuscle = {#include "../DrawSettings/MusDrawSettings.any"};
    viewForce.Visible ??= Off;
  };

  AnyMuscleViaPoint MFtsL2S1 = {
    AnyMuscleModel &MusMdl = ....MuscleModels.Right.Multifidi.MFtsL2S1;
    AnyRefNode &Org = ....Segments.L2Seg.MFtsL2S1NodeR;
    AnyRefNode &Ins = ....Segments.SacrumSeg.MFtsL2S1NodeR;
    viewMuscle = {#include "../DrawSettings/MusDrawSettings.any"};
    viewForce.Visible ??= Off;
  };

  AnyMuscleViaPoint MFtsL3Ligament = {
    AnyMuscleModel &MusMdl = ....MuscleModels.Right.Multifidi.MFtsL3Ligament;
    AnyRefNode &Org = ....Segments.L3Seg.MFtsL3LigamentNodeR;
    AnyRefNode &Via = ....Segments.SacrumSeg.MFtsL3LigamentNodeViaR;
    AnyRefNode &Ins = ....Segments.SacrumSeg.MFtsL3LigamentNodeR;
    viewMuscle = {#include "../DrawSettings/MusDrawSettings.any"};
    viewForce.Visible ??= Off;
  };

  AnyMuscleViaPoint MFtsL4Sacrum = {
    AnyMuscleModel &MusMdl = ....MuscleModels.Right.Multifidi.MFtsL4Sacrum;
    AnyRefNode &Org = ....Segments.L4Seg.MFtsL4SacrumNodeR;
    AnyRefNode &Via = ....Segments.SacrumSeg.MFtsL4SacrumViaNodeR;
    AnyRefNode &Ins = ....Segments.SacrumSeg.MFtsL4SacrumNodeR;
    viewMuscle = {#include "../DrawSettings/MusDrawSettings.any"};
    viewForce.Visible ??= Off;
  };

  AnyMuscleViaPoint MFtsL5Sacrum = {
    AnyMuscleModel &MusMdl = ....MuscleModels.Right.Multifidi.MFtsL5Sacrum;
    AnyRefNode &Org = ....Segments.L5Seg.MFtsL5SacrumNodeR;
    AnyRefNode &Via = ....Segments.SacrumSeg.MFtsL5SacrumViaNodeR;
    AnyRefNode &Ins = ....Segments.SacrumSeg.MFtsL5SacrumNodeR;
    viewMuscle = {#include "../DrawSettings/MusDrawSettings.any"};
    viewForce.Visible ??= Off;
  };

  AnyMuscleViaPoint MFtstL1SIPS = {
    AnyMuscleModel &MusMdl = ....MuscleModels.Right.Multifidi.MFtstL1SIPS;
    AnyRefNode &Org = ....Segments.L1Seg.MFtstL1SIPSNodeR;
    AnyRefNode &Via = ....Segments.PelvisSeg.MFtstL1SIPSViaNodeR;
    AnyRefNode &Ins = ....Segments.PelvisSeg.MFtstL1SIPSNodeR;
    viewMuscle = {#include "../DrawSettings/MusDrawSettings.any"};
    viewForce.Visible ??= Off;
  };

  AnyMuscleViaPoint MFtstL2SIPS = {
    AnyMuscleModel &MusMdl = ....MuscleModels.Right.Multifidi.MFtstL2SIPS;
    AnyRefNode &Org = ....Segments.L2Seg.MFtstL2SIPSNodeR;
    AnyRefNode &Via = ....Segments.PelvisSeg.MFtstL2SIPSViaNodeR;
    AnyRefNode &Ins = ....Segments.PelvisSeg.MFtstL2SIPSNodeR;
    viewMuscle = {#include "../DrawSettings/MusDrawSettings.any"};
    viewForce.Visible ??= Off;
  };
};

MuscleGroup MultifidusCervicis = {
  AnyMuscleViaPoint MultifidusCervicisC5C2 = {
    AnyMuscleModel &MusMdl = ....MuscleModels.Right.MultifidusCervicis.MultifidusCervicisC5C2;
    AnyRefNode &Org = ....Segments.C5Seg.MultifidusCervicisC5C2NodeR;
    AnyRefNode &Ins = ....Segments.C2Seg.MultifidusCervicisC2NodeR;
    viewMuscle = {#include "../DrawSettings/MusDrawSettings.any"};
    viewForce.Visible ??= Off;
  };

  AnyMuscleViaPoint MultifidusCervicisC6C2 = {
    AnyMuscleModel &MusMdl = ....MuscleModels.Right.MultifidusCervicis.MultifidusCervicisC6C2;
    AnyRefNode &Org = ....Segments.C6Seg.MultifidusCervicisC6C2NodeR;
    AnyRefNode &Ins = ....Segments.C2Seg.MultifidusCervicisC2NodeR;
    viewMuscle = {#include "../DrawSettings/MusDrawSettings.any"};
    viewForce.Visible ??= Off;
  };

  AnyMuscleViaPoint MultifidusCervicisC6C3 = {
    AnyMuscleModel &MusMdl = ....MuscleModels.Right.MultifidusCervicis.MultifidusCervicisC6C3;
    AnyRefNode &Org = ....Segments.C6Seg.MultifidusCervicisC6C2NodeR;
    AnyRefNode &Ins = ....Segments.C3Seg.MultifidusCervicisC3NodeR;
    viewMuscle = {#include "../DrawSettings/MusDrawSettings.any"};
    viewForce.Visible ??= Off;
  };

  AnyMuscleViaPoint MultifidusCervicisC7C3 = {
    AnyMuscleModel &MusMdl = ....MuscleModels.Right.MultifidusCervicis.MultifidusCervicisC7C3;
    AnyRefNode &Org = ....Segments.C7Seg.MultifidusCervicisC7C3NodeR;
    AnyRefNode &Ins = ....Segments.C3Seg.MultifidusCervicisC3NodeR;
    viewMuscle = {#include "../DrawSettings/MusDrawSettings.any"};
    viewForce.Visible ??= Off;
  };

  AnyMuscleViaPoint MultifidusCervicisC7C4 = {
    AnyMuscleModel &MusMdl = ....MuscleModels.Right.MultifidusCervicis.MultifidusCervicisC7C4;
    AnyRefNode &Org = ....Segments.C7Seg.MultifidusCervicisC7C4NodeR;
    AnyRefNode &Ins = ....Segments.C4Seg.MultifidusCervicisC4NodeR;
    viewMuscle = {#include "../DrawSettings/MusDrawSettings.any"};
    viewForce.Visible ??= Off;
  };

  AnyMuscleViaPoint MultifidusCervicisT1C4 = {
    AnyMuscleModel &MusMdl = ....MuscleModels.Right.MultifidusCervicis.MultifidusCervicisT1C4;
    AnyRefNode &Org = ....Segments.T1Seg.MultifidusCervicisT1C4NodeR;
    AnyRefNode &Ins = ....Segments.C4Seg.MultifidusCervicisC4NodeR;
    viewMuscle = {#include "../DrawSettings/MusDrawSettings.any"};
    viewForce.Visible ??= Off;
  };

  AnyMuscleViaPoint MultifidusCervicisT1C5 = {
    AnyMuscleModel &MusMdl = ....MuscleModels.Right.MultifidusCervicis.MultifidusCervicisT1C5;
    AnyRefNode &Org = ....Segments.T1Seg.MultifidusCervicisT1C5NodeR;
    AnyRefNode &Ins = ....Segments.C5Seg.MultifidusCervicisC5NodeR;
    viewMuscle = {#include "../DrawSettings/MusDrawSettings.any"};
    viewForce.Visible ??= Off;
  };

  AnyMuscleViaPoint MultifidusCervicisT2C5 = {
    AnyMuscleModel &MusMdl = ....MuscleModels.Right.MultifidusCervicis.MultifidusCervicisT2C5;
    AnyRefNode &Org = ....Segments.T2Seg.MultifidusCervicisT2C5NodeR;
    AnyRefNode &Ins = ....Segments.C5Seg.MultifidusCervicisC5NodeR;
    viewMuscle = {#include "../DrawSettings/MusDrawSettings.any"};
    viewForce.Visible ??= Off;
  };

  AnyMuscleViaPoint MultifidusCervicisT2C6 = {
    AnyMuscleModel &MusMdl = ....MuscleModels.Right.MultifidusCervicis.MultifidusCervicisT2C6;
    AnyRefNode &Org = ....Segments.T2Seg.MultifidusCervicisT2C6NodeR;
    AnyRefNode &Ins = ....Segments.C6Seg.MultifidusCervicisC6NodeR;
    viewMuscle = {#include "../DrawSettings/MusDrawSettings.any"};
    viewForce.Visible ??= Off;
  };

  AnyMuscleViaPoint MultifidusCervicisT3C6 = {
    AnyMuscleModel &MusMdl = ....MuscleModels.Right.MultifidusCervicis.MultifidusCervicisT3C6;
    AnyRefNode &Org = ....Segments.T3Seg.MultifidusCervicisT3C6NodeR;
    AnyRefNode &Ins = ....Segments.C6Seg.MultifidusCervicisC6NodeR;
    viewMuscle = {#include "../DrawSettings/MusDrawSettings.any"};
    viewForce.Visible ??= Off;
  };

  AnyMuscleViaPoint MultifidusCervicisT3C7 = {
    AnyMuscleModel &MusMdl = ....MuscleModels.Right.MultifidusCervicis.MultifidusCervicisT3C7;
    AnyRefNode &Org = ....Segments.T3Seg.MultifidusCervicisT3C7NodeR;
    AnyRefNode &Ins = ....Segments.C7Seg.MultifidusCervicisC7NodeR;
    viewMuscle = {#include "../DrawSettings/MusDrawSettings.any"};
    viewForce.Visible ??= Off;
  };

  AnyMuscleViaPoint MultifidusCervicisT4C7 = {
    AnyMuscleModel &MusMdl = ....MuscleModels.Right.MultifidusCervicis.MultifidusCervicisT4C7;
    AnyRefNode &Org = ....Segments.T4Seg.MultifidusCervicisT4C7NodeR;
    AnyRefNode &Ins = ....Segments.C7Seg.MultifidusCervicisC7NodeR;
    viewMuscle = {#include "../DrawSettings/MusDrawSettings.any"};
    viewForce.Visible ??= Off;
  };
};

MuscleGroup ObliquusExternus = {

#if BM_TRUNK_CAVITY_MODEL == _CAVITY_MODEL_VOLUME_


#ifdef OBLIQUUS_WRAP_ON_CYLS

AnyMuscleShortestPath OEC_1 = {
  AnyMuscleModel &MusMdl = ....MuscleModels.Right.ObliquusExternus.OEC_1;
  AnyRefNode &Org = ....Segments.Right.R6Seg.ObliquusExternusNode;
  AnyRefNode &Ins = ....Abdominal.Layer_L1.BaseSegAnterior.mid;

  #if BM_TRUNK_THORACIC_STERNUM_TOPOLOGY == 4
  AnyParamSurf &srf1 =....Segments.Right.CostalCartilageSeg.WrappingTorusR10.Surf;
  #else
  AnyParamSurf &srf1 =....Segments.SternalBodySeg.Right.ObliquusWrapping.Surf;
  #endif

  SPLine.StringMesh=60;

  SPLine ={
    AnyMatrix InitWrapPos = {
      transf3D({0,.srf1.MajorRadius+.srf1.MinorRadius, 0}, &.srf1)
    };
    InitWrapPosVecArr = {&InitWrapPos};
  };
  viewMuscle = {#include "../DrawSettings/MusDrawSettings.any"};
  viewForce.Visible ??= Off;
};

AnyMuscleShortestPath OEC_2 = {
  AnyMuscleModel &MusMdl = ....MuscleModels.Right.ObliquusExternus.OEC_2;
  AnyRefNode &Org = ....Segments.Right.R7Seg.ObliquusExternusNode;
  AnyRefNode &Ins = ....Abdominal.Layer_L2.BaseSegAnterior.mid;

  #if BM_TRUNK_THORACIC_STERNUM_TOPOLOGY == 4
  AnyParamSurf &srf1 =....Segments.Right.CostalCartilageSeg.WrappingTorusR10.Surf;
  #else
  AnyParamSurf &srf1 =....Segments.SternalBodySeg.Right.ObliquusWrapping.Surf;
  #endif

  SPLine.StringMesh=60;

  SPLine ={
    AnyMatrix InitWrapPos = {
      transf3D({0,.srf1.MajorRadius+.srf1.MinorRadius, 0}, &.srf1)
    };
    InitWrapPosVecArr = {&InitWrapPos};
  };
  viewMuscle = {#include "../DrawSettings/MusDrawSettings.any"};
  viewForce.Visible ??= Off;
};


AnyMuscleShortestPath OEC_3 = {
  AnyMuscleModel &MusMdl = ....MuscleModels.Right.ObliquusExternus.OEC_3;
  AnyRefNode &Org = ....Segments.Right.R8Seg.ObliquusExternusNode;
  AnyRefNode &Ins = ....Abdominal.Layer_L3.BaseSegAnterior.mid;

  #if BM_TRUNK_THORACIC_STERNUM_TOPOLOGY == 4
  AnyParamSurf &srf1 =....Segments.Right.CostalCartilageSeg.WrappingTorusR10.Surf;
  #else
  AnyParamSurf &srf1 =....Segments.SternalBodySeg.Right.ObliquusWrapping.Surf;
  #endif

  SPLine.StringMesh=60;

  SPLine ={
    AnyMatrix InitWrapPos = {
      transf3D({0,.srf1.MajorRadius+.srf1.MinorRadius, 0}, &.srf1)
    };
    InitWrapPosVecArr = {&InitWrapPos};
  };
  viewMuscle = {#include "../DrawSettings/MusDrawSettings.any"};
  viewForce.Visible ??= Off;
};


AnyMuscleShortestPath OEC_4 = {
  AnyMuscleModel &MusMdl = ....MuscleModels.Right.ObliquusExternus.OEC_4;
  AnyRefNode &Org = ....Segments.Right.R9Seg.ObliquusExternusNode;
  AnyRefNode &Ins = ....Abdominal.Layer_L4.BaseSegAnterior.mid;

  #if BM_TRUNK_THORACIC_STERNUM_TOPOLOGY == 4
  AnyParamSurf &srf1 =....Segments.Right.CostalCartilageSeg.WrappingTorusR10.Surf;
  #else
  AnyParamSurf &srf1 =....Segments.SternalBodySeg.Right.ObliquusWrapping.Surf;
  #endif

  SPLine.StringMesh=60;

  SPLine ={
    AnyMatrix InitWrapPos = {
      transf3D({0,.srf1.MajorRadius+.srf1.MinorRadius, 0}, &.srf1)
    };
    InitWrapPosVecArr = {&InitWrapPos};
  };
  viewMuscle = {#include "../DrawSettings/MusDrawSettings.any"};
  viewForce.Visible ??= Off;
};


AnyMuscleShortestPath  OEC_5= {
  AnyMuscleModel &MusMdl = ....MuscleModels.Right.ObliquusExternus.OEC_5;
  AnyRefNode &Org = ....Segments.Right.R9Seg.ObliquusExternusNode_1;
  AnyRefNode &Ins = ....Abdominal.Layer_L5.BaseSegAnterior.mid;

  #if BM_TRUNK_THORACIC_STERNUM_TOPOLOGY == 4
  AnyParamSurf &srf0 =....Segments.Right.CostalCartilageSeg.WrappingTorusR10.Surf;
  #else
  AnyParamSurf &srf0 =....Segments.SternalBodySeg.Right.ObliquusWrapping.Surf;
  #endif
  AnyParamSurf  &srf1 =....Abdominal.ObliquusWrapping.WrappingSeg.Layer4WrappingPoints.Right.nn09.Translate.OutwardCyl;
  AnyParamSurf  &srf2 =....Abdominal.ObliquusWrapping.WrappingSeg.Layer5WrappingPoints.Right.nn10.Translate.OutwardCyl;

  SPLine.StringMesh=60;

  SPLine ={
    AnyMatrix InitWrapPos = {
      transf3D({0,-.srf1.radius, 0.5*.srf1.Length}, &.srf1),
      transf3D({0,-.srf2.radius, 0.5*.srf2.Length}, &.srf2)
    };
    InitWrapPosVecArr = {&InitWrapPos};
  };
  viewMuscle = {#include "../DrawSettings/MusDrawSettings.any"};
  viewForce.Visible ??= Off;
};


AnyMuscleShortestPath OEC_6 = {
  AnyMuscleModel &MusMdl = ....MuscleModels.Right.ObliquusExternus.OEC_6;
  AnyRefNode &Org = ....Segments.Right.R10Seg.ObliquusExternusNode_1;
  AnyRefNode &Ins =     ....Abdominal.Layer_Pelvic2.BaseSegAnterior.VolumePoints.Right.nn11;

  // AnyParamSurf &srf1 =....Abdominal.ObliquusWrapping.WrappingSeg.Layer4WrappingPoints.Right.nn09.Translate.VerticalCyl;
 AnyParamSurf &srf2 =....Abdominal.ObliquusWrapping.WrappingSeg.Layer4WrappingPoints.Right.nn10.Translate.OutwardCyl;

  SPLine.StringMesh=60;

  SPLine ={
    AnyMatrix InitWrapPos = {
      // transf3D({0,-.srf1.radius, 0.5*.srf1.Length}, &.srf1),
     transf3D({0,-1.1*.srf2.radius, 0.5*.srf2.Length}, &.srf2),
    };
    InitWrapPosVecArr = {&InitWrapPos};
  };

  viewMuscle = {#include "../DrawSettings/MusDrawSettings.any" };
  viewForce.Visible ??= Off;
};


AnyMuscleShortestPath OEC_7 = {
  AnyMuscleModel &MusMdl = ....MuscleModels.Right.ObliquusExternus.OEC_7;
  AnyRefNode &Org = ....Segments.Right.R10Seg.ObliquusExternusNode_2;
  AnyRefNode &Ins =     ....Abdominal.Layer_Pelvic2.BaseSegAnterior.VolumePoints.Right.nn10;

  // AnyParamSurf &srf1 =....Abdominal.ObliquusWrapping.WrappingSeg.Layer4WrappingPoints.Right.nn08.Translate.VerticalCyl;
  AnyParamSurf &srf2 =....Abdominal.ObliquusWrapping.WrappingSeg.Layer4WrappingPoints.Right.nn09.Translate.OutwardCyl;

  SPLine.StringMesh=60;

  SPLine ={
    AnyMatrix InitWrapPos = {
      // transf3D({0,-1.1*.srf1.radius, 0.5*.srf1.Length}, &.srf1),
     transf3D({0,-1.1*.srf2.radius, 0.5*.srf2.Length}, &.srf2),
    };
    InitWrapPosVecArr = {&InitWrapPos};
  };

  viewMuscle = {#include "../DrawSettings/MusDrawSettings.any"};
  viewForce.Visible ??= Off;
};


AnyMuscleViaPoint OEC_8= {
  AnyMuscleModel &MusMdl = ....MuscleModels.Right.ObliquusExternus.OEC_8;
  AnyRefNode &Org = ....Segments.Right.R10Seg.ObliquusExternusNode_00;
  AnyRefNode &Ins =    ....Segments.PelvisSeg.Right.ObliquusInternusNode_8;
  viewMuscle = {#include "../DrawSettings/MusDrawSettings.any"};
  viewForce.Visible ??= Off;
};


AnyMuscleViaPoint OEC_9= {
  AnyMuscleModel &MusMdl = ....MuscleModels.Right.ObliquusExternus.OEC_9;
  AnyRefNode &Org = ....Segments.Right.R10Seg.ObliquusExternusNode_0;
  AnyRefNode &Ins =    ....Segments.PelvisSeg.Right.ObliquusInternusNode_9;
  viewMuscle = {#include "../DrawSettings/MusDrawSettings.any"};
  viewForce.Visible ??= Off;
};


AnyMuscleViaPoint OEC_10 = {
  AnyMuscleModel &MusMdl = ....MuscleModels.Right.ObliquusExternus.OEC_10;
  AnyRefNode &Org = ....Segments.Right.R11Seg.ObliquusExternusNode;
  AnyRefNode &Ins =    ....Segments.PelvisSeg.Right.ObliquusInternusNode_7;
  viewMuscle = {#include "../DrawSettings/MusDrawSettings.any"};
  viewForce.Visible ??= Off;
};


AnyMuscleViaPoint OEC_11 = {
  AnyMuscleModel &MusMdl = ....MuscleModels.Right.ObliquusExternus.OEC_11;
  AnyRefNode &Org = ....Segments.Right.R11Seg.ObliquusExternusNode1;
  AnyRefNode &Ins =    ....Segments.PelvisSeg.Right.ObliquusInternusNode_5;
  viewMuscle = {#include "../DrawSettings/MusDrawSettings.any"};
  viewForce.Visible ??= Off;
};


AnyMuscleViaPoint OEC_12 = {
  AnyMuscleModel &MusMdl = ....MuscleModels.Right.ObliquusExternus.OEC_12;
  AnyRefNode &Org = ....Segments.Right.R12Seg.ObliquusExternusNode;
  AnyRefNode &Ins =    ....Segments.PelvisSeg.Right.ObliquusInternusNode_4;
  viewMuscle = {#include "../DrawSettings/MusDrawSettings.any"};
  viewForce.Visible ??= Off;
};

#endif

#ifndef OBLIQUUS_WRAP_ON_CYLS


AnyMuscleShortestPath OEC_1 = {
  AnyMuscleModel &MusMdl = ....MuscleModels.Right.ObliquusExternus.OEC_1;
  AnyRefNode &Org = ....Segments.Right.R6Seg.ObliquusExternusNode;
  AnyRefNode &Ins = ....Abdominal.Layer_L1.BaseSegAnterior.mid;

  #if BM_TRUNK_THORACIC_STERNUM_TOPOLOGY == 4
  AnyParamSurf &srf1 =....Segments.Right.CostalCartilageSeg.WrappingTorusR10.Surf;
  #else
  AnyParamSurf &srf1 =....Segments.SternalBodySeg.Right.ObliquusWrapping.Surf;
  #endif

  SPLine.StringMesh=60;

  SPLine ={
    AnyMatrix InitWrapPos = {
      transf3D({0,.srf1.MajorRadius+.srf1.MinorRadius, 0}, &.srf1)
    };


    InitWrapPosVecArr = {&InitWrapPos};
  };
  viewMuscle = {#include "../DrawSettings/MusDrawSettings.any"};
  viewForce.Visible ??= Off;
};

AnyMuscleShortestPath OEC_2 = {
  AnyMuscleModel &MusMdl = ....MuscleModels.Right.ObliquusExternus.OEC_2;
  AnyRefNode &Org = ....Segments.Right.R7Seg.ObliquusExternusNode;
  AnyRefNode &Ins = ....Abdominal.Layer_L2.BaseSegAnterior.mid;

  #if BM_TRUNK_THORACIC_STERNUM_TOPOLOGY == 4
  AnyParamSurf &srf1 =....Segments.Right.CostalCartilageSeg.WrappingTorusR10.Surf;
  #else
  AnyParamSurf &srf1 =....Segments.SternalBodySeg.Right.ObliquusWrapping.Surf;
  #endif

  SPLine.StringMesh=60;

  SPLine ={
    AnyMatrix InitWrapPos = {
      transf3D({0,.srf1.MajorRadius+.srf1.MinorRadius, 0}, &.srf1)
    };
    InitWrapPosVecArr = {&InitWrapPos};
  };
  viewMuscle = {#include "../DrawSettings/MusDrawSettings.any"};
  viewForce.Visible ??= Off;
};


AnyMuscleShortestPath OEC_3 = {
  AnyMuscleModel &MusMdl = ....MuscleModels.Right.ObliquusExternus.OEC_3;
  AnyRefNode &Org = ....Segments.Right.R8Seg.ObliquusExternusNode;
  AnyRefNode &Ins = ....Abdominal.Layer_L3.BaseSegAnterior.mid;

  #if BM_TRUNK_THORACIC_STERNUM_TOPOLOGY == 4
  AnyParamSurf &srf1 =....Segments.Right.CostalCartilageSeg.WrappingTorusR10.Surf;
  #else
  AnyParamSurf &srf1 =....Segments.SternalBodySeg.Right.ObliquusWrapping.Surf;
  #endif


  #if MESH_TYPE == "ELLIPSOID_SIDE"
  AnySurfEllipsoid &mesh2 = Main.HumanModel.BodyModel.Trunk.Abdominal.Layer_L2.BaseSegAnterior.Right.mesh;
  #else
  AnySurfTriCylMesh &mesh2 = Main.HumanModel.BodyModel.Trunk.Abdominal.Layer_L2.BaseSegAnterior.mesh;
  #endif


  SPLine.StringMesh=60;


  SPLine ={


   #if MESH_TYPE == "ELLIPSOID"
    AnyMatrix InitWrapPos = {
      transf3D({0,.srf1.MajorRadius+.srf1.MinorRadius, 0}, &.srf1),
      transf3D({.mesh2.Radius[0],0,0}, &.mesh2),
    };
    #endif

    #if MESH_TYPE == "ELLIPSOID_SIDE"
    AnyMatrix InitWrapPos = {
       transf3D({0,.srf1.MajorRadius+.srf1.MinorRadius, 0}, &.srf1),

      transf3D({0,.mesh2.Radius[1],0}, &.mesh2),

    };
    #endif


    #if MESH_TYPE == "QUAD"
    AnyMatrix InitWrapPos = {
      transf3D({0,.srf1.MajorRadius+.srf1.MinorRadius, 0}, &.srf1),
      transf3D(.mesh2.Points[floor(.mesh2.MeshSize*0.9)+2*.mesh2.MeshSize*6]+{0.02,0,0}, &.mesh2),
    };
    #endif


  InitWrapPosVecArr = {&InitWrapPos};
  };
  viewMuscle = {#include "../DrawSettings/MusDrawSettings.any"};
  viewForce.Visible ??= Off;
};


AnyMuscleShortestPath OEC_4 = {
  AnyMuscleModel &MusMdl = ....MuscleModels.Right.ObliquusExternus.OEC_4;
  AnyRefNode &Org = ....Segments.Right.R9Seg.ObliquusExternusNode;
  AnyRefNode &Ins = ....Abdominal.Layer_L4.BaseSegAnterior.mid;


  #if BM_TRUNK_THORACIC_STERNUM_TOPOLOGY == 4
  AnyParamSurf &srf1 =....Segments.Right.CostalCartilageSeg.WrappingTorusR10.Surf;
  #else
  AnyParamSurf &srf1 =....Segments.SternalBodySeg.Right.ObliquusWrapping.Surf;
  #endif


  #if MESH_TYPE == "ELLIPSOID_SIDE"
  //AnySurfTriCylMesh &mesh2 = Main.HumanModel.BodyModel.Trunk.Abdominal.Layer_L2.BaseSegAnterior.mesh;
  AnySurfEllipsoid &mesh3 = Main.HumanModel.BodyModel.Trunk.Abdominal.Layer_L3.BaseSegAnterior.Right.mesh;
  //AnySurfTriCylMesh &mesh4 = Main.HumanModel.BodyModel.Trunk.Abdominal.Layer_L4.BaseSegAnterior.mesh;
  #else
  //AnySurfTriCylMesh &mesh2 = Main.HumanModel.BodyModel.Trunk.Abdominal.Layer_L2.BaseSegAnterior.mesh;
  AnySurfTriCylMesh &mesh3 = Main.HumanModel.BodyModel.Trunk.Abdominal.Layer_L3.BaseSegAnterior.mesh;
  //AnySurfTriCylMesh &mesh4 = Main.HumanModel.BodyModel.Trunk.Abdominal.Layer_L4.BaseSegAnterior.mesh;
  #endif

  SPLine.StringMesh=60;

  SPLine ={

    #if MESH_TYPE == "ELLIPSOID"
     AnyMatrix InitWrapPos = {
        transf3D({0,.srf1.MajorRadius+.srf1.MinorRadius, 0}, &.srf1),
      //transf3D({.mesh2.Radius[0],0,0}, &.mesh2),
        transf3D({.mesh3.Radius[0],0,0}, &.mesh3),
      //transf3D({.mesh4.Radius[0],0,0}, &.mesh4),
     };
    #endif
    #if MESH_TYPE == "ELLIPSOID_SIDE"
    AnyMatrix InitWrapPos = {
      transf3D({0,.srf1.MajorRadius+.srf1.MinorRadius, 0}, &.srf1),
      transf3D({0,.mesh3.Radius[1],0}, &.mesh3),
    };
    #endif


    #if MESH_TYPE == "QUAD"
AnyMatrix InitWrapPos = {
      transf3D({0,.srf1.MajorRadius+.srf1.MinorRadius, 0}, &.srf1),

     //  transf3D(.mesh2.Points[floor(.mesh2.MeshSize*0.85)+2*.mesh2.MeshSize*6]+{0.02,0,0}, &.mesh2),
     //  transf3D(.mesh3.Points[floor(.mesh3.MeshSize*0.95)+2*.mesh3.MeshSize*6]+{0.02,0,0}, &.mesh3)
       transf3D(.mesh4.Points[floor(.mesh4.MeshSize*0.95)+2*.mesh4.MeshSize*6]+{0.02,0,0}, &.mesh4)


    };
    #endif


    InitWrapPosVecArr = {&InitWrapPos};
  };
  viewMuscle = {#include "../DrawSettings/MusDrawSettings.any"};
  viewForce.Visible ??= Off;
};


AnyMuscleShortestPath  OEC_5= {
  AnyMuscleModel &MusMdl = ....MuscleModels.Right.ObliquusExternus.OEC_5;
  AnyRefNode &Org = ....Segments.Right.R9Seg.ObliquusExternusNode_1;
  AnyRefNode &Ins = ....Abdominal.Layer_L5.BaseSegAnterior.mid;

  #if BM_TRUNK_THORACIC_STERNUM_TOPOLOGY == 4
  AnyParamSurf &srf0 =....Segments.Right.CostalCartilageSeg.WrappingTorusR10.Surf;
  #else
  AnyParamSurf &srf0 =....Segments.SternalBodySeg.Right.ObliquusWrapping.Surf;
  #endif

//  AnySurfTriCylMesh &mesh3 = Main.HumanModel.BodyModel.Trunk.Abdominal.Layer_L3.BaseSegAnterior.mesh;


  #if MESH_TYPE == "ELLIPSOID_SIDE"
  AnySurfEllipsoid &mesh4 = Main.HumanModel.BodyModel.Trunk.Abdominal.Layer_L4.BaseSegAnterior.Right.mesh;
  #else
  AnySurfTriCylMesh &mesh4 = Main.HumanModel.BodyModel.Trunk.Abdominal.Layer_L4.BaseSegAnterior.mesh;
  #endif


  SPLine.StringMesh=60;

  SPLine ={

     #if MESH_TYPE == "ELLIPSOID"
    AnyMatrix InitWrapPos = {
     transf3D({0,.srf0.MajorRadius+.srf0.MinorRadius, 0}, &.srf0),
  //    transf3D({.mesh3.Radius[0],0,0}, &.mesh3),
        transf3D({.mesh4.Radius[0],0,0}, &.mesh4),
    };
    #endif
    #if MESH_TYPE == "ELLIPSOID_SIDE"
    AnyMatrix InitWrapPos = {
       transf3D({0,.srf0.MajorRadius+.srf0.MinorRadius, 0}, &.srf0),

      transf3D({0,.mesh4.Radius[1],0}, &.mesh4),

    };
    #endif


    #if MESH_TYPE == "QUAD"
AnyMatrix InitWrapPos = {
 transf3D({0,.srf0.MajorRadius+.srf0.MinorRadius, 0}, &.srf0),
 //transf3D(.mesh3.Points[floor(.mesh3.MeshSize*0.85)+2*.mesh3.MeshSize*6]+{0.02,0,0}, &.mesh3),
       transf3D(.mesh4.Points[floor(.mesh4.MeshSize*0.85)+2*.mesh4.MeshSize*6]+{0.02,0,0}, &.mesh4)
    };
        #endif
    InitWrapPosVecArr = {&InitWrapPos};
  };
  viewMuscle = {#include "../DrawSettings/MusDrawSettings.any"};
  viewForce.Visible ??= Off;
};

//
AnyMuscleShortestPath OEC_6 = {
  AnyMuscleModel &MusMdl = ....MuscleModels.Right.ObliquusExternus.OEC_6;
  AnyRefNode &Org = ....Segments.Right.R10Seg.ObliquusExternusNode_1;
  AnyRefNode &Ins =     ....Abdominal.Layer_Pelvic2.BaseSegAnterior.VolumePoints.Right.nn11;
 //AnySurfTriCylMesh &mesh4= Main.HumanModel.BodyModel.Trunk.Abdominal.Layer_L4.BaseSegAnterior.mesh;
//  AnySurfTriCylMesh &mesh5 = Main.HumanModel.BodyModel.Trunk.Abdominal.Layer_L5.BaseSegAnterior.mesh;

   #if MESH_TYPE == "ELLIPSOID_SIDE"
  AnySurfEllipsoid &mesh5 = Main.HumanModel.BodyModel.Trunk.Abdominal.Layer_L5.BaseSegAnterior.Right.mesh;
  #else
  AnySurfTriCylMesh &mesh5 = Main.HumanModel.BodyModel.Trunk.Abdominal.Layer_L5.BaseSegAnterior.mesh;
  #endif


  SPLine.StringMesh=60;

  SPLine ={
      #if MESH_TYPE == "ELLIPSOID"
    AnyMatrix InitWrapPos = {
    //    transf3D({.mesh4.Radius[0],0,0}, &.mesh4),
        transf3D({.mesh5.Radius[0],0,0}, &.mesh5),
    };
    #endif

    #if MESH_TYPE == "ELLIPSOID_SIDE"
    AnyMatrix InitWrapPos = {
               transf3D({0,.mesh5.Radius[1],0}, &.mesh5),

    };
    #endif


    #if MESH_TYPE == "QUAD"

    AnyMatrix InitWrapPos = {
      // transf3D(.mesh4.Points[floor(.mesh4.MeshSize*0.8)+2*.mesh4.MeshSize*6]+{0.02,0,0}, &.mesh4),
       transf3D(.mesh5.Points[floor(.mesh5.MeshSize*0.85)+2*.mesh5.MeshSize*6]+{0.02,0,0}, &.mesh5)

   };
        #endif


    InitWrapPosVecArr = {&InitWrapPos};
  };

  viewMuscle = {#include "../DrawSettings/MusDrawSettings.any" };
  viewForce.Visible ??= Off;
};


AnyMuscleShortestPath OEC_7 = {
  AnyMuscleModel &MusMdl = ....MuscleModels.Right.ObliquusExternus.OEC_7;
  AnyRefNode &Org = ....Segments.Right.R10Seg.ObliquusExternusNode_2;
  AnyRefNode &Ins =     ....Abdominal.Layer_Pelvic2.BaseSegAnterior.VolumePoints.Right.nn10;
 // AnySurfTriCylMesh &mesh0 = Main.HumanModel.BodyModel.Trunk.Abdominal.Layer_L2.BaseSegAnterior.mesh;
 // AnySurfTriCylMesh &mesh1 = Main.HumanModel.BodyModel.Trunk.Abdominal.Layer_L3.BaseSegAnterior.mesh;
//  AnySurfTriCylMesh &mesh4 = Main.HumanModel.BodyModel.Trunk.Abdominal.Layer_L4.BaseSegAnterior.mesh;
//  AnySurfTriCylMesh &mesh5 = Main.HumanModel.BodyModel.Trunk.Abdominal.Layer_L5.BaseSegAnterior.mesh;
//
   #if MESH_TYPE == "ELLIPSOID_SIDE"
   AnySurfEllipsoid &mesh4 = Main.HumanModel.BodyModel.Trunk.Abdominal.Layer_L4.BaseSegAnterior.Right.mesh;
   AnySurfEllipsoid  &mesh5 = Main.HumanModel.BodyModel.Trunk.Abdominal.Layer_L5.BaseSegAnterior.Right.mesh;
  #else
  AnySurfTriCylMesh &mesh4 = Main.HumanModel.BodyModel.Trunk.Abdominal.Layer_L4.BaseSegAnterior.mesh;
  AnySurfTriCylMesh &mesh5 = Main.HumanModel.BodyModel.Trunk.Abdominal.Layer_L5.BaseSegAnterior.mesh;
  #endif


  SPLine.StringMesh=60;
  SPLine ={

    #if MESH_TYPE == "ELLIPSOID"
    AnyMatrix InitWrapPos = {
      transf3D({.mesh4.Radius[0],0,0}, &.mesh4),
      transf3D({.mesh5.Radius[0],0,0}, &.mesh5),
    };
    #endif

   #if MESH_TYPE == "ELLIPSOID_SIDE"
    AnyMatrix InitWrapPos = {
            transf3D({0,.mesh4.Radius[1],0}, &.mesh4),
               transf3D({0,.mesh5.Radius[1],0}, &.mesh5),

    };
    #endif


    #if MESH_TYPE == "QUAD"

    AnyMatrix InitWrapPos = {
      transf3D(.mesh4.Points[floor(.mesh4.MeshSize*0.8)+2*20*4]+{0.01,0,0}, &.mesh4),
      transf3D(.mesh5.Points[floor(.mesh5.MeshSize*0.85)+2*20*4]+{0.01,0,0}, &.mesh5)
    };
    #endif
    InitWrapPosVecArr = {&InitWrapPos};
  };
  viewMuscle = {#include "../DrawSettings/MusDrawSettings.any"};
  viewForce.Visible ??= Off;
};


AnyMuscleViaPoint OEC_8= {
  AnyMuscleModel &MusMdl = ....MuscleModels.Right.ObliquusExternus.OEC_8;
  AnyRefNode &Org = ....Segments.Right.R10Seg.ObliquusExternusNode_00;
  AnyRefNode &Ins =    ....Segments.PelvisSeg.Right.ObliquusInternusNode_8;
  viewMuscle = {#include "../DrawSettings/MusDrawSettings.any"};
  viewForce.Visible ??= Off;
};


AnyMuscleViaPoint OEC_9= {
  AnyMuscleModel &MusMdl = ....MuscleModels.Right.ObliquusExternus.OEC_9;
  AnyRefNode &Org = ....Segments.Right.R10Seg.ObliquusExternusNode_0;
  AnyRefNode &Ins =    ....Segments.PelvisSeg.Right.ObliquusInternusNode_9;
  viewMuscle = {#include "../DrawSettings/MusDrawSettings.any"};
  viewForce.Visible ??= Off;
};


AnyMuscleViaPoint OEC_10 = {
  AnyMuscleModel &MusMdl = ....MuscleModels.Right.ObliquusExternus.OEC_10;
  AnyRefNode &Org = ....Segments.Right.R11Seg.ObliquusExternusNode;
  AnyRefNode &Ins =    ....Segments.PelvisSeg.Right.ObliquusInternusNode_7;
  viewMuscle = {#include "../DrawSettings/MusDrawSettings.any"};
  viewForce.Visible ??= Off;
};


AnyMuscleViaPoint OEC_11 = {
  AnyMuscleModel &MusMdl = ....MuscleModels.Right.ObliquusExternus.OEC_11;
  AnyRefNode &Org = ....Segments.Right.R11Seg.ObliquusExternusNode1;
  AnyRefNode &Ins =    ....Segments.PelvisSeg.Right.ObliquusInternusNode_5;
  viewMuscle = {#include "../DrawSettings/MusDrawSettings.any"};
  viewForce.Visible ??= Off;
};


AnyMuscleViaPoint OEC_12 = {
  AnyMuscleModel &MusMdl = ....MuscleModels.Right.ObliquusExternus.OEC_12;
  AnyRefNode &Org = ....Segments.Right.R12Seg.ObliquusExternusNode;
  AnyRefNode &Ins =    ....Segments.PelvisSeg.Right.ObliquusInternusNode_4;
  viewMuscle = {#include "../DrawSettings/MusDrawSettings.any"};
  viewForce.Visible ??= Off;
};


#endif

#endif


#if BM_TRUNK_CAVITY_MODEL == _CAVITY_MODEL_BUCKLE_
    AnyMuscleViaPoint OEC_1 = {
      AnyMuscleModel &MusMdl = ....MuscleModels.Right.ObliquusExternus.OEC_1;
      AnyRefNode &Org = ....Segments.Right.R6Seg.ObliquusExternusNode;
      AnyRefNode &Ins = ....Buckle.Segments.BuckleSeg.Right.ObliquusExternusNode_1;
      viewMuscle = {#include "../DrawSettings/MusDrawSettings.any"};
      viewForce.Visible ??= Off;
    };
    AnyMuscleViaPoint OEC_2 = {
      AnyMuscleModel &MusMdl = ....MuscleModels.Right.ObliquusExternus.OEC_2;
      AnyRefNode &Org = ....Segments.Right.R7Seg.ObliquusExternusNode;
      AnyRefNode &Ins = ....Buckle.Segments.BuckleSeg.Right.ObliquusExternusNode_2;
      viewMuscle = {#include "../DrawSettings/MusDrawSettings.any"};
      viewForce.Visible ??= Off;
    };
    AnyMuscleViaPoint OEC_3 = {
      AnyMuscleModel &MusMdl = ....MuscleModels.Right.ObliquusExternus.OEC_3;
      AnyRefNode &Org = ....Segments.Right.R8Seg.ObliquusExternusNode;
      AnyRefNode &Ins = ....Buckle.Segments.BuckleSeg.Right.ObliquusExternusNode_3;
      viewMuscle = {#include "../DrawSettings/MusDrawSettings.any"};
      viewForce.Visible ??= Off;
    };
    AnyMuscleViaPoint OEC_4 = {
      AnyMuscleModel &MusMdl = ....MuscleModels.Right.ObliquusExternus.OEC_4;
      AnyRefNode &Org = ....Segments.Right.R9Seg.ObliquusExternusNode;
      AnyRefNode &Ins = ....Buckle.Segments.BuckleSeg.Right.ObliquusExternusNode_4;
      viewMuscle = {#include "../DrawSettings/MusDrawSettings.any"};
      viewForce.Visible ??= Off;
    };
    AnyMuscleViaPoint OEC_5 = {
      AnyMuscleModel &MusMdl = ....MuscleModels.Right.ObliquusExternus.OEC_5;
      AnyRefNode &Org = ....Segments.Right.R10Seg.ObliquusExternusNode_1;
      AnyRefNode &Ins = ....Buckle.Segments.BuckleSeg.Right.ObliquusExternusNode_5;
      viewMuscle = {#include "../DrawSettings/MusDrawSettings.any"};
      viewForce.Visible ??= Off;
    };
    AnyMuscleViaPoint OEC_6 = {
      AnyMuscleModel &MusMdl = ....MuscleModels.Right.ObliquusExternus.OEC_6;
      AnyRefNode &Org = ....Segments.Right.R10Seg.ObliquusExternusNode_2;
      AnyRefNode &Ins = ....Segments.PelvisSeg.Right.ObliquusExternusNode_1;
      viewMuscle = {#include "../DrawSettings/MusDrawSettings.any"};
      viewForce.Visible ??= Off;
    };
    AnyMuscleViaPoint OEC_7 = {
      AnyMuscleModel &MusMdl = ....MuscleModels.Right.ObliquusExternus.OEC_7;
      AnyRefNode &Org = ....Segments.Right.R11Seg.ObliquusExternusNode;
      AnyRefNode &Ins = ....Segments.PelvisSeg.Right.ObliquusExternusNode_2;
      viewMuscle = {#include "../DrawSettings/MusDrawSettings.any"};
      viewForce.Visible ??= Off;
    };
    AnyMuscleViaPoint OEC_8= {
      AnyMuscleModel &MusMdl = ....MuscleModels.Right.ObliquusExternus.OEC_8;
      AnyRefNode &Org = ....Segments.Right.R12Seg.ObliquusExternusNode;
      AnyRefNode &Ins = ....Segments.PelvisSeg.Right.ObliquusExternusNode_3;
      viewMuscle = {#include "../DrawSettings/MusDrawSettings.any"};
      viewForce.Visible ??= Off;
    };
  #endif
};


MuscleGroup ObliquusInternus = {

#if BM_TRUNK_CAVITY_MODEL == _CAVITY_MODEL_VOLUME_

#ifdef OBLIQUUS_WRAP_ON_CYLS


AnyMuscleViaPoint OIC_1 = {
  AnyMuscleModel &MusMdl = ....MuscleModels.Right.ObliquusInternus.OIC_1;
  AnyRefNode &Org = ....Segments.Right.R12Seg.ObliquusExternusNode;
  AnyRefNode &Ins = ....Segments.PelvisSeg.Right.ObliquusInternusNode_1;
  viewMuscle = {#include "../DrawSettings/MusDrawSettings.any"};
  viewForce.Visible ??= Off;
 };


AnyMuscleViaPoint OIC_2 = {
  AnyMuscleModel &MusMdl = ....MuscleModels.Right.ObliquusInternus.OIC_2;
  AnyRefNode &Org = ....Segments.Right.R11Seg.ObliquusExternusNode1;
  AnyRefNode &Ins = ....Segments.PelvisSeg.Right.ObliquusInternusNode_2;
  viewMuscle = {#include "../DrawSettings/MusDrawSettings.any"};
  viewForce.Visible ??= Off;
};


AnyMuscleViaPoint OIC_3 = {
  AnyMuscleModel &MusMdl = ....MuscleModels.Right.ObliquusInternus.OIC_3;
  AnyRefNode &Org = ....Segments.Right.R11Seg.ObliquusExternusNode;
  AnyRefNode &Ins = ....Segments.PelvisSeg.Right.ObliquusInternusNode_3;
  viewMuscle = {#include "../DrawSettings/MusDrawSettings.any"};
  viewForce.Visible ??= Off;
};


AnyMuscleViaPoint OIC_4 = {
  AnyMuscleModel &MusMdl = ....MuscleModels.Right.ObliquusInternus.OIC_4;
  AnyRefNode &Org = ....Segments.Right.R10Seg.ObliquusExternusNode_2;
  AnyRefNode &Ins = ....Segments.PelvisSeg.Right.ObliquusInternusNode_4;
  viewMuscle = {#include "../DrawSettings/MusDrawSettings.any"};
  viewForce.Visible ??= Off;
};


AnyMuscleViaPoint OIC_5 = {
  AnyMuscleModel &MusMdl = ....MuscleModels.Right.ObliquusInternus.OIC_5;
  AnyRefNode &Org = ....Segments.Right.R10Seg.ObliquusExternusNode_1;
  AnyRefNode &Ins = ....Segments.PelvisSeg.Right.ObliquusInternusNode_4_1;
  viewMuscle = {#include "../DrawSettings/MusDrawSettings.any"};
  viewForce.Visible ??= Off;
};


AnyMuscleShortestPath OIC_6 = {
  AnyMuscleModel &MusMdl = ....MuscleModels.Right.ObliquusInternus.OIC_6;
  #if BM_TRUNK_THORACIC_STERNUM_TOPOLOGY == 4
    AnyRefNode &Org = ....Segments.Right.CostalCartilageSeg.ObliquusInternus_1;
  #else
    AnyRefNode &Org = ....Segments.SternalBodySeg.Right.ObliquusInternusNode_1;
  #endif
  AnyRefNode &Ins = ....Segments.PelvisSeg.Right.ObliquusInternusNode_5;

  AnyParamSurf &srf4 =....Abdominal.ObliquusWrapping.WrappingSeg.Layer4WrappingPoints.Right.nn04.Translate.InwardCyl;

  SPLine.StringMesh=60;

  SPLine ={
    AnyMatrix InitWrapPos = {
      transf3D({0,-.srf4.radius, 0.5*.srf4.Length}, &.srf4)
    };
    InitWrapPosVecArr = {&InitWrapPos};
  };

  viewMuscle = {#include "../DrawSettings/MusDrawSettings.any"};
  viewForce.Visible ??= Off;
};


AnyMuscleShortestPath OIC_7 = {
  AnyMuscleModel &MusMdl = ....MuscleModels.Right.ObliquusInternus.OIC_7;
  #if BM_TRUNK_THORACIC_STERNUM_TOPOLOGY == 4
    AnyRefNode &Org = ....Segments.Right.CostalCartilageSeg.ObliquusInternus_2;
  #else
    AnyRefNode &Org = ....Segments.SternalBodySeg.Right.ObliquusInternusNode_2;
  #endif
  AnyRefNode &Ins = ....Segments.PelvisSeg.Right.ObliquusInternusNode_5;

  AnyParamSurf &srf3 =....Abdominal.ObliquusWrapping.WrappingSeg.Layer3WrappingPoints.Right.nn08.Translate.InwardCyl;

  SPLine.StringMesh=60;

  SPLine ={
    AnyMatrix InitWrapPos = {
      transf3D({0,-.srf3.radius, 0.5*.srf3.Length}, &.srf3)
    };
    InitWrapPosVecArr = {&InitWrapPos};
  };

  viewMuscle = {#include "../DrawSettings/MusDrawSettings.any"};
  viewForce.Visible ??= Off;
};


AnyMuscleShortestPath OIC_8 = {
  AnyMuscleModel &MusMdl = ....MuscleModels.Right.ObliquusInternus.OIC_8;
//  AnyRefNode &Org = ....Segments.SternalBodySeg.Xiphoid_DiaphragmNodeR;
//  AnyRefNode &Ins = ....Segments.PelvisSeg.Right.ObliquusInternusNode_6;
  AnyRefNode &Org = ....Segments.SternalBodySeg.Xiphoid_DiaphragmNodeR;
  AnyRefNode &Via = Main.HumanModel.BodyModel.Trunk.Abdominal.Layer_L1.BaseSegAnterior.TransversusPoints.Right.nn06;

  AnyRefNode &Ins = ....Segments.PelvisSeg.Right.ObliquusInternusNode_6;

  AnyParamSurf &srf2 =....Abdominal.ObliquusWrapping.WrappingSeg.Layer2WrappingPoints.Right.nn10.Translate.InwardCyl;
  AnyParamSurf &srf3 =....Abdominal.ObliquusWrapping.WrappingSeg.Layer3WrappingPoints.Right.nn08.Translate.InwardCyl;

  SPLine.StringMesh=60;

  SPLine ={
    AnyMatrix InitWrapPos = {
      transf3D({0,-.srf2.radius, 0.5*.srf2.Length}, &.srf2),
      transf3D({0,-.srf3.radius, 0.5*.srf3.Length}, &.srf3)
    };
    InitWrapPosVecArr = {&InitWrapPos};
  };
  viewMuscle = {#include "../DrawSettings/MusDrawSettings.any"};
  viewForce.Visible ??= Off;
};


AnyMuscleShortestPath OIC_8_extra = {
  AnyMuscleModel &MusMdl = ....MuscleModels.Right.ObliquusInternus.OIC_8;
   AnyRefNode &Org = ....Segments.SternalBodySeg.RACP_Via_2_R;
  AnyRefNode &Ins = ....Segments.PelvisSeg.Right.ObliquusInternusNode_6;

  AnyParamSurf &srf2 =....Abdominal.ObliquusWrapping.WrappingSeg.Layer2WrappingPoints.Right.nn10.Translate.InwardCyl;
  AnyParamSurf &srf3 =....Abdominal.ObliquusWrapping.WrappingSeg.Layer3WrappingPoints.Right.nn08.Translate.InwardCyl;

  SPLine.StringMesh=60;

  SPLine ={
    AnyMatrix InitWrapPos = {
      transf3D({0,-.srf2.radius, 0.5*.srf2.Length}, &.srf2),
      transf3D({0,-.srf3.radius, 0.5*.srf3.Length}, &.srf3)
    };
    InitWrapPosVecArr = {&InitWrapPos};
  };
  viewMuscle = {#include "../DrawSettings/MusDrawSettings.any"};
  viewForce.Visible ??= Off;
};


AnyMuscleShortestPath OIC_9 = {
  AnyMuscleModel &MusMdl = ....MuscleModels.Right.ObliquusInternus.OIC_9;
  AnyRefNode &Org =      ....Abdominal.Layer_L1.BaseSegAnterior.mid;
  AnyRefNode &Ins = ....Segments.PelvisSeg.Right.ObliquusInternusNode_6;

  //AnyParamSurf &srf1 =....Abdominal.ObliquusWrapping.WrappingSeg.Layer2WrappingPoints.Right.nn11.Translate.InwardCyl;
  AnyParamSurf &srf2 =....Abdominal.ObliquusWrapping.WrappingSeg.Layer3WrappingPoints.Right.nn10.Translate.InwardCyl;
  AnyParamSurf &srf3 =....Abdominal.ObliquusWrapping.WrappingSeg.Layer4WrappingPoints.Right.nn09.Translate.InwardCyl;

  SPLine.StringMesh=60;

  SPLine ={
    AnyMatrix InitWrapPos = {
     // transf3D({0,-.srf1.radius, 0.5*.srf1.Length}, &.srf1),
      transf3D({0,-.srf2.radius, 0.5*.srf2.Length}, &.srf2),
      transf3D({0,-.srf3.radius, 0.5*.srf3.Length}, &.srf3)
    };
    InitWrapPosVecArr = {&InitWrapPos};
  };

  viewMuscle = {#include "../DrawSettings/MusDrawSettings.any"};
  viewForce.Visible ??= Off;
 };

AnyMuscleShortestPath OIC_10 = {
  AnyMuscleModel &MusMdl = ....MuscleModels.Right.ObliquusInternus.OIC_10;
  AnyRefNode &Org =      ....Abdominal.Layer_L2.BaseSegAnterior.mid;
  AnyRefNode &Ins = ....Segments.PelvisSeg.Right.ObliquusInternusNode_6;

  AnyParamSurf &srf1 =....Abdominal.ObliquusWrapping.WrappingSeg.Layer3WrappingPoints.Right.nn11.Translate.InwardCyl;
  AnyParamSurf &srf2 =....Abdominal.ObliquusWrapping.WrappingSeg.Layer4WrappingPoints.Right.nn09.Translate.InwardCyl;

  SPLine.StringMesh=60;

  SPLine ={
    AnyMatrix InitWrapPos = {
      transf3D({0,-.srf1.radius, 0.5*.srf1.Length}, &.srf1),
      transf3D({0,-.srf2.radius, 0.5*.srf2.Length}, &.srf2)
    };
    InitWrapPosVecArr = {&InitWrapPos};
  };

  viewMuscle = {#include "../DrawSettings/MusDrawSettings.any"};
  viewForce.Visible ??= Off;
};


AnyMuscleShortestPath OIC_11 = {
  AnyMuscleModel &MusMdl = ....MuscleModels.Right.ObliquusInternus.OIC_11;
  AnyRefNode &Org = ....Abdominal.Layer_L3.BaseSegAnterior.mid;
  AnyRefNode &Ins = ....Segments.PelvisSeg.Right.ObliquusInternusNode_7;

  AnyParamSurf &srf1 =....Abdominal.ObliquusWrapping.WrappingSeg.Layer4WrappingPoints.Right.nn11.Translate.InwardCyl;
  AnyParamSurf &srf2 =....Abdominal.ObliquusWrapping.WrappingSeg.Layer5WrappingPoints.Right.nn08.Translate.InwardCyl;

  SPLine.StringMesh=60;

  SPLine ={
    AnyMatrix InitWrapPos = {
      transf3D({0,-.srf1.radius, 0.5*.srf1.Length}, &.srf1),
      transf3D({0,-.srf2.radius, 0.5*.srf2.Length}, &.srf2)
    };
    InitWrapPosVecArr = {&InitWrapPos};
  };

  viewMuscle = {#include "../DrawSettings/MusDrawSettings.any"};
  viewForce.Visible ??= Off;
};


AnyMuscleShortestPath OIC_12 = {
  AnyMuscleModel &MusMdl = ....MuscleModels.Right.ObliquusInternus.OIC_12;
  AnyRefNode &Org =      ....Abdominal.Layer_L4.BaseSegAnterior.mid;
  AnyRefNode &Ins = ....Segments.PelvisSeg.Right.ObliquusInternusNode_7;

  AnyParamSurf &srf1 =....Abdominal.ObliquusWrapping.WrappingSeg.Layer5WrappingPoints.Right.nn09.Translate.InwardCyl;

  SPLine.StringMesh=60;

  SPLine ={
    AnyMatrix InitWrapPos = {
      transf3D({0,-.srf1.radius, 0.5*.srf1.Length}, &.srf1)
    };
    InitWrapPosVecArr = {&InitWrapPos};
  };

  viewMuscle = {#include "../DrawSettings/MusDrawSettings.any"};
  viewForce.Visible ??= Off;
};

AnyMuscleShortestPath  OIC_13= {
  AnyMuscleModel &MusMdl = ....MuscleModels.Right.ObliquusInternus.OIC_13;
  AnyRefNode &Org = ....Abdominal.Layer_L5.BaseSegAnterior.mid;
  AnyRefNode &Ins = ....Segments.PelvisSeg.Right.ObliquusInternusNode_8;

  AnyParamSurf &srf1 =....Abdominal.ObliquusWrapping.WrappingSeg.Layer5WrappingPoints.Right.nn11.Translate.InwardCyl;

  SPLine.StringMesh=60;

  SPLine ={
    AnyMatrix InitWrapPos = {
        transf3D({0,-.srf1.radius, 0.5*.srf1.Length}, &.srf1)
      };
      InitWrapPosVecArr = {&InitWrapPos};
    };

  viewMuscle = {#include "../DrawSettings/MusDrawSettings.any"};
  viewForce.Visible ??= Off;
};


#endif

#ifndef OBLIQUUS_WRAP_ON_CYLS
AnyMuscleViaPoint OIC_1 = {
  AnyMuscleModel &MusMdl = ....MuscleModels.Right.ObliquusInternus.OIC_1;
  AnyRefNode &Org = ....Segments.Right.R12Seg.ObliquusExternusNode;
  AnyRefNode &Ins = ....Segments.PelvisSeg.Right.ObliquusInternusNode_1;
  viewMuscle = {#include "../DrawSettings/MusDrawSettings.any"};
  viewForce.Visible ??= Off;
 };


AnyMuscleViaPoint OIC_2 = {
  AnyMuscleModel &MusMdl = ....MuscleModels.Right.ObliquusInternus.OIC_2;
  AnyRefNode &Org = ....Segments.Right.R11Seg.ObliquusExternusNode1;
  AnyRefNode &Ins = ....Segments.PelvisSeg.Right.ObliquusInternusNode_2;
  viewMuscle = {#include "../DrawSettings/MusDrawSettings.any"};
  viewForce.Visible ??= Off;
};


AnyMuscleViaPoint OIC_3 = {
  AnyMuscleModel &MusMdl = ....MuscleModels.Right.ObliquusInternus.OIC_3;
  AnyRefNode &Org = ....Segments.Right.R11Seg.ObliquusExternusNode;
  AnyRefNode &Ins = ....Segments.PelvisSeg.Right.ObliquusInternusNode_3;
  viewMuscle = {#include "../DrawSettings/MusDrawSettings.any"};
  viewForce.Visible ??= Off;
};


AnyMuscleViaPoint OIC_4 = {
  AnyMuscleModel &MusMdl = ....MuscleModels.Right.ObliquusInternus.OIC_4;
  AnyRefNode &Org = ....Segments.Right.R10Seg.ObliquusExternusNode_2;
  AnyRefNode &Ins = ....Segments.PelvisSeg.Right.ObliquusInternusNode_4;
  viewMuscle = {#include "../DrawSettings/MusDrawSettings.any"};
  viewForce.Visible ??= Off;
};


AnyMuscleViaPoint OIC_5 = {
  AnyMuscleModel &MusMdl = ....MuscleModels.Right.ObliquusInternus.OIC_5;
  AnyRefNode &Org = ....Segments.Right.R10Seg.ObliquusExternusNode_1;
  AnyRefNode &Ins = ....Segments.PelvisSeg.Right.ObliquusInternusNode_4_1;
  viewMuscle = {#include "../DrawSettings/MusDrawSettings.any"};
  viewForce.Visible ??= Off;
};


AnyMuscleShortestPath OIC_6 = {
  AnyMuscleModel &MusMdl = ....MuscleModels.Right.ObliquusInternus.OIC_6;
  #if BM_TRUNK_THORACIC_STERNUM_TOPOLOGY == 4
    AnyRefNode &Org = ....Segments.Right.CostalCartilageSeg.ObliquusInternus_1;
  #else
    AnyRefNode &Org = ....Segments.SternalBodySeg.Right.ObliquusInternusNode_1;
  #endif
  AnyRefNode &Ins = ....Segments.PelvisSeg.Right.ObliquusInternusNode_5;
 // AnySurfTriCylMesh &mesh2 = Main.HumanModel.BodyModel.Trunk.Abdominal.Layer_L2.BaseSegAnterior.mesh;
 // AnySurfTriCylMesh &mesh3 = Main.HumanModel.BodyModel.Trunk.Abdominal.Layer_L3.BaseSegAnterior.mesh;
  //AnySurfTriCylMesh &mesh4 = Main.HumanModel.BodyModel.Trunk.Abdominal.Layer_L4.BaseSegAnterior.mesh;
 //AnySurfTriCylMesh  &mesh5 = Main.HumanModel.BodyModel.Trunk.Abdominal.Layer_L5.BaseSegAnterior.mesh;

  #if MESH_TYPE == "ELLIPSOID_SIDE"
    AnySurfEllipsoid &mesh3 = Main.HumanModel.BodyModel.Trunk.Abdominal.Layer_L3.BaseSegAnterior.Right.mesh;
  #else
    AnySurfTriCylMesh &mesh3 = Main.HumanModel.BodyModel.Trunk.Abdominal.Layer_L3.BaseSegAnterior.mesh;
  #endif

  SPLine.StringMesh=60;

  SPLine ={

  #if MESH_TYPE == "ELLIPSOID"
    AnyMatrix InitWrapPos = {
   //   transf3D({.mesh2.Radius[0],0,0}, &.mesh2),
      transf3D({.mesh3.Radius[0],0,0}, &.mesh3),
    //  transf3D({.mesh4.Radius[0],0,0}, &.mesh4),
     // transf3D({.mesh5.Radius[0],0,0}, &.mesh5),
    };
    #endif
       #if MESH_TYPE == "ELLIPSOID_SIDE"
    AnyMatrix InitWrapPos = {

      transf3D({0,.mesh3.Radius[1],0}, &.mesh3),
      //transf3D({0,.mesh4.Radius[1],0}, &.mesh4),
    };
    #endif


    #if MESH_TYPE == "QUAD"
    AnyMatrix InitWrapPos = {
     // transf3D(.mesh2.Points[floor(.mesh2.MeshSize*0.75)+2*.mesh2.MeshSize*6]+{0.02,0,0}, &.mesh2),
      transf3D(.mesh3.Points[floor(.mesh3.MeshSize*0.75)+2*.mesh3.MeshSize*6]+{0.02,0,0}, &.mesh3),
      transf3D(.mesh4.Points[floor(.mesh4.MeshSize*0.7)+2*.mesh4.MeshSize*6]+{0.02,0,0}, &.mesh4),
     // transf3D(.mesh5.Points[floor(.mesh5.MeshSize*0.65)+2*.mesh5.MeshSize*6]+{0.02,0,0}, &.mesh5)
    };
    #endif
    InitWrapPosVecArr = {&InitWrapPos};
  };
  viewMuscle = {#include "../DrawSettings/MusDrawSettings.any"};
  viewForce.Visible ??= Off;
};

AnyMuscleShortestPath OIC_7 = {
  AnyMuscleModel &MusMdl = ....MuscleModels.Right.ObliquusInternus.OIC_7;
  #if BM_TRUNK_THORACIC_STERNUM_TOPOLOGY == 4
    AnyRefNode &Org = ....Segments.Right.CostalCartilageSeg.ObliquusInternus_2;
  #else
    AnyRefNode &Org = ....Segments.SternalBodySeg.Right.ObliquusInternusNode_2;
  #endif
  AnyRefNode &Ins = ....Segments.PelvisSeg.Right.ObliquusInternusNode_5;

//  AnySurfTriCylMesh &mesh2 = Main.HumanModel.BodyModel.Trunk.Abdominal.Layer_L2.BaseSegAnterior.mesh;
//  AnySurfTriCylMesh &mesh3 = Main.HumanModel.BodyModel.Trunk.Abdominal.Layer_L3.BaseSegAnterior.mesh;
//  AnySurfTriCylMesh &mesh4 = Main.HumanModel.BodyModel.Trunk.Abdominal.Layer_L4.BaseSegAnterior.mesh;
// AnySurfTriCylMesh &mesh5 = Main.HumanModel.BodyModel.Trunk.Abdominal.Layer_L5.BaseSegAnterior.mesh;
 #if MESH_TYPE == "ELLIPSOID_SIDE"
   AnySurfEllipsoid &mesh2 = Main.HumanModel.BodyModel.Trunk.Abdominal.Layer_L2.BaseSegAnterior.Right.mesh;
   AnySurfEllipsoid &mesh3 = Main.HumanModel.BodyModel.Trunk.Abdominal.Layer_L3.BaseSegAnterior.Right.mesh;
   AnySurfEllipsoid &mesh4 = Main.HumanModel.BodyModel.Trunk.Abdominal.Layer_L4.BaseSegAnterior.Right.mesh;
 #else
    AnySurfTriCylMesh &mesh2 = Main.HumanModel.BodyModel.Trunk.Abdominal.Layer_L2.BaseSegAnterior.mesh;
    AnySurfTriCylMesh &mesh3 = Main.HumanModel.BodyModel.Trunk.Abdominal.Layer_L3.BaseSegAnterior.mesh;
    AnySurfTriCylMesh &mesh4 = Main.HumanModel.BodyModel.Trunk.Abdominal.Layer_L4.BaseSegAnterior.mesh;
  #endif


  SPLine.StringMesh=60;

  SPLine ={

   #if MESH_TYPE == "ELLIPSOID"
    AnyMatrix InitWrapPos = {
      transf3D({.mesh2.Radius[0],0,0}, &.mesh2),
      transf3D({.mesh3.Radius[0],0,0}, &.mesh3),
      transf3D({.mesh4.Radius[0],0,0}, &.mesh4),
    //  transf3D({.mesh5.Radius[0],0,0}, &.mesh5),
    };
    #endif

       #if MESH_TYPE == "ELLIPSOID_SIDE"
    AnyMatrix InitWrapPos = {
      transf3D({0,.mesh2.Radius[1],0}, &.mesh2),
      transf3D({0,.mesh3.Radius[1],0}, &.mesh3),
      transf3D({0,.mesh4.Radius[1],0}, &.mesh4),
    };
    #endif

    #if MESH_TYPE == "QUAD"
    AnyMatrix InitWrapPos = {
      transf3D(.mesh2.Points[floor(.mesh2.MeshSize*0.75)+2*.mesh2.MeshSize*6]+{0.02,0,0}, &.mesh2),
      transf3D(.mesh3.Points[floor(.mesh3.MeshSize*0.75)+2*.mesh3.MeshSize*6]+{0.02,0,0}, &.mesh3),
      transf3D(.mesh4.Points[floor(.mesh4.MeshSize*0.7)+2*.mesh4.MeshSize*6]+{0.02,0,0}, &.mesh4),
     // transf3D(.mesh5.Points[floor(.mesh5.MeshSize*0.65)+2*.mesh5.MeshSize*6]+{0.02,0,0}, &.mesh5)
    };
    #endif

    InitWrapPosVecArr = {&InitWrapPos};
  };
  viewMuscle = {#include "../DrawSettings/MusDrawSettings.any"};
  viewForce.Visible ??= Off;
};


AnyMuscleShortestPath OIC_8 = {
  AnyMuscleModel &MusMdl = ....MuscleModels.Right.ObliquusInternus.OIC_8;
  AnyRefNode &Org = ....Segments.SternalBodySeg.Xiphoid_DiaphragmNodeR;
  AnyRefNode &Via = Main.HumanModel.BodyModel.Trunk.Abdominal.Layer_L1.BaseSegAnterior.TransversusPoints.Right.nn06;

  AnyRefNode &Ins = ....Segments.PelvisSeg.Right.ObliquusInternusNode_6;

 //AnySurfTriCylMesh &mesh2 = Main.HumanModel.BodyModel.Trunk.Abdominal.Layer_L2.BaseSegAnterior.mesh;
 //AnySurfTriCylMesh &mesh3 = Main.HumanModel.BodyModel.Trunk.Abdominal.Layer_L3.BaseSegAnterior.mesh;
 //AnySurfTriCylMesh &mesh4 = Main.HumanModel.BodyModel.Trunk.Abdominal.Layer_L4.BaseSegAnterior.mesh;
// AnySurfTriCylMesh &mesh5 = Main.HumanModel.BodyModel.Trunk.Abdominal.Layer_L5.BaseSegAnterior.mesh;

 #if MESH_TYPE == "ELLIPSOID_SIDE"
   AnySurfEllipsoid &mesh2 = Main.HumanModel.BodyModel.Trunk.Abdominal.Layer_L2.BaseSegAnterior.Right.mesh;
   AnySurfEllipsoid &mesh3 = Main.HumanModel.BodyModel.Trunk.Abdominal.Layer_L3.BaseSegAnterior.Right.mesh;
   AnySurfEllipsoid &mesh4 = Main.HumanModel.BodyModel.Trunk.Abdominal.Layer_L4.BaseSegAnterior.Right.mesh;
 #else
    AnySurfTriCylMesh &mesh2 = Main.HumanModel.BodyModel.Trunk.Abdominal.Layer_L2.BaseSegAnterior.mesh;
    AnySurfTriCylMesh &mesh3 = Main.HumanModel.BodyModel.Trunk.Abdominal.Layer_L3.BaseSegAnterior.mesh;
    AnySurfTriCylMesh &mesh4 = Main.HumanModel.BodyModel.Trunk.Abdominal.Layer_L4.BaseSegAnterior.mesh;
  #endif


  SPLine.StringMesh=60;

  SPLine ={
  StringSurfaceMap={{Off,Off,Off},{On,On,On}};  //no wrap before after via

   #if MESH_TYPE == "ELLIPSOID"
    AnyMatrix InitWrapPos = {
      transf3D({.mesh2.Radius[0],0,0}, &.mesh2),
      transf3D({.mesh3.Radius[0],0,0}, &.mesh3),
      transf3D({.mesh4.Radius[0],0,0}, &.mesh4),
  //    transf3D({.mesh5.Radius[0],0,0}, &.mesh5),
    };
    #endif
       #if MESH_TYPE == "ELLIPSOID_SIDE"
    AnyMatrix InitWrapPos = {
      transf3D({0,.mesh2.Radius[1],0}, &.mesh2),
      transf3D({0,.mesh3.Radius[1],0}, &.mesh3),
      transf3D({0,.mesh4.Radius[1],0}, &.mesh4),
    };
    #endif

    #if MESH_TYPE == "QUAD"
    AnyMatrix InitWrapPos = {
       transf3D(.mesh2.Points[floor(.mesh2.MeshSize*0.8)+2*.mesh2.MeshSize*6]+{0.02,0,0}, &.mesh2),
       transf3D(.mesh3.Points[floor(.mesh3.MeshSize*0.7)+2*.mesh3.MeshSize*6]+{0.02,0,0}, &.mesh3),
      transf3D(.mesh4.Points[floor(.mesh4.MeshSize*0.6)+2*.mesh4.MeshSize*6]+{0.02,0,0}, &.mesh4),
  //    transf3D(.mesh5.Points[floor(.mesh5.MeshSize*0.6)+2*.mesh5.MeshSize*6]+{0.02,0,0}, &.mesh5)
    };

    #endif

    InitWrapPosVecArr = {None,&InitWrapPos};
  };
  viewMuscle = {#include "../DrawSettings/MusDrawSettings.any"};
  viewForce.Visible ??= Off;
};

AnyMuscleShortestPath OIC_8_extra = {
  AnyMuscleModel &MusMdl = ....MuscleModels.Right.ObliquusInternus.OIC_8;
  AnyRefNode &Org = ....Segments.SternalBodySeg.RACP_Via_2_R;
 // AnyRefNode &Via = Main.HumanModel.BodyModel.Trunk.Abdominal.Layer_L1.BaseSegAnterior.TransversusPoints.Right.nn05;

  AnyRefNode &Ins = ....Segments.PelvisSeg.Right.ObliquusInternusNode_6;
// AnySurfTriCylMesh &mesh2 = Main.HumanModel.BodyModel.Trunk.Abdominal.Layer_L2.BaseSegAnterior.mesh;
// AnySurfTriCylMesh &mesh3 = Main.HumanModel.BodyModel.Trunk.Abdominal.Layer_L3.BaseSegAnterior.mesh;
// AnySurfTriCylMesh &mesh4 = Main.HumanModel.BodyModel.Trunk.Abdominal.Layer_L4.BaseSegAnterior.mesh;
 #if MESH_TYPE == "ELLIPSOID_SIDE"
   AnySurfEllipsoid &mesh2 = Main.HumanModel.BodyModel.Trunk.Abdominal.Layer_L2.BaseSegAnterior.Right.mesh;
   AnySurfEllipsoid &mesh3 = Main.HumanModel.BodyModel.Trunk.Abdominal.Layer_L3.BaseSegAnterior.Right.mesh;
   AnySurfEllipsoid &mesh4 = Main.HumanModel.BodyModel.Trunk.Abdominal.Layer_L4.BaseSegAnterior.Right.mesh;
 #else
    AnySurfTriCylMesh &mesh2 = Main.HumanModel.BodyModel.Trunk.Abdominal.Layer_L2.BaseSegAnterior.mesh;
    AnySurfTriCylMesh &mesh3 = Main.HumanModel.BodyModel.Trunk.Abdominal.Layer_L3.BaseSegAnterior.mesh;
    AnySurfTriCylMesh &mesh4 = Main.HumanModel.BodyModel.Trunk.Abdominal.Layer_L4.BaseSegAnterior.mesh;
  #endif


SPLine.StringMesh=60;

SPLine ={
  //    SolverVersion=3;
 // StringSurfaceMap={{Off,Off,Off,Off},{On,On,On,On}};  //no wrap before after via


  #if MESH_TYPE == "ELLIPSOID"
    AnyMatrix InitWrapPos = {
      transf3D({.mesh2.Radius[0],0,0}, &.mesh2),
      transf3D({.mesh3.Radius[0],0,0}, &.mesh3),
      transf3D({.mesh4.Radius[0],0,0}, &.mesh4),
    };
    #endif
       #if MESH_TYPE == "ELLIPSOID_SIDE"
    AnyMatrix InitWrapPos = {
      transf3D({0,.mesh2.Radius[1],0}, &.mesh2),
      transf3D({0,.mesh3.Radius[1],0},&.mesh3),
      transf3D({0,.mesh4.Radius[1],0}, &.mesh4),
    };
    #endif


    #if MESH_TYPE == "QUAD"
  AnyMatrix InitWrapPos = {
    //      transf3D({0.0,2*.srf1.MajorRadius,-.srf1.MajorRadius}, &.srf1),
    //      transf3D(.mesh1.Points[52]+{0.03,0,0}, &.mesh1),
    //   transf3D(.mesh1.Points[floor(.mesh2.MeshSize*0.8)+2*.mesh2.MeshSize*4]+{0.01,0,0}, &.mesh1),
    transf3D(.mesh2.Points[floor(.mesh2.MeshSize*0.75)+2*.mesh2.MeshSize*6]+{0.02,0,0}, &.mesh2),
    transf3D(.mesh3.Points[floor(.mesh3.MeshSize*0.7)+2*.mesh3.MeshSize*6]+{0.02,0,0}, &.mesh3),
     transf3D(.mesh4.Points[floor(.mesh4.MeshSize*0.65)+2*.mesh4.MeshSize*6]+{0.02,0,0}, &.mesh4),
//     transf3D(mesh.Points[floor(.mesh.MeshSize*4]+{0.01,0,0}, &.mesh),

   //      transf3D(.mesh5.Points[floor(.mesh5.MeshSize*0.65)+2*.mesh5.MeshSize*6]+{0.02,0,0}, &.mesh5)
  };

    #endif


  InitWrapPosVecArr = {&InitWrapPos};


};
viewMuscle = {#include "../DrawSettings/MusDrawSettings.any"};
viewForce.Visible ??= Off;
};


AnyMuscleShortestPath OIC_9 = {
  AnyMuscleModel &MusMdl = ....MuscleModels.Right.ObliquusInternus.OIC_9;
  AnyRefNode &Org =      ....Abdominal.Layer_L1.BaseSegAnterior.mid;
  AnyRefNode &Ins = ....Segments.PelvisSeg.Right.ObliquusInternusNode_6;

//  AnySurfTriCylMesh &mesh2 = Main.HumanModel.BodyModel.Trunk.Abdominal.Layer_L2.BaseSegAnterior.mesh;
//  AnySurfTriCylMesh &mesh3 = Main.HumanModel.BodyModel.Trunk.Abdominal.Layer_L3.BaseSegAnterior.mesh;
 // AnySurfTriCylMesh &mesh4 = Main.HumanModel.BodyModel.Trunk.Abdominal.Layer_L4.BaseSegAnterior.mesh;
  //AnySurfTriCylMesh &mesh5 = Main.HumanModel.BodyModel.Trunk.Abdominal.Layer_L5.BaseSegAnterior.mesh;


   #if MESH_TYPE == "ELLIPSOID_SIDE"
   AnySurfEllipsoid &mesh2 = Main.HumanModel.BodyModel.Trunk.Abdominal.Layer_L2.BaseSegAnterior.Right.mesh;
   AnySurfEllipsoid &mesh3 = Main.HumanModel.BodyModel.Trunk.Abdominal.Layer_L3.BaseSegAnterior.Right.mesh;
   AnySurfEllipsoid &mesh4 = Main.HumanModel.BodyModel.Trunk.Abdominal.Layer_L4.BaseSegAnterior.Right.mesh;
 #else
    AnySurfTriCylMesh &mesh2 = Main.HumanModel.BodyModel.Trunk.Abdominal.Layer_L2.BaseSegAnterior.mesh;
    AnySurfTriCylMesh &mesh3 = Main.HumanModel.BodyModel.Trunk.Abdominal.Layer_L3.BaseSegAnterior.mesh;
    AnySurfTriCylMesh &mesh4 = Main.HumanModel.BodyModel.Trunk.Abdominal.Layer_L4.BaseSegAnterior.mesh;
  #endif


  SPLine.StringMesh=60;

  SPLine ={


    #if MESH_TYPE == "ELLIPSOID"
    AnyMatrix InitWrapPos = {
      transf3D({.mesh2.Radius[0],0,0}, &.mesh2),
      transf3D({.mesh3.Radius[0],0,0}, &.mesh3),
      transf3D({.mesh4.Radius[0],0,0}, &.mesh4),
   //   transf3D({.mesh5.Radius[0],0,0}, &.mesh5),

    };
    #endif


   #if MESH_TYPE == "ELLIPSOID_SIDE"
    AnyMatrix InitWrapPos = {
      transf3D({0,.mesh2.Radius[1],0}, &.mesh2),
      transf3D({0,.mesh3.Radius[1],0}, &.mesh3),
      transf3D({0,.mesh4.Radius[1],0}, &.mesh4),
    };
    #endif


    #if MESH_TYPE == "QUAD"
    AnyMatrix InitWrapPos = {
      transf3D(.mesh2.Points[floor(.mesh2.MeshSize*0.75)+2*.mesh2.MeshSize*6]+{0.02,0,0}, &.mesh2),
      transf3D(.mesh3.Points[floor(.mesh3.MeshSize*0.7) +2*.mesh3.MeshSize*6]+{0.02,0,0}, &.mesh3),
      transf3D(.mesh4.Points[floor(.mesh4.MeshSize*0.65)+2*.mesh4.MeshSize*6]+{0.02,0,0}, &.mesh4),
   //   transf3D(.mesh5.Points[floor(.mesh5.MeshSize*0.6) +2*.mesh5.MeshSize*6]+{0.02,0,0}, &.mesh5)
    };
    #endif

    InitWrapPosVecArr = {&InitWrapPos};
  };

  viewMuscle = {#include "../DrawSettings/MusDrawSettings.any"};
  viewForce.Visible ??= Off;

};


AnyMuscleShortestPath OIC_10 = {
  AnyMuscleModel &MusMdl = ....MuscleModels.Right.ObliquusInternus.OIC_10;
  AnyRefNode &Org =      ....Abdominal.Layer_L2.BaseSegAnterior.mid;
  AnyRefNode &Ins = ....Segments.PelvisSeg.Right.ObliquusInternusNode_6;

//  AnySurfTriCylMesh &mesh3 = Main.HumanModel.BodyModel.Trunk.Abdominal.Layer_L3.BaseSegAnterior.mesh;
//  AnySurfTriCylMesh &mesh4 = Main.HumanModel.BodyModel.Trunk.Abdominal.Layer_L4.BaseSegAnterior.mesh;
//  AnySurfTriCylMesh &mesh5 = Main.HumanModel.BodyModel.Trunk.Abdominal.Layer_L5.BaseSegAnterior.mesh;

   #if MESH_TYPE == "ELLIPSOID_SIDE"
   AnySurfEllipsoid &mesh3 = Main.HumanModel.BodyModel.Trunk.Abdominal.Layer_L3.BaseSegAnterior.Right.mesh;
   AnySurfEllipsoid &mesh4 = Main.HumanModel.BodyModel.Trunk.Abdominal.Layer_L4.BaseSegAnterior.Right.mesh;
   AnySurfEllipsoid &mesh5 = Main.HumanModel.BodyModel.Trunk.Abdominal.Layer_L5.BaseSegAnterior.Right.mesh;

   #else
    AnySurfTriCylMesh &mesh3 = Main.HumanModel.BodyModel.Trunk.Abdominal.Layer_L3.BaseSegAnterior.mesh;
    AnySurfTriCylMesh &mesh4 = Main.HumanModel.BodyModel.Trunk.Abdominal.Layer_L4.BaseSegAnterior.mesh;
    AnySurfTriCylMesh &mesh5 = Main.HumanModel.BodyModel.Trunk.Abdominal.Layer_L5.BaseSegAnterior.mesh;

    #endif


  SPLine.StringMesh=60;


  SPLine ={


    #if MESH_TYPE == "ELLIPSOID"
    AnyMatrix InitWrapPos = {

      transf3D({.mesh3.Radius[0],0,0}, &.mesh3),
      transf3D({.mesh4.Radius[0],0,0}, &.mesh4),
      transf3D({.mesh5.Radius[0],0,0}, &.mesh5),

    };
    #endif


  #if MESH_TYPE == "ELLIPSOID_SIDE"
    AnyMatrix InitWrapPos = {
           transf3D({0,.mesh3.Radius[1],0}, &.mesh3),
            transf3D({0,.mesh4.Radius[1],0}, &.mesh4),
            transf3D({0,.mesh5.Radius[1],0}, &.mesh5),

          };
    #endif


    #if MESH_TYPE == "QUAD"
    AnyMatrix InitWrapPos = {

      transf3D(.mesh3.Points[floor(.mesh3.MeshSize*0.75)+2*.mesh3.MeshSize*6]+{0.02,0,0}, &.mesh3),
      transf3D(.mesh4.Points[floor(.mesh4.MeshSize*0.7)+2*.mesh4.MeshSize*6]+{0.02,0,0}, &.mesh4),
      transf3D(.mesh5.Points[floor(.mesh5.MeshSize*0.65)+2*.mesh5.MeshSize*6]+{0.02,0,0}, &.mesh5)
    };
    #endif


    InitWrapPosVecArr = {&InitWrapPos};
  };

  viewMuscle = {#include "../DrawSettings/MusDrawSettings.any"};
  viewForce.Visible ??= Off;
};


//

AnyMuscleShortestPath OIC_11 = {
  AnyMuscleModel &MusMdl = ....MuscleModels.Right.ObliquusInternus.OIC_11;
  AnyRefNode &Org = ....Abdominal.Layer_L3.BaseSegAnterior.mid;
  AnyRefNode &Ins = ....Segments.PelvisSeg.Right.ObliquusInternusNode_7;

  //  AnyParamSurf &srf1 =....Abdominal.ObliquusWrapping.WrappingSeg.Layer4WrappingPoints.Right.nn11.Translate.InwardCyl;
  //  AnyParamSurf &srf2 =....Abdominal.ObliquusWrapping.WrappingSeg.Layer5WrappingPoints.Right.nn08.Translate.InwardCyl;
//  AnySurfTriCylMesh &mesh4 = Main.HumanModel.BodyModel.Trunk.Abdominal.Layer_L4.BaseSegAnterior.mesh;
//  AnySurfTriCylMesh &mesh5 = Main.HumanModel.BodyModel.Trunk.Abdominal.Layer_L5.BaseSegAnterior.mesh;

 #if MESH_TYPE == "ELLIPSOID_SIDE"
   AnySurfEllipsoid &mesh4 = Main.HumanModel.BodyModel.Trunk.Abdominal.Layer_L4.BaseSegAnterior.Right.mesh;
   AnySurfEllipsoid &mesh5 = Main.HumanModel.BodyModel.Trunk.Abdominal.Layer_L5.BaseSegAnterior.Right.mesh;

   #else
    AnySurfTriCylMesh &mesh4 = Main.HumanModel.BodyModel.Trunk.Abdominal.Layer_L4.BaseSegAnterior.mesh;
    AnySurfTriCylMesh &mesh5 = Main.HumanModel.BodyModel.Trunk.Abdominal.Layer_L5.BaseSegAnterior.mesh;

    #endif


  SPLine.StringMesh=60;

  SPLine ={


    #if MESH_TYPE == "ELLIPSOID"
    AnyMatrix InitWrapPos = {

      transf3D({.mesh4.Radius[0],0,0}, &.mesh4),
      transf3D({.mesh5.Radius[0],0,0}, &.mesh5),

    };
    #endif

       #if MESH_TYPE == "ELLIPSOID_SIDE"
    AnyMatrix InitWrapPos = {
           transf3D({0,.mesh4.Radius[1],0}, &.mesh4),
            transf3D({0,.mesh5.Radius[1],0}, &.mesh5),
    };
    #endif

    #if MESH_TYPE == "QUAD"
    AnyMatrix InitWrapPos = {

      transf3D(.mesh4.Points[floor(.mesh4.MeshSize*0.75)+2*.mesh4.MeshSize*6]+{0.02,0,0}, &.mesh4),
      transf3D(.mesh5.Points[floor(.mesh5.MeshSize*0.65)+2*.mesh5.MeshSize*6]+{0.02,0,0}, &.mesh5)
    };

    #endif


    InitWrapPosVecArr = {&InitWrapPos};
  };
  viewMuscle = {#include "../DrawSettings/MusDrawSettings.any"};
  viewForce.Visible ??= Off;
};


AnyMuscleShortestPath OIC_12 = {
  AnyMuscleModel &MusMdl = ....MuscleModels.Right.ObliquusInternus.OIC_12;
  AnyRefNode &Org =      ....Abdominal.Layer_L4.BaseSegAnterior.mid;
  AnyRefNode &Ins = ....Segments.PelvisSeg.Right.ObliquusInternusNode_7;


//  AnySurfTriCylMesh &mesh5 = Main.HumanModel.BodyModel.Trunk.Abdominal.Layer_L5.BaseSegAnterior.mesh;

   #if MESH_TYPE == "ELLIPSOID_SIDE"
   AnySurfEllipsoid &mesh5 = Main.HumanModel.BodyModel.Trunk.Abdominal.Layer_L5.BaseSegAnterior.Right.mesh;

   #else
    AnySurfTriCylMesh &mesh5 = Main.HumanModel.BodyModel.Trunk.Abdominal.Layer_L5.BaseSegAnterior.mesh;

    #endif


  SPLine.StringMesh=60;

  SPLine ={


    #if MESH_TYPE == "ELLIPSOID"
    AnyMatrix InitWrapPos = {
      transf3D({.mesh5.Radius[0],0,0}, &.mesh5),
    };
    #endif
       #if MESH_TYPE == "ELLIPSOID_SIDE"
    AnyMatrix InitWrapPos = {
      transf3D({0,.mesh5.Radius[1],0}, &.mesh5),
    };
    #endif


    #if MESH_TYPE == "QUAD"
    AnyMatrix InitWrapPos = {

      transf3D(.mesh5.Points[floor(.mesh5.MeshSize*0.65)+2*.mesh5.MeshSize*6]+{0.02,0,0}, &.mesh5)
    };

    #endif


    InitWrapPosVecArr = {&InitWrapPos};
  };

  viewMuscle = {#include "../DrawSettings/MusDrawSettings.any"};
  viewForce.Visible ??= Off;
};

AnyMuscleViaPoint  OIC_13= {
  AnyMuscleModel &MusMdl = ....MuscleModels.Right.ObliquusInternus.OIC_13;
  AnyRefNode &Org = ....Abdominal.Layer_L5.BaseSegAnterior.mid;
  AnyRefNode &Ins = ....Segments.PelvisSeg.Right.ObliquusInternusNode_8;

  //  AnySurfTriCylMesh &mesh5 = Main.HumanModel.BodyModel.Trunk.Abdominal.Layer_L5.BaseSegAnterior.mesh;
  //
  //  SPLine.StringMesh=60;
  //
  //  SPLine ={
  //    AnyMatrix InitWrapPos = {
  //      transf3D(.mesh5.Points[floor(.mesh5.MeshSize*0.65)+2*.mesh5.MeshSize*4]+{0.01,0,0}, &.mesh5)
  //
  //    };
  //    InitWrapPosVecArr = {&InitWrapPos};
  //  };
  //
  viewMuscle = {#include "../DrawSettings/MusDrawSettings.any"};
  viewForce.Visible ??= Off;
};
#endif


#endif

#if BM_TRUNK_CAVITY_MODEL == _CAVITY_MODEL_BUCKLE_
AnyMuscleViaPoint OIC_1 = {
  AnyMuscleModel &MusMdl = ....MuscleModels.Right.ObliquusInternus.OIC_1;
  AnyRefNode &Org = ....Segments.Right.R11Seg.ObliquusInternusNode;
  AnyRefNode &Ins = ....Segments.PelvisSeg.Right.ObliquusInternusNode_1;
  viewMuscle = {#include "../DrawSettings/MusDrawSettings.any"};
  viewForce.Visible ??= Off;
};

AnyMuscleViaPoint OIC_2 = {
  AnyMuscleModel &MusMdl = ....MuscleModels.Right.ObliquusInternus.OIC_2;
  AnyRefNode &Org = ....Segments.Right.R10Seg.ObliquusInternusNode_2;
  AnyRefNode &Ins = ....Segments.PelvisSeg.Right.ObliquusInternusNode_2;
  viewMuscle = {#include "../DrawSettings/MusDrawSettings.any"};
  viewForce.Visible ??= Off;
};

AnyMuscleViaPoint OIC_3 = {
  AnyMuscleModel &MusMdl = ....MuscleModels.Right.ObliquusInternus.OIC_3;
  AnyRefNode &Org = ....Segments.Right.R10Seg.ObliquusInternusNode_1;
  AnyRefNode &Ins = ....Segments.PelvisSeg.Right.ObliquusInternusNode_3;
  viewMuscle = {#include "../DrawSettings/MusDrawSettings.any"};
  viewForce.Visible ??= Off;
};

AnyMuscleViaPoint OIC_4 = {
  AnyMuscleModel &MusMdl = ....MuscleModels.Right.ObliquusInternus.OIC_4;
  AnyRefNode &Org = ....Segments.SternalBodySeg.Right.ObliquusInternusNode_1;
  AnyRefNode &Ins = ....Segments.PelvisSeg.Right.ObliquusInternusNode_4;
  viewMuscle = {#include "../DrawSettings/MusDrawSettings.any"};
  viewForce.Visible ??= Off;
};

AnyMuscleViaPoint OIC_5 = {
  AnyMuscleModel &MusMdl = ....MuscleModels.Right.ObliquusInternus.OIC_5;
  AnyRefNode &Org = ....Segments.SternalBodySeg.Right.ObliquusInternusNode_2;
  AnyRefNode &Ins = ....Segments.PelvisSeg.Right.ObliquusInternusNode_5;
  viewMuscle = {#include "../DrawSettings/MusDrawSettings.any"};
  viewForce.Visible ??= Off;
};

AnyMuscleViaPoint OIC_6 = {
  AnyMuscleModel &MusMdl = ....MuscleModels.Right.ObliquusInternus.OIC_6;
  AnyRefNode &Org = ....Buckle.Segments.BuckleSeg.Right.ObliquusInternusNode_1;
  AnyRefNode &Ins = ....Segments.PelvisSeg.Right.ObliquusInternusNode_6;
  viewMuscle = {#include "../DrawSettings/MusDrawSettings.any"};
  viewForce.Visible ??= Off;
};

AnyMuscleViaPoint OIC_7 = {
  AnyMuscleModel &MusMdl = ....MuscleModels.Right.ObliquusInternus.OIC_7;
  AnyRefNode &Org = ....Buckle.Segments.BuckleSeg.Right.ObliquusInternusNode_2;
  AnyRefNode &Ins = ....Segments.PelvisSeg.Right.ObliquusInternusNode_7;
  viewMuscle = {#include "../DrawSettings/MusDrawSettings.any"};
  viewForce.Visible ??= Off;
};

AnyMuscleViaPoint OIC_8 = {
  AnyMuscleModel &MusMdl = ....MuscleModels.Right.ObliquusInternus.OIC_8;
  AnyRefNode &Org = ....Buckle.Segments.BuckleSeg.Right.ObliquusInternusNode_3;
  AnyRefNode &Ins = ....Segments.PelvisSeg.Right.ObliquusInternusNode_8;
  viewMuscle = {#include "../DrawSettings/MusDrawSettings.any"};
  viewForce.Visible ??= Off;
};

AnyMuscleViaPoint OIC_9 = {
  AnyMuscleModel &MusMdl = ....MuscleModels.Right.ObliquusInternus.OIC_9;
  AnyRefNode &Org = ....Buckle.Segments.BuckleSeg.Right.ObliquusInternusNode_4;
  AnyRefNode &Ins = ....Segments.PelvisSeg.Right.ObliquusInternusNode_9;
  viewMuscle = {#include "../DrawSettings/MusDrawSettings.any"};
  viewForce.Visible ??= Off;
};

AnyMuscleViaPoint OIC_10 = {
  AnyMuscleModel &MusMdl = ....MuscleModels.Right.ObliquusInternus.OIC_10;
  AnyRefNode &Org = ....Buckle.Segments.BuckleSeg.Right.ObliquusInternusNode_5;
  AnyRefNode &Ins = ....Segments.PelvisSeg.Right.ObliquusInternusNode_10;
  viewMuscle = {#include "../DrawSettings/MusDrawSettings.any"};
  viewForce.Visible ??= Off;
};
#endif
};

// Psoas is separated since it is used by the legs in certain BM configurations
#include "PsoasMajorRight.any"

MuscleGroup QuadratusLumborum = {
  AnyMuscleViaPoint QLC12Lat_CILat = {
    AnyMuscleModel &MusMdl = ....MuscleModels.Right.QuadratusLumborum.QL_1;
    AnyRefNode &Org = ....Segments.Right.R12Seg.QLC12Lat_CINode1R;
    AnyRefNode &Ins = ....Segments.PelvisSeg.QLLatNode1R;
    viewMuscle = {#include "../DrawSettings/MusDrawSettings.any"};
    viewForce.Visible ??= Off;
  };
  AnyMuscleViaPoint QLC12InterMedian_CILat = {
    AnyMuscleModel &MusMdl = ....MuscleModels.Right.QuadratusLumborum.QL_2;
    AnyRefNode &Org = ....Segments.Right.R12Seg.QLC12Lat_CINode3R;
    AnyRefNode &Ins = ....Segments.PelvisSeg.QLLatNode2R;
    viewMuscle = {#include "../DrawSettings/MusDrawSettings.any"};


  };
  AnyMuscleViaPoint QLC12Median_CILat = {
    AnyMuscleModel &MusMdl = ....MuscleModels.Right.QuadratusLumborum.QL_3;
    AnyRefNode &Org = ....Segments.Right.R12Seg.QLC12InterMedian_CINode1R;
    AnyRefNode &Ins = ....Segments.PelvisSeg.QLLatNode3R;
    viewMuscle = {#include "../DrawSettings/MusDrawSettings.any"};


  };

  AnyMuscleViaPoint QLC12InterMedian_CIInterMedian = {
    AnyMuscleModel &MusMdl = ....MuscleModels.Right.QuadratusLumborum.QL_4;
    AnyRefNode &Org = ....Segments.Right.R12Seg.QLC12InterMedian_CINode3R;
    AnyRefNode &Ins = ....Segments.PelvisSeg.QLLatNode5R;
    viewMuscle = {#include "../DrawSettings/MusDrawSettings.any"};


  };
  AnyMuscleViaPoint QLC12Median_CIInterMedian = {
    AnyMuscleModel &MusMdl = ....MuscleModels.Right.QuadratusLumborum.QL_5;
    AnyRefNode &Org = ....Segments.Right.R12Seg.QLC12Median_CINode1R;
    AnyRefNode &Ins = ....Segments.PelvisSeg.QLInterMedianNode1R;
    viewMuscle = {#include "../DrawSettings/MusDrawSettings.any"};


  };

  AnyMuscleViaPoint QLT12_CILat = {
    AnyMuscleModel &MusMdl = ....MuscleModels.Right.QuadratusLumborum.QL_6;
    AnyRefNode &Org = ....Segments.T12Seg.QLT12_CINodeR;
    AnyRefNode &Ins = ....Segments.PelvisSeg.QLLatNode3R;
    viewMuscle = {#include "../DrawSettings/MusDrawSettings.any"};


  };

  AnyMuscleViaPoint QLL1_CILat = {
    AnyMuscleModel &MusMdl = ....MuscleModels.Right.QuadratusLumborum.QL_7;
    AnyRefNode &Org = ....Segments.L1Seg.QLL1_CINodeR;
    AnyRefNode &Ins = ....Segments.PelvisSeg.QLLatNode4R;
    viewMuscle = {#include "../DrawSettings/MusDrawSettings.any"};
    viewForce.Visible ??= Off;
  };

  AnyMuscleViaPoint QLL2_CILat = {
    AnyMuscleModel &MusMdl = ....MuscleModels.Right.QuadratusLumborum.QL_8;
    AnyRefNode &Org = ....Segments.L2Seg.QLL2_CINodeR;
    AnyRefNode &Ins = ....Segments.PelvisSeg.QLLatNode4R;
    viewMuscle = {#include "../DrawSettings/MusDrawSettings.any"};
    viewForce.Visible ??= Off;
  };

  AnyMuscleViaPoint QLL3_CILat = {
    AnyMuscleModel &MusMdl = ....MuscleModels.Right.QuadratusLumborum.QL_9;
    AnyRefNode &Org = ....Segments.L3Seg.QLL3_CINodeR;
    AnyRefNode &Ins = ....Segments.PelvisSeg.QLLatNode5R;
    viewMuscle = {#include "../DrawSettings/MusDrawSettings.any"};
    viewForce.Visible ??= Off;
  };

  AnyMuscleViaPoint QLT12_CIInterMedian = {
    AnyMuscleModel &MusMdl = ....MuscleModels.Right.QuadratusLumborum.QL_10;
    AnyRefNode &Org = ....Segments.T12Seg.QLT12_CINodeR;
    AnyRefNode &Ins = ....Segments.PelvisSeg.QLInterMedianNode1R;
    viewMuscle = {#include "../DrawSettings/MusDrawSettings.any"};


  };

  AnyMuscleViaPoint QLL1_CIInterMedian = {
    AnyMuscleModel &MusMdl = ....MuscleModels.Right.QuadratusLumborum.QL_11;
    AnyRefNode &Org = ....Segments.L1Seg.QLL1_CINodeR;
    AnyRefNode &Ins = ....Segments.PelvisSeg.QLInterMedianNode2R;
    viewMuscle = {#include "../DrawSettings/MusDrawSettings.any"};


  };

  AnyMuscleViaPoint QLL2_CIInterMedian = {
    AnyMuscleModel &MusMdl = ....MuscleModels.Right.QuadratusLumborum.QL_12;
    AnyRefNode &Org = ....Segments.L2Seg.QLL2_CINodeR;
    AnyRefNode &Ins = ....Segments.PelvisSeg.QLInterMedianNode2R;
    viewMuscle = {#include "../DrawSettings/MusDrawSettings.any"};


  };

  AnyMuscleViaPoint QLL3_CIInterMedian = {
    AnyMuscleModel &MusMdl = ....MuscleModels.Right.QuadratusLumborum.QL_13;
    AnyRefNode &Org = ....Segments.L3Seg.QLL3_CINodeR;
    AnyRefNode &Ins = ....Segments.PelvisSeg.QLInterMedianNode3R;
    viewMuscle = {#include "../DrawSettings/MusDrawSettings.any"};


  };

  AnyMuscleViaPoint QLL4_CIInterMedian = {
    AnyMuscleModel &MusMdl = ....MuscleModels.Right.QuadratusLumborum.QL_14;
    AnyRefNode &Org = ....Segments.L4Seg.QLL4_CINodeR;
    AnyRefNode &Ins = ....Segments.PelvisSeg.QLInterMedianNode3R;
    viewMuscle = {#include "../DrawSettings/MusDrawSettings.any"};
    viewForce.Visible ??= Off;
  };

  AnyMuscleViaPoint QLT12_CIMedian = {
    AnyMuscleModel &MusMdl = ....MuscleModels.Right.QuadratusLumborum.QL_15;
    AnyRefNode &Org = ....Segments.T12Seg.QLT12_CINodeR;
    AnyRefNode &Ins = ....Segments.PelvisSeg.QLInterMedianNode4R;
    viewMuscle = {#include "../DrawSettings/MusDrawSettings.any"};


  };

  AnyMuscleViaPoint QLL1_CIMedian = {
    AnyMuscleModel &MusMdl = ....MuscleModels.Right.QuadratusLumborum.QL_16;
    AnyRefNode &Org = ....Segments.L1Seg.QLL1_CINodeR;
    AnyRefNode &Ins = ....Segments.PelvisSeg.QLInterMedianNode4R;
    viewMuscle = {#include "../DrawSettings/MusDrawSettings.any"};


  };

  AnyMuscleViaPoint QLL2_CIMedian = {
    AnyMuscleModel &MusMdl = ....MuscleModels.Right.QuadratusLumborum.QL_17;
    AnyRefNode &Org = ....Segments.L2Seg.QLL2_CINodeR;
    AnyRefNode &Ins = ....Segments.PelvisSeg.QLInterMedianNode5R;
    viewMuscle = {#include "../DrawSettings/MusDrawSettings.any"};


  };

  AnyMuscleViaPoint QLL3_CIMedian = {
    AnyMuscleModel &MusMdl = ....MuscleModels.Right.QuadratusLumborum.QL_18;
    AnyRefNode &Org = ....Segments.L3Seg.QLL3_CINodeR;
    AnyRefNode &Ins = ....Segments.PelvisSeg.QLInterMedianNode5R;
    viewMuscle = {#include "../DrawSettings/MusDrawSettings.any"};


  };

  AnyMuscleViaPoint QLL4_CIMedian = {
    AnyMuscleModel &MusMdl = ....MuscleModels.Right.QuadratusLumborum.QL_19;
    AnyRefNode &Org = ....Segments.L4Seg.QLL4_CINodeR;
    AnyRefNode &Ins = ....Segments.PelvisSeg.QLMedianNodeR;
    viewMuscle = {#include "../DrawSettings/MusDrawSettings.any"};


  };

  AnyMuscleViaPoint QLC12Lat_L4 = {
    AnyMuscleModel &MusMdl = ....MuscleModels.Right.QuadratusLumborum.QL_20;
    AnyRefNode &Org = ....Segments.L4Seg.QLL4_CINodeR;
    AnyRefNode &Ins = ....Segments.Right.R12Seg.QLC12Lat_CINode2R;
    viewMuscle = {#include "../DrawSettings/MusDrawSettings.any"};


  };
  AnyMuscleViaPoint QLC12Lat_L3 = {
    AnyMuscleModel &MusMdl = ....MuscleModels.Right.QuadratusLumborum.QL_21;
    AnyRefNode &Org = ....Segments.L3Seg.QLL3_CINodeR;
    AnyRefNode &Ins = ....Segments.Right.R12Seg.QLC12Lat_CINode4R;
    viewMuscle = {#include "../DrawSettings/MusDrawSettings.any"};


  };
  AnyMuscleViaPoint QLC12Lat_L2 = {
    AnyMuscleModel &MusMdl = ....MuscleModels.Right.QuadratusLumborum.QL_22;
    AnyRefNode &Org = ....Segments.L2Seg.QLL2_CINodeR;
    AnyRefNode &Ins = ....Segments.Right.R12Seg.QLC12Lat_CINode5R;
    viewMuscle = {#include "../DrawSettings/MusDrawSettings.any"};


  };

  AnyMuscleViaPoint QLC12InterMedian_L4 = {
    AnyMuscleModel &MusMdl = ....MuscleModels.Right.QuadratusLumborum.QL_23;
    AnyRefNode &Org = ....Segments.L4Seg.QLL4_CINodeR;
    AnyRefNode &Ins = ....Segments.Right.R12Seg.QLC12InterMedian_CINode2R;
    viewMuscle = {#include "../DrawSettings/MusDrawSettings.any"};


  };
  AnyMuscleViaPoint QLC12InterMedian_L3 = {
    AnyMuscleModel &MusMdl = ....MuscleModels.Right.QuadratusLumborum.QL_24;
    AnyRefNode &Org = ....Segments.L3Seg.QLL3_CINodeR;
    AnyRefNode &Ins = ....Segments.Right.R12Seg.QLC12InterMedian_CINode4R;
    viewMuscle = {#include "../DrawSettings/MusDrawSettings.any"};


  };
  AnyMuscleViaPoint QLC12InterMedian_L2 = {
    AnyMuscleModel &MusMdl = ....MuscleModels.Right.QuadratusLumborum.QL_25;
    AnyRefNode &Org = ....Segments.L2Seg.QLL2_CINodeR;
    AnyRefNode &Ins = ....Segments.Right.R12Seg.QLC12InterMedian_CINode5R;
    viewMuscle = {#include "../DrawSettings/MusDrawSettings.any"};


  };

  AnyMuscleViaPoint QLC12Median_L4 = {
    AnyMuscleModel &MusMdl = ....MuscleModels.Right.QuadratusLumborum.QL_26;
    AnyRefNode &Org = ....Segments.L4Seg.QLL4_CINodeR;
    AnyRefNode &Ins = ....Segments.Right.R12Seg.QLC12Median_CINode2R;
    viewMuscle = {#include "../DrawSettings/MusDrawSettings.any"};


  };
  AnyMuscleViaPoint QLC12Median_L3 = {
    AnyMuscleModel &MusMdl = ....MuscleModels.Right.QuadratusLumborum.QL_27;
    AnyRefNode &Org = ....Segments.L3Seg.QLL3_CINodeR;
    AnyRefNode &Ins = ....Segments.Right.R12Seg.QLC12Median_CINode3R;
    viewMuscle = {#include "../DrawSettings/MusDrawSettings.any"};


  };
  AnyMuscleViaPoint QLC12Median_L2 = {
    AnyMuscleModel &MusMdl = ....MuscleModels.Right.QuadratusLumborum.QL_28;
    AnyRefNode &Org = ....Segments.L2Seg.QLL2_CINodeR;
    AnyRefNode &Ins = ....Segments.Right.R12Seg.QLC12Median_CINode4R;
    viewMuscle = {#include "../DrawSettings/MusDrawSettings.any"};


  };

};
MuscleGroup RectusAbdominis = {

  #if BM_TRUNK_CAVITY_MODEL == _CAVITY_MODEL_BUCKLE_

  AnyMuscleViaPoint RA_1= {
    AnyMuscleModel &MusMdl = ....MuscleModels.Right.RectusAbdominis.RA_1;
    AnyRefNode &Org = ....Segments.SternalBodySeg.RACP_CO6_2_R;
    AnyRefNode& Via3 = ....Segments.PelvisSeg.RA_1_ViaR;
    AnyRefNode &Ins = ....Segments.PelvisSeg.RA_1_R;
    viewMuscle = {#include "../DrawSettings/MusDrawSettings.any"};
    viewForce.Visible ??= Off;
  };

  AnyMuscleViaPoint RA_2 = {
    AnyMuscleModel &MusMdl = ....MuscleModels.Right.RectusAbdominis.RA_2;
    AnyRefNode &Org = ....Segments.SternalBodySeg.RACP_CO5_2_R;
    AnyRefNode &Via1 = ....Segments.SternalBodySeg.RACP_Via_2_R;
    AnyRefNode& Via3 = ....Segments.PelvisSeg.RA_2_ViaR;
    AnyRefNode &Ins = ....Segments.PelvisSeg.RA_2_R;
    viewMuscle = {#include "../DrawSettings/MusDrawSettings.any"};
    viewForce.Visible ??= Off;
  };
  #endif

  #if BM_TRUNK_CAVITY_MODEL == _CAVITY_MODEL_VOLUME_

  #if BM_TRUNK_EXPERIMENTAL_RECTUS_ABDOMINIS == ON


  #if RECTUS_MUSCLE_LINE == SP

   AnyMuscleShortestPath RA_1 = {
    AnyRefNode &Org = ....Segments.SternalBodySeg.RACP_CO6_2_R;

    AnySurfEllipsoid &mesh1 = Main.HumanModel.BodyModel.Trunk.Abdominal.Layer_L1.BaseSegAnterior.mesh;
    AnySurfEllipsoid &mesh2 = Main.HumanModel.BodyModel.Trunk.Abdominal.Layer_L2.BaseSegAnterior.mesh;
    AnySurfEllipsoid &mesh3 = Main.HumanModel.BodyModel.Trunk.Abdominal.Layer_L3.BaseSegAnterior.mesh;
    AnySurfEllipsoid &mesh4 = Main.HumanModel.BodyModel.Trunk.Abdominal.Layer_L4.BaseSegAnterior.mesh;
    AnySurfEllipsoid &mesh5 = Main.HumanModel.BodyModel.Trunk.Abdominal.Layer_L5.BaseSegAnterior.mesh;


     SPLine.StringMesh=100;
    SPLine ={
      AnyMatrix InitWrapPos = {
        transf3D({.mesh1.Radius,0,0}, &.mesh1),
        transf3D({.mesh2.Radius,0,0}, &.mesh2),
        transf3D({.mesh3.Radius,0,0}, &.mesh3),
        transf3D({.mesh4.Radius,0,0}, &.mesh4),
        transf3D({.mesh5.Radius,0,0}, &.mesh5),
      };
    };


    AnyRefNode &Ins = ....Segments.PelvisSeg.RA_1_R;
    viewMuscle = {#include "../DrawSettings/MusDrawSettings.any"};
    viewForce.Visible ??= Off;
    AnyMuscleModel& MusMdl = ....MuscleModels.Right.RectusAbdominis.RA_1;
  };

  AnyMuscleViaPoint RA_2_1 = {
    AnyRefNode &Org = ....Segments.SternalBodySeg.RACP_CO5_2_R;
    #if BM_TRUNK_THORACIC_STERNUM_TOPOLOGY == 4
    AnyRefNode &Via1 = ....Segments.Right.CostalCartilageSeg.RACP_Via_2_R;
    #else
    AnyRefNode &Via1 = ....Segments.SternalBodySeg.RACP_Via_2_R;
    #endif
    AnyRefNode &Ins = ....Abdominal.Layer_L1.BaseSegAnterior.rectus2R;
    viewMuscle = {#include "../DrawSettings/MusDrawSettings.any"};
    viewForce.Visible ??= Off;
    /// The rectus abdominis in the cavity model needs use simple muscle models
    /// since the muscle is attached between the abdominal layers which leads to
    /// short muscle length.
    AnyMuscleModel MusMdl = {
      Lf0 = .....MuscleModels.Right.RectusAbdominis.RA_2.Lf0/6;
      Vol0 = .....MuscleModels.Right.RectusAbdominis.RA_2.Vol0/6;
      F0 =  .....MuscleModels.Right.RectusAbdominis.RA_2.F0;
    };
  };

  AnyMuscleViaPoint RA_2_2 = {
    AnyRefNode &Org = ....Abdominal.Layer_L1.BaseSegAnterior.rectus2R;
    AnyRefNode &Ins = ....Abdominal.Layer_L2.BaseSegAnterior.rectus2R;
    viewMuscle = {#include "../DrawSettings/MusDrawSettings.any"};
    viewForce.Visible ??= Off;
    /// The rectus abdominis in the cavity model needs use simple muscle models
    /// since the muscle is attached between the abdominal layers which leads to
    /// short muscle length.
    AnyMuscleModel MusMdl = {
      Lf0 = .....MuscleModels.Right.RectusAbdominis.RA_2.Lf0/6;
      Vol0 = .....MuscleModels.Right.RectusAbdominis.RA_2.Vol0/6;
      F0 =  .....MuscleModels.Right.RectusAbdominis.RA_2.F0;
    };
  };

  AnyMuscleViaPoint RA_2_3 = {
    AnyRefNode &Org = ....Abdominal.Layer_L2.BaseSegAnterior.rectus2R;
    AnyRefNode &Ins = ....Abdominal.Layer_L3.BaseSegAnterior.rectus2R;
    viewMuscle = {#include "../DrawSettings/MusDrawSettings.any"};
    viewForce.Visible ??= Off;
    /// The rectus abdominis in the cavity model needs use simple muscle models
    /// since the muscle is attached between the abdominal layers which leads to
    /// short muscle length.
    AnyMuscleModel MusMdl = {
      Lf0 = .....MuscleModels.Right.RectusAbdominis.RA_2.Lf0/6;
      Vol0 = .....MuscleModels.Right.RectusAbdominis.RA_2.Vol0/6;
      F0 =  .....MuscleModels.Right.RectusAbdominis.RA_2.F0;
    };
  };

  AnyMuscleViaPoint RA_2_4 = {
    AnyRefNode &Org = ....Abdominal.Layer_L3.BaseSegAnterior.rectus2R;
    AnyRefNode &Ins = ....Abdominal.Layer_L4.BaseSegAnterior.rectus2R;
    viewMuscle = {#include "../DrawSettings/MusDrawSettings.any"};
    viewForce.Visible ??= Off;
    /// The rectus abdominis in the cavity model needs use simple muscle models
    /// since the muscle is attached between the abdominal layers which leads to
    /// short muscle length.
    AnyMuscleModel MusMdl = {
      Lf0 = .....MuscleModels.Right.RectusAbdominis.RA_2.Lf0/6;
      Vol0 = .....MuscleModels.Right.RectusAbdominis.RA_2.Vol0/6;
      F0 =  .....MuscleModels.Right.RectusAbdominis.RA_2.F0;
    };
  };

  AnyMuscleViaPoint RA_2_5 = {
    AnyRefNode &Org = ....Abdominal.Layer_L4.BaseSegAnterior.rectus2R;
    AnyRefNode &Ins = ....Abdominal.Layer_L5.BaseSegAnterior.rectus2R;
    viewMuscle = {#include "../DrawSettings/MusDrawSettings.any"};
    viewForce.Visible ??= Off;
    /// The rectus abdominis in the cavity model needs use simple muscle models
    /// since the muscle is attached between the abdominal layers which leads to
    /// short muscle length.
    AnyMuscleModel MusMdl = {
      Lf0 = .....MuscleModels.Right.RectusAbdominis.RA_2.Lf0/6;
      Vol0 = .....MuscleModels.Right.RectusAbdominis.RA_2.Vol0/6;
      F0 =  .....MuscleModels.Right.RectusAbdominis.RA_2.F0;
    };
  };

  AnyMuscleViaPoint RA_2_6 = {
    AnyRefNode &Org = ....Abdominal.Layer_L5.BaseSegAnterior.rectus2R;
    AnyRefNode &Ins = ....Segments.PelvisSeg.RA_2_R;
    viewMuscle = {#include "../DrawSettings/MusDrawSettings.any"};
    viewForce.Visible ??= Off;
    /// The rectus abdominis in the cavity model needs use simple muscle models
    /// since the muscle is attached between the abdominal layers which leads to
    /// short muscle length.
    AnyMuscleModel MusMdl = {
      Lf0 = .....MuscleModels.Right.RectusAbdominis.RA_2.Lf0/6;
      Vol0 = .....MuscleModels.Right.RectusAbdominis.RA_2.Vol0/6;
      F0 =  .....MuscleModels.Right.RectusAbdominis.RA_2.F0;
    };
  };

  #else


//   #if RECTUS_MUSCLE_LINE == VIA

   AnyMuscleViaPoint RA_1 = {
    AnyRefNode &Org = ....Segments.SternalBodySeg.RACP_CO6_2_R;


    viewMuscle = {#include "../DrawSettings/MusDrawSettings.any"};
    viewForce.Visible ??= Off;
    AnyMuscleModel& MusMdl = ....MuscleModels.Right.RectusAbdominis.RA_1;

    AnyRefNode &Via2 = ....Abdominal.Layer_L1.BaseSegAnterior.rectus1R;
    AnyRefNode &Via3 = ....Abdominal.Layer_L2.BaseSegAnterior.rectus1R;
    AnyRefNode &Via4 = ....Abdominal.Layer_L3.BaseSegAnterior.rectus1R;
    AnyRefNode &Via5 = ....Abdominal.Layer_L4.BaseSegAnterior.rectus1R;
    AnyRefNode &Via6 = ....Abdominal.Layer_L5.BaseSegAnterior.rectus1R;
    AnyRefNode &Ins = ....Segments.PelvisSeg.RA_1_R;
  };

   AnyMuscleViaPoint RA_2 = {
    viewMuscle = {#include "../DrawSettings/MusDrawSettings.any"};
    viewForce.Visible ??= Off;
    AnyMuscleModel& MusMdl = ....MuscleModels.Right.RectusAbdominis.RA_2;

    AnyRefNode &Org = ....Segments.SternalBodySeg.RACP_CO5_2_R;
    AnyRefNode &Via2 = ....Abdominal.Layer_L1.BaseSegAnterior.rectus2R;
    AnyRefNode &Via3 = ....Abdominal.Layer_L2.BaseSegAnterior.rectus2R;
    AnyRefNode &Via4 = ....Abdominal.Layer_L3.BaseSegAnterior.rectus2R;
    AnyRefNode &Via5 = ....Abdominal.Layer_L4.BaseSegAnterior.rectus2R;
    AnyRefNode &Via6 = ....Abdominal.Layer_L5.BaseSegAnterior.rectus2R;
    AnyRefNode &Ins = ....Segments.PelvisSeg.RA_2_R;
  };
  #endif

  #endif


  #if BM_TRUNK_EXPERIMENTAL_RECTUS_ABDOMINIS == OFF

  AnyMuscleViaPoint RA_1_1 = {
    AnyRefNode &Org = ....Segments.SternalBodySeg.RACP_CO6_2_R;
    //      #if BM_TRUNK_THORACIC_STERNUM_TOPOLOGY == 4
    //        AnyRefNode &Via1 = ....Segments.Right.CostalCartilageSeg.RACP_Via_2_R;
    //      #else
    //        AnyRefNode &Via1 = ....Segments.SternalBodySeg.RACP_Via_2_R;
    //      #endif

    AnyRefNode &Ins = ....Abdominal.Layer_L1.BaseSegAnterior.rectus1R;
    viewMuscle = {#include "../DrawSettings/MusDrawSettings.any"};
    viewForce.Visible ??= Off;

    /// The rectus abdominis in the cavity model needs use simple muscle models
    /// since the muscle is attached between the abdominal layers which leads to
    /// short muscle length.
    AnyMuscleModel MusMdl = {
      Lf0 = .....MuscleModels.Right.RectusAbdominis.RA_1.Lf0/6;
      Vol0 = .....MuscleModels.Right.RectusAbdominis.RA_1.Vol0/6;
      F0 =  .....MuscleModels.Right.RectusAbdominis.RA_1.F0;
    };
  };

  AnyMuscleViaPoint RA_1_2 = {
    AnyRefNode &Org = ....Abdominal.Layer_L1.BaseSegAnterior.rectus1R;
    AnyRefNode &Ins = ....Abdominal.Layer_L2.BaseSegAnterior.rectus1R;
    viewMuscle = {#include "../DrawSettings/MusDrawSettings.any"};
    viewForce.Visible ??= Off;
    /// The rectus abdominis in the cavity model needs use simple muscle models
    /// since the muscle is attached between the abdominal layers which leads to
    /// short muscle length.
    AnyMuscleModel MusMdl = {
      Lf0 = .....MuscleModels.Right.RectusAbdominis.RA_1.Lf0/6;
      Vol0 = .....MuscleModels.Right.RectusAbdominis.RA_1.Vol0/6;
      F0 =  .....MuscleModels.Right.RectusAbdominis.RA_1.F0;
    };
  };

  AnyMuscleViaPoint RA_1_3 = {
    AnyRefNode &Org = ....Abdominal.Layer_L2.BaseSegAnterior.rectus1R;
    AnyRefNode &Ins = ....Abdominal.Layer_L3.BaseSegAnterior.rectus1R;
    viewMuscle = {#include "../DrawSettings/MusDrawSettings.any"};
    viewForce.Visible ??= Off;
    /// The rectus abdominis in the cavity model needs use simple muscle models
    /// since the muscle is attached between the abdominal layers which leads to
    /// short muscle length.
    AnyMuscleModel MusMdl = {
      Lf0 = .....MuscleModels.Right.RectusAbdominis.RA_1.Lf0/6;
      Vol0 = .....MuscleModels.Right.RectusAbdominis.RA_1.Vol0/6;
      F0 =  .....MuscleModels.Right.RectusAbdominis.RA_1.F0;
    };
  };

  AnyMuscleViaPoint RA_1_4 = {
    AnyRefNode &Org = ....Abdominal.Layer_L3.BaseSegAnterior.rectus1R;
    AnyRefNode &Ins = ....Abdominal.Layer_L4.BaseSegAnterior.rectus1R;
    viewMuscle = {#include "../DrawSettings/MusDrawSettings.any"};
    viewForce.Visible ??= Off;
    /// The rectus abdominis in the cavity model needs use simple muscle models
    /// since the muscle is attached between the abdominal layers which leads to
    /// short muscle length.
    AnyMuscleModel MusMdl = {
      Lf0 = .....MuscleModels.Right.RectusAbdominis.RA_1.Lf0/6;
      Vol0 = .....MuscleModels.Right.RectusAbdominis.RA_1.Vol0/6;
      F0 =  .....MuscleModels.Right.RectusAbdominis.RA_1.F0;
    };
  };

  AnyMuscleViaPoint RA_1_5 = {
    AnyRefNode &Org = ....Abdominal.Layer_L4.BaseSegAnterior.rectus1R;
    AnyRefNode &Ins = ....Abdominal.Layer_L5.BaseSegAnterior.rectus1R;
    viewMuscle = {#include "../DrawSettings/MusDrawSettings.any"};
    viewForce.Visible ??= Off;
    /// The rectus abdominis in the cavity model needs use simple muscle models
    /// since the muscle is attached between the abdominal layers which leads to
    /// short muscle length.
    AnyMuscleModel MusMdl = {
      Lf0 = .....MuscleModels.Right.RectusAbdominis.RA_1.Lf0/6;
      Vol0 = .....MuscleModels.Right.RectusAbdominis.RA_1.Vol0/6;
      F0 =  .....MuscleModels.Right.RectusAbdominis.RA_1.F0;
    };
  };

  AnyMuscleViaPoint RA_1_6 = {
    AnyRefNode &Org = ....Abdominal.Layer_L5.BaseSegAnterior.rectus1R;
    AnyRefNode &Ins = ....Segments.PelvisSeg.RA_1_R;
    viewMuscle = {#include "../DrawSettings/MusDrawSettings.any"};
    viewForce.Visible ??= Off;
    /// The rectus abdominis in the cavity model needs use simple muscle models
    /// since the muscle is attached between the abdominal layers which leads to
    /// short muscle length.
    AnyMuscleModel MusMdl = {
      Lf0 = .....MuscleModels.Right.RectusAbdominis.RA_1.Lf0/6;
      Vol0 = .....MuscleModels.Right.RectusAbdominis.RA_1.Vol0/6;
      F0 =  .....MuscleModels.Right.RectusAbdominis.RA_1.F0;
    };
  };

  AnyMuscleViaPoint RA_2_1 = {
    AnyRefNode &Org = ....Segments.SternalBodySeg.RACP_CO5_2_R;
    #if BM_TRUNK_THORACIC_STERNUM_TOPOLOGY == 4
    AnyRefNode &Via1 = ....Segments.Right.CostalCartilageSeg.RACP_Via_2_R;
    #else
    AnyRefNode &Via1 = ....Segments.SternalBodySeg.RACP_Via_2_R;
    #endif
    AnyRefNode &Ins = ....Abdominal.Layer_L1.BaseSegAnterior.rectus2R;
    viewMuscle = {#include "../DrawSettings/MusDrawSettings.any"};
    viewForce.Visible ??= Off;
    /// The rectus abdominis in the cavity model needs use simple muscle models
    /// since the muscle is attached between the abdominal layers which leads to
    /// short muscle length.
    AnyMuscleModel MusMdl = {
      Lf0 = .....MuscleModels.Right.RectusAbdominis.RA_2.Lf0/6;
      Vol0 = .....MuscleModels.Right.RectusAbdominis.RA_2.Vol0/6;
      F0 =  .....MuscleModels.Right.RectusAbdominis.RA_2.F0;
    };
  };

  AnyMuscleViaPoint RA_2_2 = {
    AnyRefNode &Org = ....Abdominal.Layer_L1.BaseSegAnterior.rectus2R;
    AnyRefNode &Ins = ....Abdominal.Layer_L2.BaseSegAnterior.rectus2R;
    viewMuscle = {#include "../DrawSettings/MusDrawSettings.any"};
    viewForce.Visible ??= Off;
    /// The rectus abdominis in the cavity model needs use simple muscle models
    /// since the muscle is attached between the abdominal layers which leads to
    /// short muscle length.
    AnyMuscleModel MusMdl = {
      Lf0 = .....MuscleModels.Right.RectusAbdominis.RA_2.Lf0/6;
      Vol0 = .....MuscleModels.Right.RectusAbdominis.RA_2.Vol0/6;
      F0 =  .....MuscleModels.Right.RectusAbdominis.RA_2.F0;
    };
  };

  AnyMuscleViaPoint RA_2_3 = {
    AnyRefNode &Org = ....Abdominal.Layer_L2.BaseSegAnterior.rectus2R;
    AnyRefNode &Ins = ....Abdominal.Layer_L3.BaseSegAnterior.rectus2R;
    viewMuscle = {#include "../DrawSettings/MusDrawSettings.any"};
    viewForce.Visible ??= Off;
    /// The rectus abdominis in the cavity model needs use simple muscle models
    /// since the muscle is attached between the abdominal layers which leads to
    /// short muscle length.
    AnyMuscleModel MusMdl = {
      Lf0 = .....MuscleModels.Right.RectusAbdominis.RA_2.Lf0/6;
      Vol0 = .....MuscleModels.Right.RectusAbdominis.RA_2.Vol0/6;
      F0 =  .....MuscleModels.Right.RectusAbdominis.RA_2.F0;
    };
  };

  AnyMuscleViaPoint RA_2_4 = {
    AnyRefNode &Org = ....Abdominal.Layer_L3.BaseSegAnterior.rectus2R;
    AnyRefNode &Ins = ....Abdominal.Layer_L4.BaseSegAnterior.rectus2R;
    viewMuscle = {#include "../DrawSettings/MusDrawSettings.any"};
    viewForce.Visible ??= Off;
    /// The rectus abdominis in the cavity model needs use simple muscle models
    /// since the muscle is attached between the abdominal layers which leads to
    /// short muscle length.
    AnyMuscleModel MusMdl = {
      Lf0 = .....MuscleModels.Right.RectusAbdominis.RA_2.Lf0/6;
      Vol0 = .....MuscleModels.Right.RectusAbdominis.RA_2.Vol0/6;
      F0 =  .....MuscleModels.Right.RectusAbdominis.RA_2.F0;
    };
  };

  AnyMuscleViaPoint RA_2_5 = {
    AnyRefNode &Org = ....Abdominal.Layer_L4.BaseSegAnterior.rectus2R;
    AnyRefNode &Ins = ....Abdominal.Layer_L5.BaseSegAnterior.rectus2R;
    viewMuscle = {#include "../DrawSettings/MusDrawSettings.any"};
    viewForce.Visible ??= Off;
    /// The rectus abdominis in the cavity model needs use simple muscle models
    /// since the muscle is attached between the abdominal layers which leads to
    /// short muscle length.
    AnyMuscleModel MusMdl = {
      Lf0 = .....MuscleModels.Right.RectusAbdominis.RA_2.Lf0/6;
      Vol0 = .....MuscleModels.Right.RectusAbdominis.RA_2.Vol0/6;
      F0 =  .....MuscleModels.Right.RectusAbdominis.RA_2.F0;
    };
  };

  AnyMuscleViaPoint RA_2_6 = {
    AnyRefNode &Org = ....Abdominal.Layer_L5.BaseSegAnterior.rectus2R;
    AnyRefNode &Ins = ....Segments.PelvisSeg.RA_2_R;
    viewMuscle = {#include "../DrawSettings/MusDrawSettings.any"};
    viewForce.Visible ??= Off;
    /// The rectus abdominis in the cavity model needs use simple muscle models
    /// since the muscle is attached between the abdominal layers which leads to
    /// short muscle length.
    AnyMuscleModel MusMdl = {
      Lf0 = .....MuscleModels.Right.RectusAbdominis.RA_2.Lf0/6;
      Vol0 = .....MuscleModels.Right.RectusAbdominis.RA_2.Vol0/6;
      F0 =  .....MuscleModels.Right.RectusAbdominis.RA_2.F0;
    };
  };
  #endif

  #endif
};

MuscleGroup Scalenus = {
  AnyMuscleViaPoint ScalenusAnteriorR1C6 = {
    AnyMuscleModel &MusMdl= ....MuscleModels.Right.Scalenus.ScalenusAnteriorR1C6;
    AnyRefNode &Org = ....Segments.C6Seg.Right.ScalenusAnteriorR1C6Node;
    AnyRefNode &Ins = ....Segments.Right.R1Seg.ScalenusAnteriorR1C6Node;
    viewMuscle = {#include "../DrawSettings/MusDrawSettings.any"};
    viewForce.Visible ??= Off;
  };
  AnyMuscleViaPoint ScalenusAnteriorR1C5 = {
    AnyMuscleModel &MusMdl= ....MuscleModels.Right.Scalenus.ScalenusAnteriorR1C5;
    AnyRefNode &Org = ....Segments.C5Seg.Right.ScalenusAnteriorR1C5Node;
    AnyRefNode &Ins = ....Segments.Right.R1Seg.ScalenusAnteriorR1C5Node;
    viewMuscle = {#include "../DrawSettings/MusDrawSettings.any"};
    viewForce.Visible ??= Off;
  };
  AnyMuscleViaPoint ScalenusAnteriorR1C4 = {
    AnyMuscleModel &MusMdl= ....MuscleModels.Right.Scalenus.ScalenusAnteriorR1C4;
    AnyRefNode &Org = ....Segments.C4Seg.Right.ScalenusAnteriorR1C4Node;
    AnyRefNode &Ins = ....Segments.Right.R1Seg.ScalenusAnteriorR1C4Node;
    viewMuscle = {#include "../DrawSettings/MusDrawSettings.any"};
    viewForce.Visible ??= Off;
  };
  AnyMuscleViaPoint ScalenusAnteriorR1C3 = {
    AnyMuscleModel &MusMdl= ....MuscleModels.Right.Scalenus.ScalenusAnteriorR1C3;
    AnyRefNode &Org = ....Segments.C3Seg.Right.ScalenusAnteriorR1C3Node;
    AnyRefNode &Ins = ....Segments.Right.R1Seg.ScalenusAnteriorR1C3Node;
    viewMuscle = {#include "../DrawSettings/MusDrawSettings.any"};
    viewForce.Visible ??= Off;
  };
  AnyMuscleViaPoint ScalenusMediusR1C7 = {
    AnyMuscleModel &MusMdl =....MuscleModels.Right.Scalenus.ScalenusMediusR1C7;
    AnyRefNode &Org = ....Segments.C7Seg.Right.ScalenusMediusR1C7Node;
    AnyRefNode &Ins = ....Segments.Right.R1Seg.ScalenusMediusR1C7Node;
    viewMuscle = {#include "../DrawSettings/MusDrawSettings.any"};
    viewForce.Visible ??= Off;
  };
  AnyMuscleViaPoint ScalenusMediusR1C6 = {
    AnyMuscleModel &MusMdl =....MuscleModels.Right.Scalenus.ScalenusMediusR1C6;
    AnyRefNode &Org = ....Segments.C6Seg.Right.ScalenusMediusR1C6Node;
    AnyRefNode &Ins = ....Segments.Right.R1Seg.ScalenusMediusR1C6Node;
    viewMuscle = {#include "../DrawSettings/MusDrawSettings.any"};
    viewForce.Visible ??= Off;
  };
  AnyMuscleViaPoint ScalenusMediusR1C5 = {
    AnyMuscleModel &MusMdl =....MuscleModels.Right.Scalenus.ScalenusMediusR1C5;
    AnyRefNode &Org = ....Segments.C5Seg.Right.ScalenusMediusR1C5Node;
    AnyRefNode &Ins = ....Segments.Right.R1Seg.ScalenusMediusR1C5Node;
    viewMuscle = {#include "../DrawSettings/MusDrawSettings.any"};
    viewForce.Visible ??= Off;
  };
  AnyMuscleViaPoint ScalenusMediusR1C4 = {
    AnyMuscleModel &MusMdl =....MuscleModels.Right.Scalenus.ScalenusMediusR1C4;
    AnyRefNode &Org = ....Segments.C4Seg.Right.ScalenusMediusR1C4Node;
    AnyRefNode &Ins = ....Segments.Right.R1Seg.ScalenusMediusR1C4Node;
    viewMuscle = {#include "../DrawSettings/MusDrawSettings.any"};
    viewForce.Visible ??= Off;
  };
  AnyMuscleViaPoint ScalenusMediusR1C3 = {
    AnyMuscleModel &MusMdl =....MuscleModels.Right.Scalenus.ScalenusMediusR1C3;
    AnyRefNode &Org = ....Segments.C3Seg.Right.ScalenusMediusR1C3Node;
    AnyRefNode &Ins = ....Segments.Right.R1Seg.ScalenusMediusR1C3Node;
    viewMuscle = {#include "../DrawSettings/MusDrawSettings.any"};
    viewForce.Visible ??= Off;
  };
  AnyMuscleViaPoint ScalenusMediusR1C2 = {
    AnyMuscleModel &MusMdl =....MuscleModels.Right.Scalenus.ScalenusMediusR1C2;
    AnyRefNode &Org = ....Segments.C2Seg.Right.ScalenusMediusR1C2Node;
    AnyRefNode &Ins = ....Segments.Right.R1Seg.ScalenusMediusR1C2Node;
    viewMuscle = {#include "../DrawSettings/MusDrawSettings.any"};
    viewForce.Visible ??= Off;
  };
  AnyMuscleViaPoint ScalenusPosteriorR2C7 = {
    AnyMuscleModel &MusMdl =....MuscleModels.Right.Scalenus.ScalenusPosteriorR2C7;
    AnyRefNode &Org = ....Segments.C7Seg.Right.ScalenusPosteriorR2C7Node;
    AnyRefNode &Ins = ....Segments.Right.R2Seg.ScalenusPosteriorR2C7Node;
    viewMuscle = {#include "../DrawSettings/MusDrawSettings.any"};
    viewForce.Visible ??= Off;
  };
  AnyMuscleViaPoint ScalenusPosteriorR2C6 = {
    AnyMuscleModel &MusMdl =....MuscleModels.Right.Scalenus.ScalenusPosteriorR2C6;
    AnyRefNode &Org = ....Segments.C6Seg.Right.ScalenusPosteriorR2C6Node;
    AnyRefNode &Ins = ....Segments.Right.R2Seg.ScalenusPosteriorR2C6Node;
    viewMuscle = {#include "../DrawSettings/MusDrawSettings.any"};
    viewForce.Visible ??= Off;
  };
  AnyMuscleViaPoint ScalenusPosteriorR2C5 = {
    AnyMuscleModel &MusMdl =....MuscleModels.Right.Scalenus.ScalenusPosteriorR2C5;
    AnyRefNode &Org = ....Segments.C5Seg.Right.ScalenusPosteriorR2C5Node;
    AnyRefNode &Ins = ....Segments.Right.R2Seg.ScalenusPosteriorR2C5Node;
    viewMuscle = {#include "../DrawSettings/MusDrawSettings.any"};
    viewForce.Visible ??= Off;
  };
};

// Model needs the Hyoid bone. The hyoid muscles try to stabilize the trachea and play a
// vital part in swallowing and speech.
MuscleGroup Hyoid = {
  AnyMuscleViaPoint LumpedHyoidStC0 = {
    AnyMuscleModel &MusMdl = ....MuscleModels.Right.LumpedHyoid.LumpedHyoidStC0;
    AnyRefNode &Org = ....Segments.SkullSeg.LumpedHyoidT1C0NodeR;
    AnyRefNode &Ins = ....Segments.SternumSeg.LumpedHyoidStC0NodeRIns;
    viewMuscle = {#include "../DrawSettings/MusDrawSettings.any"};
    viewForce.Visible ??= Off;
  };
};

MuscleGroup SemispinalisCapitis = {
  AnyMuscleViaPoint SemispinalisCapitisC4C0 = {
    AnyMuscleModel &MusMdl = ....MuscleModels.Right.SemispinalisCapitis.SemispinalisCapitisC4C0;
    AnyRefNode &Org = ....Segments.C4Seg.SemispinalisCapitisC4C0NodeR;
    AnyRefNode &Ins = ....Segments.SkullSeg.SemispinalisCapitisNodeR;
    viewMuscle = {#include "../DrawSettings/MusDrawSettings.any"};
    viewForce.Visible ??= Off;
  };

  AnyMuscleViaPoint SemispinalisCapitisC5C0 = {
    AnyMuscleModel &MusMdl = ....MuscleModels.Right.SemispinalisCapitis.SemispinalisCapitisC5C0;
    AnyRefNode &Org = ....Segments.C5Seg.SemispinalisCapitisC5C0NodeR;
    AnyRefNode &Ins = ....Segments.SkullSeg.SemispinalisCapitisNodeR;
    viewMuscle = {#include "../DrawSettings/MusDrawSettings.any"};
    viewForce.Visible ??= Off;
  };

  AnyMuscleViaPoint SemispinalisCapitisC6C0 = {
    AnyMuscleModel &MusMdl = ....MuscleModels.Right.SemispinalisCapitis.SemispinalisCapitisC6C0;
    AnyRefNode &Org = ....Segments.C6Seg.SemispinalisCapitisC6C0NodeR;
    AnyRefNode &Ins = ....Segments.SkullSeg.SemispinalisCapitisNodeR;
    viewMuscle = {#include "../DrawSettings/MusDrawSettings.any"};
    viewForce.Visible ??= Off;
  };

  AnyMuscleViaPoint SemispinalisCapitisC7C0 = {
    AnyMuscleModel &MusMdl = ....MuscleModels.Right.SemispinalisCapitis.SemispinalisCapitisC7C0;
    AnyRefNode &Org = ....Segments.C7Seg.SemispinalisCapitisC7C0NodeR;
    AnyRefNode &Ins = ....Segments.SkullSeg.SemispinalisCapitisNodeR;
    viewMuscle = {#include "../DrawSettings/MusDrawSettings.any"};
    viewForce.Visible ??= Off;
  };

  AnyMuscleViaPoint SemispinalisCapitisT1C0 = {
    AnyMuscleModel &MusMdl = ....MuscleModels.Right.SemispinalisCapitis.SemispinalisCapitisT1C0;
    AnyRefNode &Org = ....Segments.T1Seg.Right.SemispinalisCapitisT1C0Node;
    AnyRefNode &Ins = ....Segments.SkullSeg.SemispinalisCapitisNodeR;
    viewMuscle = {#include "../DrawSettings/MusDrawSettings.any"};
    viewForce.Visible ??= Off;
  };
  AnyMuscleViaPoint SemispinalisCapitisT2C0 = {
    AnyMuscleModel &MusMdl = ....MuscleModels.Right.SemispinalisCapitis.SemispinalisCapitisT2C0;
    AnyRefNode &Org = ....Segments.T2Seg.Right.SemispinalisCapitisT2C0Node;
    AnyRefNode &Ins = ....Segments.SkullSeg.SemispinalisCapitisNodeR;
    viewMuscle = {#include "../DrawSettings/MusDrawSettings.any"};
    viewForce.Visible ??= Off;
  };
  AnyMuscleViaPoint SemispinalisCapitisT3C0 = {
    AnyMuscleModel &MusMdl = ....MuscleModels.Right.SemispinalisCapitis.SemispinalisCapitisT3C0;
    AnyRefNode &Org = ....Segments.T3Seg.Right.SemispinalisCapitisT3C0Node;
    AnyRefNode &Ins = ....Segments.SkullSeg.SemispinalisCapitisNodeR;
    viewMuscle = {#include "../DrawSettings/MusDrawSettings.any"};
    viewForce.Visible ??= Off;
  };
  AnyMuscleViaPoint SemispinalisCapitisT4C0 = {
    AnyMuscleModel &MusMdl = ....MuscleModels.Right.SemispinalisCapitis.SemispinalisCapitisT4C0;
    AnyRefNode &Org = ....Segments.T4Seg.Right.SemispinalisCapitisT4C0Node;
    AnyRefNode &Ins = ....Segments.SkullSeg.SemispinalisCapitisNodeR;
    viewMuscle = {#include "../DrawSettings/MusDrawSettings.any"};
    viewForce.Visible ??= Off;
  };
  AnyMuscleViaPoint SemispinalisCapitisT5C0 = {
    AnyMuscleModel &MusMdl = ....MuscleModels.Right.SemispinalisCapitis.SemispinalisCapitisT5C0;
    AnyRefNode &Org = ....Segments.T5Seg.Right.SemispinalisCapitisT5C0Node;
    AnyRefNode &Ins = ....Segments.SkullSeg.SemispinalisCapitisNodeR;
    viewMuscle = {#include "../DrawSettings/MusDrawSettings.any"};
    viewForce.Visible ??= Off;
  };
  AnyMuscleViaPoint SemispinalisCapitisT6C0 = {
    AnyMuscleModel &MusMdl = ....MuscleModels.Right.SemispinalisCapitis.SemispinalisCapitisT6C0;
    AnyRefNode &Org = ....Segments.T6Seg.Right.SemispinalisCapitisT6C0Node;
    AnyRefNode &Ins = ....Segments.SkullSeg.SemispinalisCapitisNodeR;
    viewMuscle = {#include "../DrawSettings/MusDrawSettings.any"};
    viewForce.Visible ??= Off;
  };
};

MuscleGroup SemispinalisCervicis = {
  AnyMuscleViaPoint SemispinalisCervicisT1C2 = {
    AnyMuscleModel &MusMdl = ....MuscleModels.Right.SemispinalisCervicis.SemispinalisCervicisT1C2;
    AnyRefNode &Org = ....Segments.T1Seg.SemispinalisCervicisT1C2NodeR;
    AnyRefNode &Ins = ....Segments.C2Seg.SemispinalisCervicisT1C2NodeR;
    viewMuscle = {#include "../DrawSettings/MusDrawSettings.any"};
    viewForce.Visible ??= Off;
  };

  AnyMuscleViaPoint SemispinalisCervicisT2C3 = {
    AnyMuscleModel &MusMdl = ....MuscleModels.Right.SemispinalisCervicis.SemispinalisCervicisT2C3;
    AnyRefNode &Org = ....Segments.T2Seg.SemispinalisCervicisT2C3NodeR;
    AnyRefNode &Ins = ....Segments.C3Seg.SemispinalisCervicisT2C3NodeR;
    viewMuscle = {#include "../DrawSettings/MusDrawSettings.any"};
    viewForce.Visible ??= Off;
  };

  AnyMuscleViaPoint SemispinalisCervicisT3C4 = {
    AnyMuscleModel &MusMdl = ....MuscleModels.Right.SemispinalisCervicis.SemispinalisCervicisT3C4;
    AnyRefNode &Org = ....Segments.T3Seg.SemispinalisCervicisT3C4NodeR;
    AnyRefNode &Ins = ....Segments.C4Seg.SemispinalisCervicisT3C4NodeR;
    viewMuscle = {#include "../DrawSettings/MusDrawSettings.any"};
    viewForce.Visible ??= Off;
  };

  AnyMuscleViaPoint SemispinalisCervicisT4C5 = {
    AnyMuscleModel &MusMdl = ....MuscleModels.Right.SemispinalisCervicis.SemispinalisCervicisT4C5;
    AnyRefNode &Org = ....Segments.T4Seg.SemispinalisCervicisT4C5NodeR;
    AnyRefNode &Ins = ....Segments.C5Seg.SemispinalisCervicisT4C5NodeR;
    viewMuscle = {#include "../DrawSettings/MusDrawSettings.any"};
    viewForce.Visible ??= Off;
  };

  AnyMuscleViaPoint SemispinalisCervicisT5C6 = {
    AnyMuscleModel &MusMdl = ....MuscleModels.Right.SemispinalisCervicis.SemispinalisCervicisT5C6;
    AnyRefNode &Org = ....Segments.T5Seg.SemispinalisCervicisT5C6NodeR;
    AnyRefNode &Ins = ....Segments.C6Seg.SemispinalisCervicisT5C6NodeR;
    viewMuscle = {#include "../DrawSettings/MusDrawSettings.any"};
    viewForce.Visible ??= Off;
  };

  AnyMuscleViaPoint SemispinalisCervicisT6C7 = {
    AnyMuscleModel &MusMdl = ....MuscleModels.Right.SemispinalisCervicis.SemispinalisCervicisT6C7;
    AnyRefNode &Org = ....Segments.T6Seg.SemispinalisCervicisT6C7NodeR;
    AnyRefNode &Ins = ....Segments.C7Seg.SemispinalisCervicisT6C7NodeR;
    viewMuscle = {#include "../DrawSettings/MusDrawSettings.any"};
    viewForce.Visible ??= Off;
  };
};

MuscleGroup SemispinalisThoracis = {

  AnyMuscleViaPoint SSTT12T4 =
  {
    AnyMuscleModel &MusMdl = ....MuscleModels.Right.SemispinalisThoracis.SSTT12T4;
    AnyRefFrame &Org = ....Segments.T12Seg.SSTT12TransversusR;
    AnyRefNode &Via1 = ....Segments.T11Seg.SSTT11ViaNodeR;
    AnyRefNode &Via2 = ....Segments.T10Seg.SSTT10ViaNodeR;
    AnyRefNode &Via3 = ....Segments.T9Seg.SSTT9ViaNodeR;
    AnyRefNode &Via4 = ....Segments.T8Seg.SSTT8ViaNodeR;
    AnyRefNode &Via5 = ....Segments.T7Seg.SSTT4ViaNodeR;
    AnyRefFrame &Ins = ....Segments.T4Seg.SSTT4Spinous;
    viewMuscle = {#include "../DrawSettings/MusDrawSettings.any"};
    viewForce.Visible ??= Off;
  };

  AnyMuscleViaPoint SSTT11T3 =
  {
    AnyMuscleModel &MusMdl = ....MuscleModels.Right.SemispinalisThoracis.SSTT11T3;
    AnyRefFrame &Org = ....Segments.T11Seg.SSTT11TransversusR;
    AnyRefNode &Via2 = ....Segments.T10Seg.SSTT10ViaNodeR;
    AnyRefNode &Via3 = ....Segments.T9Seg.SSTT9ViaNodeR;
    AnyRefNode &Via4 = ....Segments.T8Seg.SSTT8ViaNodeR;
    AnyRefNode &Via5 = ....Segments.T7Seg.SSTT3ViaNodeR;
    AnyRefFrame &Ins = ....Segments.T3Seg.SSTT3Spinous;
    viewMuscle = {#include "../DrawSettings/MusDrawSettings.any"};
    viewForce.Visible ??= Off;
  };

  AnyMuscleViaPoint SSTT10T2 =
  {
    AnyMuscleModel &MusMdl = ....MuscleModels.Right.SemispinalisThoracis.SSTT10T2;
    AnyRefFrame &Org = ....Segments.T10Seg.SSTT10TransversusR;
    AnyRefNode &Via3 = ....Segments.T9Seg.SSTT9ViaNodeR;
    AnyRefNode &Via4 = ....Segments.T8Seg.SSTT8ViaNodeR;
    AnyRefNode &Via5 = ....Segments.T7Seg.SSTT2ViaNodeR;
    AnyRefFrame &Ins = ....Segments.T2Seg.SSTT2Spinous;
    viewMuscle = {#include "../DrawSettings/MusDrawSettings.any"};
    viewForce.Visible ??= Off;
  };

  AnyMuscleViaPoint SSTT9T1 =
  {
    AnyMuscleModel &MusMdl = ....MuscleModels.Right.SemispinalisThoracis.SSTT9T1;
    AnyRefFrame &Org = ....Segments.T9Seg.SSTT9TransversusR;
    AnyRefNode &Via4 = ....Segments.T8Seg.SSTT9T4ViaNodeR;
    AnyRefNode &Via5 = ....Segments.T7Seg.SSTT9T1ViaNodeR;
    AnyRefFrame &Ins = ....Segments.T1Seg.SSTT1Spinous;
    viewMuscle = {#include "../DrawSettings/MusDrawSettings.any"};
    viewForce.Visible ??= Off;
  };

  AnyMuscleViaPoint SSTT8C7 =
  {
    AnyMuscleModel &MusMdl = ....MuscleModels.Right.SemispinalisThoracis.SSTT8C7;
    AnyRefFrame &Org = ....Segments.T8Seg.SSTT8TransversusR;
    AnyRefNode &Via5 = ....Segments.T7Seg.SSTT8T4ViaNodeR;
    AnyRefFrame &Ins = ....Segments.C7Seg.SSTC7Spinous;
    viewMuscle = {#include "../DrawSettings/MusDrawSettings.any"};
    viewForce.Visible ??= Off;
  };

  AnyMuscleViaPoint SSTT7C6 =
  {
    AnyMuscleModel &MusMdl = ....MuscleModels.Right.SemispinalisThoracis.SSTT7C6;
    AnyRefFrame &Org = ....Segments.T7Seg.SSTT7TransversusR;
    AnyRefFrame &Ins = ....Segments.C6Seg.SSTC6Spinous;
    viewMuscle = {#include "../DrawSettings/MusDrawSettings.any"};
    viewForce.Visible ??= Off;
  };
};

MuscleGroup SerratusPosteriorSuperior = {

  AnyMuscleViaPoint SPSR2C7 = {
    AnyMuscleModel &MusMdl = ....MuscleModels.Right.SerratusPosteriorSuperior.SPSR2C7;
    AnyRefNode &C7 = ....Segments.C7Seg.O_serratus_posterior_superior_1C7NodeR;
    AnyRefNode &R2 = ....Segments.Right.R2Seg.O_serratus_posterior_superior_1R;
    viewMuscle = {#include "../DrawSettings/MusDrawSettings.any"};
    viewForce.Visible ??= Off;
  };

  AnyMuscleViaPoint SPSR3T1 = {
    AnyMuscleModel &MusMdl = ....MuscleModels.Right.SerratusPosteriorSuperior.SPSR3T1;
    AnyRefNode &T1 = ....Segments.T1Seg.O_serratus_posterior_superior_T1R;
    AnyRefNode &R3 = ....Segments.Right.R3Seg.O_serratus_posterior_superior_2R;
    viewMuscle = {#include "../DrawSettings/MusDrawSettings.any"};
    viewForce.Visible ??= Off;
  };

  AnyMuscleViaPoint SPSR4T2 = {
    AnyMuscleModel &MusMdl = ....MuscleModels.Right.SerratusPosteriorSuperior.SPSR4T2;
    AnyRefNode &T2 = ....Segments.T2Seg.O_serratus_posterior_superior_T2R;
    AnyRefNode &R4 = ....Segments.Right.R4Seg.O_serratus_posterior_superior_3R;
    viewMuscle = {#include "../DrawSettings/MusDrawSettings.any"};
    viewForce.Visible ??= Off;
  };

  AnyMuscleViaPoint SPSR5T3 = {
    AnyMuscleModel &MusMdl = ....MuscleModels.Right.SerratusPosteriorSuperior.SPSR5T3;
    AnyRefNode &T3 = ....Segments.T3Seg.O_serratus_posterior_superior_T3R;
    AnyRefNode &R5 = ....Segments.Right.R5Seg.O_serratus_posterior_superior_4R;
    viewMuscle = {#include "../DrawSettings/MusDrawSettings.any"};
    viewForce.Visible ??= Off;
  };
};

MuscleGroup SerratusPosteriorInferior = {

  AnyMuscleViaPoint SPIL2R12 = {
    AnyMuscleModel &MusMdl = ....MuscleModels.Right.SerratusPosteriorInferior.SPIL2R12;
    AnyRefNode &L2 = ....Segments.L2Seg.O_serratus_posterior_inferior_R;
    AnyRefNode &Via1 = ....Segments.L2Seg.O_serratus_posterior_inferior_L2R12ViaNode_R;
    AnyRefNode &R12 = ....Segments.Right.R12Seg.O_serratus_posterior_inferior_R12R;
    viewMuscle = {#include "../DrawSettings/MusDrawSettings.any"};
    viewForce.Visible ??= Off;
  };

  AnyMuscleViaPoint SPIL1R11 = {
    AnyMuscleModel &MusMdl = ....MuscleModels.Right.SerratusPosteriorInferior.SPIL1R11;
    AnyRefNode &L1 = ....Segments.L1Seg.O_serratus_posterior_inferior_R;
    AnyRefNode &Via1 = ....Segments.L1Seg.O_serratus_posterior_inferior_L1R11ViaNode_R;
    AnyRefNode &R11 = ....Segments.Right.R11Seg.O_serratus_posterior_inferior_R11R;
    viewMuscle = {#include "../DrawSettings/MusDrawSettings.any"};
    viewForce.Visible ??= Off;
  };

  AnyMuscleViaPoint SPIT12R10 = {
    AnyMuscleModel &MusMdl = ....MuscleModels.Right.SerratusPosteriorInferior.SPIT12R10;
    AnyRefNode &T12 = ....Segments.T12Seg.O_serratus_posterior_inferior_T12R;
    AnyRefNode &Via1 = ....Segments.T12Seg.O_serratus_posterior_inferior_T12R10ViaNodeR;
    AnyRefNode &R10 = ....Segments.Right.R10Seg.O_serratus_posterior_inferior_R10R;
    viewMuscle = {#include "../DrawSettings/MusDrawSettings.any"};
    viewForce.Visible ??= Off;
  };

  AnyMuscleViaPoint SPIT11R9 = {
    AnyMuscleModel &MusMdl = ....MuscleModels.Right.SerratusPosteriorInferior.SPIT11R9;
    AnyRefNode &T11 = ....Segments.T11Seg.O_serratus_posterior_inferior_T11R;
    AnyRefNode &Via1 = ....Segments.T11Seg.O_serratus_posterior_inferior_T11R9ViaNodeR;
    AnyRefNode &R9 = ....Segments.Right.R9Seg.O_serratus_posterior_inferior_R9R;
    viewMuscle = {#include "../DrawSettings/MusDrawSettings.any"};
    viewForce.Visible ??= Off;
  };
};

MuscleGroup SpleniusCapitis = {
  AnyMuscleViaPoint SpleniusCapitisC7C0 = {
    AnyMuscleModel &MusMdl = ....MuscleModels.Right.SpleniusCapitis.SpleniusCapitisC7C0;
    AnyRefNode &Org = ....Segments.SkullSeg.SpleniusCapitisNodeR;
    AnyRefNode &Ins = ....Segments.C7Seg.SpleniusCapitisC7C0NodeR;
    viewMuscle = {#include "../DrawSettings/MusDrawSettings.any"};
    viewForce.Visible ??= Off;
  };
  AnyMuscleViaPoint SpleniusCapitisT1C0 = {
    AnyMuscleModel &MusMdl = ....MuscleModels.Right.SpleniusCapitis.SpleniusCapitisT1C0;
    AnyRefNode &Org = ....Segments.SkullSeg.SpleniusCapitisNodeR;
    AnyRefNode &Ins = ....Segments.T1Seg.Right.SpleniusCapitisT1C0Node;
    viewMuscle = {#include "../DrawSettings/MusDrawSettings.any"};
    viewForce.Visible ??= Off;
  };
  AnyMuscleViaPoint SpleniusCapitisT2C0 = {
    AnyMuscleModel &MusMdl = ....MuscleModels.Right.SpleniusCapitis.SpleniusCapitisT2C0;
    AnyRefNode &Org = ....Segments.SkullSeg.SpleniusCapitisNodeR;
    AnyRefNode &Ins = ....Segments.T2Seg.Right.SpleniusCapitisT2C0Node;
    viewMuscle = {#include "../DrawSettings/MusDrawSettings.any"};
    viewForce.Visible ??= Off;
  };
  AnyMuscleViaPoint SpleniusCapitisT3C0 = {
    AnyMuscleModel &MusMdl = ....MuscleModels.Right.SpleniusCapitis.SpleniusCapitisT3C0;
    AnyRefNode &Org = ....Segments.SkullSeg.SpleniusCapitisNodeR;
    AnyRefNode &Ins = ....Segments.T3Seg.Right.SpleniusCapitisT3C0Node;
    viewMuscle = {#include "../DrawSettings/MusDrawSettings.any"};
    viewForce.Visible ??= Off;
  };
};

MuscleGroup SpleniusCervicis = {
  AnyMuscleViaPoint SpleniusCervicisT3C1 = {
    AnyMuscleModel &MusMdl = ....MuscleModels.Right.SpleniusCervicis.SpleniusCervicisT3C1;
    AnyRefNode &Org = ....Segments.T3Seg.Right.SpleniusCervicisNode;
    AnyRefNode &Ins = ....Segments.C1Seg.Right.SpleniusCervicisT3C1Node;
    viewMuscle = {#include "../DrawSettings/MusDrawSettings.any"};
    viewForce.Visible ??= Off;
  };
  AnyMuscleViaPoint SpleniusCervicisT4C2 = {
    AnyMuscleModel &MusMdl = ....MuscleModels.Right.SpleniusCervicis.SpleniusCervicisT4C2;
    AnyRefNode &Org = ....Segments.T4Seg.Right.SpleniusCervicisNode;
    AnyRefNode &Ins = ....Segments.C2Seg.Right.SpleniusCervicisT4C2Node;
    viewMuscle = {#include "../DrawSettings/MusDrawSettings.any"};
    viewForce.Visible ??= Off;
  };

  AnyMuscleViaPoint SpleniusCervicisT5C3 = {
    AnyMuscleModel &MusMdl = ....MuscleModels.Right.SpleniusCervicis.SpleniusCervicisT5C3;
    AnyRefNode &Org = ....Segments.T5Seg.Right.SpleniusCervicisNode;
    AnyRefNode &Ins = ....Segments.C3Seg.Right.SpleniusCervicisT5C3Node;
    viewMuscle = {#include "../DrawSettings/MusDrawSettings.any"};
    viewForce.Visible ??= Off;
  };
  AnyMuscleViaPoint SpleniusCervicisT6C3 = {
    AnyMuscleModel &MusMdl = ....MuscleModels.Right.SpleniusCervicis.SpleniusCervicisT6C3;
    AnyRefNode &Org = ....Segments.T6Seg.Right.SpleniusCervicisNode;
    AnyRefNode &Ins = ....Segments.C3Seg.Right.SpleniusCervicisT6C3Node;
    viewMuscle = {#include "../DrawSettings/MusDrawSettings.any"};
    viewForce.Visible ??= Off;
  };
};

#if BM_TRUNK_THORACIC_MODEL == _THORACIC_MODEL_FLEXIBLE_
MuscleGroup Subcostalis = {
  AnyMuscleViaPoint SCR1R3 = {
    AnyMuscleModel &MusMdl = ....MuscleModels.Right.Subcostalis.SCModel_1;
    AnyRefNode &R1 = ....Segments.Right.R1Seg.SCR1R3_R_Org;
    AnyRefNode &R3 = ....Segments.Right.R3Seg.SCR1R3_R_Ins;
    viewMuscle = {#include "../DrawSettings/MusDrawSettings.any"};
    viewForce.Visible ??= Off;
  };

  AnyMuscleViaPoint SCR1R4 = {
    AnyMuscleModel &MusMdl = ....MuscleModels.Right.Subcostalis.SCModel_2;
    AnyRefNode &R1 = ....Segments.Right.R1Seg.SCR1R4_R_Org;
    AnyRefNode &R3 = ....Segments.Right.R4Seg.SCR1R4_R_Ins;
    viewMuscle = {#include "../DrawSettings/MusDrawSettings.any"};
    viewForce.Visible ??= Off;
  };

  AnyMuscleViaPoint SCR2R4 = {
    AnyMuscleModel &MusMdl = ....MuscleModels.Right.Subcostalis.SCModel_3;
    AnyRefNode &R2 = ....Segments.Right.R2Seg.SCR2R4_R_Org;
    AnyRefNode &R4 = ....Segments.Right.R4Seg.SCR2R4_R_Ins;
    viewMuscle = {#include "../DrawSettings/MusDrawSettings.any"};
    viewForce.Visible ??= Off;
  };

  AnyMuscleViaPoint SCR2R5 = {
    AnyMuscleModel &MusMdl = ....MuscleModels.Right.Subcostalis.SCModel_4;
    AnyRefNode &R2 = ....Segments.Right.R2Seg.SCR2R5_R_Org;
    AnyRefNode &R4 = ....Segments.Right.R5Seg.SCR2R5_R_Ins;
    viewMuscle = {#include "../DrawSettings/MusDrawSettings.any"};
    viewForce.Visible ??= Off;
  };

  AnyMuscleViaPoint SCR3R5 = {
    AnyMuscleModel &MusMdl = ....MuscleModels.Right.Subcostalis.SCModel_5;
    AnyRefNode &R3 = ....Segments.Right.R3Seg.SCR3R5_R_Org;
    AnyRefNode &R5 = ....Segments.Right.R5Seg.SCR3R5_R_Ins;
    viewMuscle = {#include "../DrawSettings/MusDrawSettings.any"};
    viewForce.Visible ??= Off;
  };

  AnyMuscleViaPoint SCR3R6 = {
    AnyMuscleModel &MusMdl = ....MuscleModels.Right.Subcostalis.SCModel_6;
    AnyRefNode &R3 = ....Segments.Right.R3Seg.SCR3R6_R_Org;
    AnyRefNode &R5 = ....Segments.Right.R6Seg.SCR3R6_R_Ins;
    viewMuscle = {#include "../DrawSettings/MusDrawSettings.any"};
    viewForce.Visible ??= Off;
  };

  AnyMuscleViaPoint SCR4R6 = {
    AnyMuscleModel &MusMdl = ....MuscleModels.Right.Subcostalis.SCModel_7;
    AnyRefNode &R4 = ....Segments.Right.R4Seg.SCR4R6_R_Org;
    AnyRefNode &R6 = ....Segments.Right.R6Seg.SCR4R6_R_Ins;
    viewMuscle = {#include "../DrawSettings/MusDrawSettings.any"};
    viewForce.Visible ??= Off;
  };

  AnyMuscleViaPoint SCR4R7 = {
    AnyMuscleModel &MusMdl = ....MuscleModels.Right.Subcostalis.SCModel_8;
    AnyRefNode &R4 = ....Segments.Right.R4Seg.SCR4R7_R_Org;
    AnyRefNode &R6 = ....Segments.Right.R7Seg.SCR4R7_R_Ins;
    viewMuscle = {#include "../DrawSettings/MusDrawSettings.any"};
    viewForce.Visible ??= Off;
  };

  AnyMuscleViaPoint SCR5R7 = {
    AnyMuscleModel &MusMdl = ....MuscleModels.Right.Subcostalis.SCModel_9;
    AnyRefNode &R5 = ....Segments.Right.R5Seg.SCR5R7_R_Org;
    AnyRefNode &R7 = ....Segments.Right.R7Seg.SCR5R7_R_Ins;
    viewMuscle = {#include "../DrawSettings/MusDrawSettings.any"};
    viewForce.Visible ??= Off;
  };

  AnyMuscleViaPoint SCR5R8 = {
    AnyMuscleModel &MusMdl = ....MuscleModels.Right.Subcostalis.SCModel_10;
    AnyRefNode &R5 = ....Segments.Right.R5Seg.SCR5R8_R_Org;
    AnyRefNode &R7 = ....Segments.Right.R8Seg.SCR5R8_R_Ins;
    viewMuscle = {#include "../DrawSettings/MusDrawSettings.any"};
    viewForce.Visible ??= Off;
  };

  AnyMuscleViaPoint SCR6R8 = {
    AnyMuscleModel &MusMdl = ....MuscleModels.Right.Subcostalis.SCModel_11;
    AnyRefNode &R6 = ....Segments.Right.R6Seg.SCR6R8_R_Org;
    AnyRefNode &R8 = ....Segments.Right.R8Seg.SCR6R8_R_Ins;
    viewMuscle = {#include "../DrawSettings/MusDrawSettings.any"};
    viewForce.Visible ??= Off;
  };

  AnyMuscleViaPoint SCR6R9 = {
    AnyMuscleModel &MusMdl = ....MuscleModels.Right.Subcostalis.SCModel_12;
    AnyRefNode &R6 = ....Segments.Right.R6Seg.SCR6R9_R_Org;
    AnyRefNode &R8 = ....Segments.Right.R9Seg.SCR6R9_R_Ins;
    viewMuscle = {#include "../DrawSettings/MusDrawSettings.any"};
    viewForce.Visible ??= Off;
  };

  AnyMuscleViaPoint SCR7R9 = {
    AnyMuscleModel &MusMdl = ....MuscleModels.Right.Subcostalis.SCModel_13;
    AnyRefNode &R7 = ....Segments.Right.R7Seg.SCR7R9_R_Org;
    AnyRefNode &R9 = ....Segments.Right.R9Seg.SCR7R9_R_Ins;
    viewMuscle = {#include "../DrawSettings/MusDrawSettings.any"};
    viewForce.Visible ??= Off;
  };

  AnyMuscleViaPoint SCR7R10 = {
    AnyMuscleModel &MusMdl = ....MuscleModels.Right.Subcostalis.SCModel_14;
    AnyRefNode &R7 = ....Segments.Right.R7Seg.SCR7R10_R_Org;
    AnyRefNode &R9 = ....Segments.Right.R10Seg.SCR7R10_R_Ins;
    viewMuscle = {#include "../DrawSettings/MusDrawSettings.any"};
    viewForce.Visible ??= Off;
  };

  AnyMuscleViaPoint SCR8R10 = {
    AnyMuscleModel &MusMdl = ....MuscleModels.Right.Subcostalis.SCModel_15;
    AnyRefNode &R8 = ....Segments.Right.R8Seg.SCR8R10_R_Org;
    AnyRefNode &R10 = ....Segments.Right.R10Seg.SCR8R10_R_Ins;
    viewMuscle = {#include "../DrawSettings/MusDrawSettings.any"};
    viewForce.Visible ??= Off;
  };

  AnyMuscleViaPoint SCR8R11 = {
    AnyMuscleModel &MusMdl = ....MuscleModels.Right.Subcostalis.SCModel_16;
    AnyRefNode &R8 = ....Segments.Right.R8Seg.SCR8R11_R_Ins;
    AnyRefNode &R11 = ....Segments.Right.R11Seg.SCR8R11_R_Org;
    viewMuscle = {#include "../DrawSettings/MusDrawSettings.any"};
    viewForce.Visible ??= Off;
  };

  AnyMuscleViaPoint SCR9R11 = {
    AnyMuscleModel &MusMdl = ....MuscleModels.Right.Subcostalis.SCModel_17;
    AnyRefNode &R9 = ....Segments.Right.R9Seg.SCR9R11_R_Ins;
    AnyRefNode &R11 = ....Segments.Right.R11Seg.SCR9R11_R_Org;
    viewMuscle = {#include "../DrawSettings/MusDrawSettings.any"};
    viewForce.Visible ??= Off;
  };
};
#endif

MuscleGroup ThoracicMultifidi = {
  AnyMuscleViaPoint MFT4T1 =   {
    AnyMuscleModel &MusMdl = ....MuscleModels.Right.ThoracicMultifidi.MFT4T1;
    AnyRefFrame &Org = ....Segments.T4Seg.MFT4T1NodeROrg;
    AnyRefFrame &Ins = ....Segments.T1Seg.MFT4T1NodeRIns;
    viewMuscle = {#include "../DrawSettings/MusDrawSettings.any"};
    viewForce.Visible ??= Off;
  };

  AnyMuscleViaPoint MFT5T1 =   {
    AnyMuscleModel &MusMdl = ....MuscleModels.Right.ThoracicMultifidi.MFT5T1;
    AnyRefFrame &Org = ....Segments.T5Seg.MFT5T1NodeROrg;
    AnyRefFrame &Ins = ....Segments.T1Seg.MFT5T1NodeRIns;
    viewMuscle = {#include "../DrawSettings/MusDrawSettings.any"};
    viewForce.Visible ??= Off;
  };

  AnyMuscleViaPoint MFT5T2 =   {
    AnyMuscleModel &MusMdl = ....MuscleModels.Right.ThoracicMultifidi.MFT5T2;
    AnyRefFrame &Org = ....Segments.T5Seg.MFT5T2NodeROrg;
    AnyRefFrame &Ins = ....Segments.T2Seg.MFT5T2NodeRIns;
    viewMuscle = {#include "../DrawSettings/MusDrawSettings.any"};
    viewForce.Visible ??= Off;
  };

  AnyMuscleViaPoint MFT6T1 =   {
    AnyMuscleModel &MusMdl = ....MuscleModels.Right.ThoracicMultifidi.MFT6T1;
    AnyRefFrame &Org = ....Segments.T6Seg.MFT6T1NodeROrg;
    AnyRefFrame &Ins = ....Segments.T1Seg.MFT6T1NodeRIns;
    viewMuscle = {#include "../DrawSettings/MusDrawSettings.any"};
    viewForce.Visible ??= Off;
  };

  AnyMuscleViaPoint MFT6T2 =   {
    AnyMuscleModel &MusMdl = ....MuscleModels.Right.ThoracicMultifidi.MFT6T2;
    AnyRefFrame &Org = ....Segments.T6Seg.MFT6T2NodeROrg;
    AnyRefFrame &Ins = ....Segments.T2Seg.MFT6T2NodeRIns;
    viewMuscle = {#include "../DrawSettings/MusDrawSettings.any"};
    viewForce.Visible ??= Off;
  };

  AnyMuscleViaPoint MFT6T3 =   {
    AnyMuscleModel &MusMdl = ....MuscleModels.Right.ThoracicMultifidi.MFT6T3;
    AnyRefFrame &Org = ....Segments.T6Seg.MFT6T3NodeROrg;
    AnyRefFrame &Ins = ....Segments.T3Seg.MFT6T3NodeRIns;
    viewMuscle = {#include "../DrawSettings/MusDrawSettings.any"};
    viewForce.Visible ??= Off;
  };

  AnyMuscleViaPoint MFT7T2 =   {
    AnyMuscleModel &MusMdl = ....MuscleModels.Right.ThoracicMultifidi.MFT7T2;
    AnyRefFrame &Org = ....Segments.T7Seg.MFT7T2NodeROrg;
    AnyRefFrame &Ins = ....Segments.T2Seg.MFT7T2NodeRIns;
    viewMuscle = {#include "../DrawSettings/MusDrawSettings.any"};
    viewForce.Visible ??= Off;
  };

  AnyMuscleViaPoint MFT7T3 =   {
    AnyMuscleModel &MusMdl = ....MuscleModels.Right.ThoracicMultifidi.MFT7T3;
    AnyRefFrame &Org = ....Segments.T7Seg.MFT7T3NodeROrg;
    AnyRefFrame &Ins = ....Segments.T3Seg.MFT7T3NodeRIns;
    viewMuscle = {#include "../DrawSettings/MusDrawSettings.any"};
    viewForce.Visible ??= Off;
  };

  AnyMuscleViaPoint MFT7T4 =   {
    AnyMuscleModel &MusMdl = ....MuscleModels.Right.ThoracicMultifidi.MFT7T4;
    AnyRefFrame &Org = ....Segments.T7Seg.MFT7T4NodeROrg;
    AnyRefFrame &Ins = ....Segments.T4Seg.MFT7T4NodeRIns;
    viewMuscle = {#include "../DrawSettings/MusDrawSettings.any"};
    viewForce.Visible ??= Off;
  };

  AnyMuscleViaPoint MFT8T3 =   {
    AnyMuscleModel &MusMdl = ....MuscleModels.Right.ThoracicMultifidi.MFT8T3;
    AnyRefFrame &Org = ....Segments.T8Seg.MFT8T3NodeROrg;
    AnyRefFrame &Ins = ....Segments.T3Seg.MFT8T3NodeRIns;
    viewMuscle = {#include "../DrawSettings/MusDrawSettings.any"};
    viewForce.Visible ??= Off;
  };

  AnyMuscleViaPoint MFT8T4 =   {
    AnyMuscleModel &MusMdl = ....MuscleModels.Right.ThoracicMultifidi.MFT8T4;
    AnyRefFrame &Org = ....Segments.T8Seg.MFT8T4NodeROrg;
    AnyRefFrame &Ins = ....Segments.T4Seg.MFT8T4NodeRIns;
    viewMuscle = {#include "../DrawSettings/MusDrawSettings.any"};
    viewForce.Visible ??= Off;
  };

  AnyMuscleViaPoint MFT8T5 =   {
    AnyMuscleModel &MusMdl = ....MuscleModels.Right.ThoracicMultifidi.MFT8T5;
    AnyRefFrame &Org = ....Segments.T8Seg.MFT8T5NodeROrg;
    AnyRefFrame &Ins = ....Segments.T5Seg.MFT8T5NodeRIns;
    viewMuscle = {#include "../DrawSettings/MusDrawSettings.any"};
    viewForce.Visible ??= Off;
  };

  AnyMuscleViaPoint MFT9T4 =   {
    AnyMuscleModel &MusMdl = ....MuscleModels.Right.ThoracicMultifidi.MFT9T4;
    AnyRefFrame &Org = ....Segments.T9Seg.MFT9T4NodeROrg;
    AnyRefFrame &Ins = ....Segments.T4Seg.MFT9T4NodeRIns;
    viewMuscle = {#include "../DrawSettings/MusDrawSettings.any"};
    viewForce.Visible ??= Off;
  };

  AnyMuscleViaPoint MFT9T5 =   {
    AnyMuscleModel &MusMdl = ....MuscleModels.Right.ThoracicMultifidi.MFT9T5;
    AnyRefFrame &Org = ....Segments.T9Seg.MFT9T5NodeROrg;
    AnyRefFrame &Ins = ....Segments.T5Seg.MFT9T5NodeRIns;
    viewMuscle = {#include "../DrawSettings/MusDrawSettings.any"};
    viewForce.Visible ??= Off;
  };

  AnyMuscleViaPoint MFT9T6 =   {
    AnyMuscleModel &MusMdl = ....MuscleModels.Right.ThoracicMultifidi.MFT9T6;
    AnyRefFrame &Org = ....Segments.T9Seg.MFT9T6NodeROrg;
    AnyRefFrame &Ins = ....Segments.T6Seg.MFT9T6NodeRIns;
    viewMuscle = {#include "../DrawSettings/MusDrawSettings.any"};
    viewForce.Visible ??= Off;
  };

  AnyMuscleViaPoint MFT10T5 =   {
    AnyMuscleModel &MusMdl = ....MuscleModels.Right.ThoracicMultifidi.MFT10T5;
    AnyRefFrame &Org = ....Segments.T10Seg.MFT10T5NodeROrg;
    AnyRefFrame &Ins = ....Segments.T5Seg.MFT10T5NodeRIns;
    viewMuscle = {#include "../DrawSettings/MusDrawSettings.any"};
    viewForce.Visible ??= Off;
  };

  AnyMuscleViaPoint MFT10T6 =   {
    AnyMuscleModel &MusMdl = ....MuscleModels.Right.ThoracicMultifidi.MFT10T6;
    AnyRefFrame &Org = ....Segments.T10Seg.MFT10T6NodeROrg;
    AnyRefFrame &Ins = ....Segments.T6Seg.MFT10T6NodeRIns;
    viewMuscle = {#include "../DrawSettings/MusDrawSettings.any"};
    viewForce.Visible ??= Off;
  };

  AnyMuscleViaPoint MFT10T7 =   {
    AnyMuscleModel &MusMdl = ....MuscleModels.Right.ThoracicMultifidi.MFT10T7;
    AnyRefFrame &Org = ....Segments.T10Seg.MFT10T7NodeROrg;
    AnyRefFrame &Ins = ....Segments.T7Seg.MFT10T7NodeRIns;
    viewMuscle = {#include "../DrawSettings/MusDrawSettings.any"};
    viewForce.Visible ??= Off;
  };

  AnyMuscleViaPoint MFT11T6 =   {
    AnyMuscleModel &MusMdl = ....MuscleModels.Right.ThoracicMultifidi.MFT11T6;
    AnyRefFrame &Org = ....Segments.T11Seg.MFT11T6NodeROrg;
    AnyRefFrame &Ins = ....Segments.T6Seg.MFT11T6NodeRIns;
    viewMuscle = {#include "../DrawSettings/MusDrawSettings.any"};
    viewForce.Visible ??= Off;
  };

  AnyMuscleViaPoint MFT11T7 =   {
    AnyMuscleModel &MusMdl = ....MuscleModels.Right.ThoracicMultifidi.MFT11T7;
    AnyRefFrame &Org = ....Segments.T11Seg.MFT11T7NodeROrg;
    AnyRefFrame &Ins = ....Segments.T7Seg.MFT11T7NodeRIns;
    viewMuscle = {#include "../DrawSettings/MusDrawSettings.any"};
    viewForce.Visible ??= Off;
  };

  AnyMuscleViaPoint MFT11T8 =   {
    AnyMuscleModel &MusMdl = ....MuscleModels.Right.ThoracicMultifidi.MFT11T8;
    AnyRefFrame &Org = ....Segments.T11Seg.MFT11T8NodeROrg;
    AnyRefFrame &Ins = ....Segments.T8Seg.MFT11T8NodeRIns;
    viewMuscle = {#include "../DrawSettings/MusDrawSettings.any"};
    viewForce.Visible ??= Off;
  };

  AnyMuscleViaPoint MFT12T7 =   {
    AnyMuscleModel &MusMdl = ....MuscleModels.Right.ThoracicMultifidi.MFT12T7;
    AnyRefFrame &Org = ....Segments.T12Seg.MFT12T7NodeROrg;
    AnyRefFrame &Ins = ....Segments.T7Seg.MFT12T7NodeRIns;
    viewMuscle = {#include "../DrawSettings/MusDrawSettings.any"};
    viewForce.Visible ??= Off;
  };

  AnyMuscleViaPoint MFT12T8 =   {
    AnyMuscleModel &MusMdl = ....MuscleModels.Right.ThoracicMultifidi.MFT12T8;
    AnyRefFrame &Org = ....Segments.T12Seg.MFT12T8NodeROrg;
    AnyRefFrame &Ins = ....Segments.T8Seg.MFT12T8NodeRIns;
    viewMuscle = {#include "../DrawSettings/MusDrawSettings.any"};
    viewForce.Visible ??= Off;
  };

  AnyMuscleViaPoint MFT12T9 =   {
    AnyMuscleModel &MusMdl = ....MuscleModels.Right.ThoracicMultifidi.MFT12T9;
    AnyRefFrame &Org = ....Segments.T12Seg.MFT12T9NodeROrg;
    AnyRefFrame &Ins = ....Segments.T9Seg.MFT12T9NodeRIns;
    viewMuscle = {#include "../DrawSettings/MusDrawSettings.any"};
    viewForce.Visible ??= Off;
  };

  AnyMuscleViaPoint MFL1T8 =   {
    AnyMuscleModel &MusMdl = ....MuscleModels.Right.ThoracicMultifidi.MFL1T8;
    AnyRefFrame &Org = ....Segments.L1Seg.MFL1T8NodeROrg;
    AnyRefFrame &Ins = ....Segments.T8Seg.MFL1T8NodeRIns;
    viewMuscle = {#include "../DrawSettings/MusDrawSettings.any"};
    viewForce.Visible ??= Off;
  };

  AnyMuscleViaPoint MFL1T9 =   {
    AnyMuscleModel &MusMdl = ....MuscleModels.Right.ThoracicMultifidi.MFL1T9;
    AnyRefFrame &Org = ....Segments.L1Seg.MFL1T9NodeROrg;
    AnyRefFrame &Ins = ....Segments.T9Seg.MFL1T9NodeRIns;
    viewMuscle = {#include "../DrawSettings/MusDrawSettings.any"};
    viewForce.Visible ??= Off;

  };

  AnyMuscleViaPoint MFL1T10 =   {
    AnyMuscleModel &MusMdl = ....MuscleModels.Right.ThoracicMultifidi.MFL1T10;
    AnyRefFrame &Org = ....Segments.L1Seg.MFL1T10NodeROrg;
    AnyRefFrame &Ins = ....Segments.T10Seg.MFL1T10NodeRIns;
    viewMuscle = {#include "../DrawSettings/MusDrawSettings.any"};
    viewForce.Visible ??= Off;

  };

  AnyMuscleViaPoint MFL2T9 =   {
    AnyMuscleModel &MusMdl = ....MuscleModels.Right.ThoracicMultifidi.MFL2T9;
    AnyRefFrame &Org = ....Segments.L2Seg.MFL2T9NodeROrg;
    AnyRefFrame &Ins = ....Segments.T9Seg.MFL2T9NodeRIns;
    viewMuscle = {#include "../DrawSettings/MusDrawSettings.any"};
    viewForce.Visible ??= Off;

  };

  AnyMuscleViaPoint MFL2T10 =   {
    AnyMuscleModel &MusMdl = ....MuscleModels.Right.ThoracicMultifidi.MFL2T10;
    AnyRefFrame &Org = ....Segments.L2Seg.MFL2T10NodeROrg;
    AnyRefFrame &Ins = ....Segments.T10Seg.MFL2T10NodeRIns;
    viewMuscle = {#include "../DrawSettings/MusDrawSettings.any"};
    viewForce.Visible ??= Off;

  };

  AnyMuscleViaPoint MFL2T11 =   {
    AnyMuscleModel &MusMdl = ....MuscleModels.Right.ThoracicMultifidi.MFL2T11;
    AnyRefFrame &Org = ....Segments.L2Seg.MFL2T11NodeROrg;
    AnyRefFrame &Ins = ....Segments.T11Seg.MFL2T11NodeRIns;
    viewMuscle = {#include "../DrawSettings/MusDrawSettings.any"};
    viewForce.Visible ??= Off;

  };

  AnyMuscleViaPoint MFL3T10 =   {
    AnyMuscleModel &MusMdl = ....MuscleModels.Right.ThoracicMultifidi.MFL3T10;
    AnyRefFrame &Org = ....Segments.L3Seg.MFL3T10NodeROrg;
    AnyRefFrame &Ins = ....Segments.T10Seg.MFL3T10NodeRIns;
    viewMuscle = {#include "../DrawSettings/MusDrawSettings.any"};
    viewForce.Visible ??= Off;

  };

  AnyMuscleViaPoint MFL3T11 =   {
    AnyMuscleModel &MusMdl = ....MuscleModels.Right.ThoracicMultifidi.MFL3T11;
    AnyRefFrame &Org = ....Segments.L3Seg.MFL3T11NodeROrg;
    AnyRefFrame &Ins = ....Segments.T11Seg.MFL3T11NodeRIns;
    viewMuscle = {#include "../DrawSettings/MusDrawSettings.any"};
    viewForce.Visible ??= Off;

  };

  AnyMuscleViaPoint MFL3T12 =   {
    AnyMuscleModel &MusMdl = ....MuscleModels.Right.ThoracicMultifidi.MFL3T12;
    AnyRefFrame &Org = ....Segments.L3Seg.MFL3T12NodeROrg;
    AnyRefFrame &Ins = ....Segments.T12Seg.MFL3T12NodeRIns;
    viewMuscle = {#include "../DrawSettings/MusDrawSettings.any"};
    viewForce.Visible ??= Off;

  };

  AnyMuscleViaPoint MFL4T11 =   {
    AnyMuscleModel &MusMdl = ....MuscleModels.Right.ThoracicMultifidi.MFL4T11;
    AnyRefFrame &Org = ....Segments.L4Seg.MFL4T11NodeROrg;
    AnyRefFrame &Ins = ....Segments.T11Seg.MFL4T11NodeRIns;
    viewMuscle = {#include "../DrawSettings/MusDrawSettings.any"};
    viewForce.Visible ??= Off;

  };

  AnyMuscleViaPoint MFL4T12 =   {
    AnyMuscleModel &MusMdl = ....MuscleModels.Right.ThoracicMultifidi.MFL4T12;
    AnyRefFrame &Org = ....Segments.L4Seg.MFL4T12NodeROrg;
    AnyRefFrame &Ins = ....Segments.T12Seg.MFL4T12NodeRIns;
    viewMuscle = {#include "../DrawSettings/MusDrawSettings.any"};
    viewForce.Visible ??= Off;

  };

  AnyMuscleViaPoint MFL5T12 =   {
    AnyMuscleModel &MusMdl = ....MuscleModels.Right.ThoracicMultifidi.MFL5T12;
    AnyRefFrame &Org = ....Segments.L5Seg.MFL5T12NodeROrg;
    AnyRefFrame &Ins = ....Segments.T12Seg.MFL5T12NodeRIns;
    viewMuscle = {#include "../DrawSettings/MusDrawSettings.any"};
    viewForce.Visible ??= Off;

  };
};

#if BM_TRUNK_THORACIC_MODEL == _THORACIC_MODEL_FLEXIBLE_
MuscleGroup RotatoresBrevis = {
  AnyMuscleViaPoint RotatoresBrevisT1C7 =   {
    AnyMuscleModel &MusMdl = ....MuscleModels.Right.RotatoresBrevis.RotatoresBrevis_1;
    AnyRefFrame &Org = ....Segments.T1Seg.Right.RotatoresBrevisT1C7Node;
    AnyRefFrame &Ins = ....Segments.C7Seg.Right.RotatoresBrevisT1C7Node;
    viewMuscle = {#include "../DrawSettings/MusDrawSettings.any"};
    viewForce.Visible ??= Off;
  };
  AnyMuscleViaPoint RotatoresBrevisT2T1 =   {
    AnyMuscleModel &MusMdl = ....MuscleModels.Right.RotatoresBrevis.RotatoresBrevis_2;
    AnyRefFrame &Org = ....Segments.T2Seg.Right.RotatoresBrevisT2T1Node;
    AnyRefFrame &Ins = ....Segments.T1Seg.Right.RotatoresBrevisT2T1Node;
    viewMuscle = {#include "../DrawSettings/MusDrawSettings.any"};
    viewForce.Visible ??= Off;
  };
  AnyMuscleViaPoint RotatoresBrevisT3T2 =   {
    AnyMuscleModel &MusMdl = ....MuscleModels.Right.RotatoresBrevis.RotatoresBrevis_3;
    AnyRefFrame &Org = ....Segments.T3Seg.Right.RotatoresBrevisT3T2Node;
    AnyRefFrame &Ins = ....Segments.T2Seg.Right.RotatoresBrevisT3T2Node;
    viewMuscle = {#include "../DrawSettings/MusDrawSettings.any"};
    viewForce.Visible ??= Off;
  };
  AnyMuscleViaPoint RotatoresBrevisT4T3 =   {
    AnyMuscleModel &MusMdl = ....MuscleModels.Right.RotatoresBrevis.RotatoresBrevis_4;
    AnyRefFrame &Org = ....Segments.T4Seg.Right.RotatoresBrevisT4T3Node;
    AnyRefFrame &Ins = ....Segments.T3Seg.Right.RotatoresBrevisT4T3Node;
    viewMuscle = {#include "../DrawSettings/MusDrawSettings.any"};
    viewForce.Visible ??= Off;
  };
  AnyMuscleViaPoint RotatoresBrevisT5T4 =   {
    AnyMuscleModel &MusMdl = ....MuscleModels.Right.RotatoresBrevis.RotatoresBrevis_5;
    AnyRefFrame &Org = ....Segments.T5Seg.Right.RotatoresBrevisT5T4Node;
    AnyRefFrame &Ins = ....Segments.T4Seg.Right.RotatoresBrevisT5T4Node;
    viewMuscle = {#include "../DrawSettings/MusDrawSettings.any"};
    viewForce.Visible ??= Off;
  };
  AnyMuscleViaPoint RotatoresBrevisT6T5 =   {
    AnyMuscleModel &MusMdl = ....MuscleModels.Right.RotatoresBrevis.RotatoresBrevis_6;
    AnyRefFrame &Org = ....Segments.T6Seg.Right.RotatoresBrevisT6T5Node;
    AnyRefFrame &Ins = ....Segments.T5Seg.Right.RotatoresBrevisT6T5Node;
    viewMuscle = {#include "../DrawSettings/MusDrawSettings.any"};
    viewForce.Visible ??= Off;
  };
  AnyMuscleViaPoint RotatoresBrevisT7T6 =   {
    AnyMuscleModel &MusMdl = ....MuscleModels.Right.RotatoresBrevis.RotatoresBrevis_7;
    AnyRefFrame &Org = ....Segments.T7Seg.Right.RotatoresBrevisT7T6Node;
    AnyRefFrame &Ins = ....Segments.T6Seg.Right.RotatoresBrevisT7T6Node;
    viewMuscle = {#include "../DrawSettings/MusDrawSettings.any"};
    viewForce.Visible ??= Off;
  };
  AnyMuscleViaPoint RotatoresBrevisT8T7 =   {
    AnyMuscleModel &MusMdl = ....MuscleModels.Right.RotatoresBrevis.RotatoresBrevis_8;
    AnyRefFrame &Org = ....Segments.T8Seg.Right.RotatoresBrevisT8T7Node;
    AnyRefFrame &Ins = ....Segments.T7Seg.Right.RotatoresBrevisT8T7Node;
    viewMuscle = {#include "../DrawSettings/MusDrawSettings.any"};
    viewForce.Visible ??= Off;
  };
  AnyMuscleViaPoint RotatoresBrevisT9T8 =   {
    AnyMuscleModel &MusMdl = ....MuscleModels.Right.RotatoresBrevis.RotatoresBrevis_9;
    AnyRefFrame &Org = ....Segments.T9Seg.Right.RotatoresBrevisT9T8Node;
    AnyRefFrame &Ins = ....Segments.T8Seg.Right.RotatoresBrevisT9T8Node;
    viewMuscle = {#include "../DrawSettings/MusDrawSettings.any"};
    viewForce.Visible ??= Off;
  };
  AnyMuscleViaPoint RotatoresBrevisT10T9 =   {
    AnyMuscleModel &MusMdl = ....MuscleModels.Right.RotatoresBrevis.RotatoresBrevis_10;
    AnyRefFrame &Org = ....Segments.T10Seg.Right.RotatoresBrevisT10T9Node;
    AnyRefFrame &Ins = ....Segments.T9Seg.Right.RotatoresBrevisT10T9Node;
    viewMuscle = {#include "../DrawSettings/MusDrawSettings.any"};
    viewForce.Visible ??= Off;
  };
  AnyMuscleViaPoint RotatoresBrevisT11T10 =   {
    AnyMuscleModel &MusMdl = ....MuscleModels.Right.RotatoresBrevis.RotatoresBrevis_11;
    AnyRefFrame &Org = ....Segments.T11Seg.Right.RotatoresBrevisT11T10Node;
    AnyRefFrame &Ins = ....Segments.T10Seg.Right.RotatoresBrevisT11T10Node;
    viewMuscle = {#include "../DrawSettings/MusDrawSettings.any"};
    viewForce.Visible ??= Off;
  };
  AnyMuscleViaPoint RotatoresBrevisT12T11 =   {
    AnyMuscleModel &MusMdl = ....MuscleModels.Right.RotatoresBrevis.RotatoresBrevis_12;
    AnyRefFrame &Org = ....Segments.T12Seg.Right.RotatoresBrevisT12T11Node;
    AnyRefFrame &Ins = ....Segments.T11Seg.Right.RotatoresBrevisT12T11Node;
    viewMuscle = {#include "../DrawSettings/MusDrawSettings.any"};
    viewForce.Visible ??= Off;
  };
};

MuscleGroup RotatoresLongus = {
  AnyMuscleViaPoint RotatoresLongusT2C7 =   {
    AnyMuscleModel &MusMdl = ....MuscleModels.Right.RotatoresLongus.RotatoresLongus_1;
    AnyRefFrame &Org = ....Segments.T2Seg.Right.RotatoresLongusT2C7Node;
    AnyRefFrame &Ins = ....Segments.C7Seg.Right.RotatoresLongusT2C7Node;
    viewMuscle = {#include "../DrawSettings/MusDrawSettings.any"};
    viewForce.Visible ??= Off;
  };
  AnyMuscleViaPoint RotatoresLongusT3T1 =   {
    AnyMuscleModel &MusMdl = ....MuscleModels.Right.RotatoresLongus.RotatoresLongus_2;
    AnyRefFrame &Org = ....Segments.T3Seg.Right.RotatoresLongusT3T1Node;
    AnyRefFrame &Ins = ....Segments.T1Seg.Right.RotatoresLongusT3T1Node;
    viewMuscle = {#include "../DrawSettings/MusDrawSettings.any"};
    viewForce.Visible ??= Off;
  };
  AnyMuscleViaPoint RotatoresLongusT4T2 =   {
    AnyMuscleModel &MusMdl = ....MuscleModels.Right.RotatoresLongus.RotatoresLongus_3;
    AnyRefFrame &Org = ....Segments.T4Seg.Right.RotatoresLongusT4T2Node;
    AnyRefFrame &Ins = ....Segments.T2Seg.Right.RotatoresLongusT4T2Node;
    viewMuscle = {#include "../DrawSettings/MusDrawSettings.any"};
    viewForce.Visible ??= Off;
  };
  AnyMuscleViaPoint RotatoresLongusT5T3 =   {
    AnyMuscleModel &MusMdl = ....MuscleModels.Right.RotatoresLongus.RotatoresLongus_4;
    AnyRefFrame &Org = ....Segments.T5Seg.Right.RotatoresLongusT5T3Node;
    AnyRefFrame &Ins = ....Segments.T3Seg.Right.RotatoresLongusT5T3Node;
    viewMuscle = {#include "../DrawSettings/MusDrawSettings.any"};
    viewForce.Visible ??= Off;
  };
  AnyMuscleViaPoint RotatoresLongusT6T4 =   {
    AnyMuscleModel &MusMdl = ....MuscleModels.Right.RotatoresLongus.RotatoresLongus_5;
    AnyRefFrame &Org = ....Segments.T6Seg.Right.RotatoresLongusT6T4Node;
    AnyRefFrame &Ins = ....Segments.T4Seg.Right.RotatoresLongusT6T4Node;
    viewMuscle = {#include "../DrawSettings/MusDrawSettings.any"};
    viewForce.Visible ??= Off;
  };
  AnyMuscleViaPoint RotatoresLongusT7T5 =   {
    AnyMuscleModel &MusMdl = ....MuscleModels.Right.RotatoresLongus.RotatoresLongus_6;
    AnyRefFrame &Org = ....Segments.T7Seg.Right.RotatoresLongusT7T5Node;
    AnyRefFrame &Ins = ....Segments.T5Seg.Right.RotatoresLongusT7T5Node;
    viewMuscle = {#include "../DrawSettings/MusDrawSettings.any"};
    viewForce.Visible ??= Off;
  };
  AnyMuscleViaPoint RotatoresLongusT8T6 =   {
    AnyMuscleModel &MusMdl = ....MuscleModels.Right.RotatoresLongus.RotatoresLongus_7;
    AnyRefFrame &Org = ....Segments.T8Seg.Right.RotatoresLongusT8T6Node;
    AnyRefFrame &Ins = ....Segments.T6Seg.Right.RotatoresLongusT8T6Node;
    viewMuscle = {#include "../DrawSettings/MusDrawSettings.any"};
    viewForce.Visible ??= Off;
  };
  AnyMuscleViaPoint RotatoresLongusT9T7 =   {
    AnyMuscleModel &MusMdl = ....MuscleModels.Right.RotatoresLongus.RotatoresLongus_8;
    AnyRefFrame &Org = ....Segments.T9Seg.Right.RotatoresLongusT9T7Node;
    AnyRefFrame &Ins = ....Segments.T7Seg.Right.RotatoresLongusT9T7Node;
    viewMuscle = {#include "../DrawSettings/MusDrawSettings.any"};
    viewForce.Visible ??= Off;
  };
  AnyMuscleViaPoint RotatoresLongusT10T8 =   {
    AnyMuscleModel &MusMdl = ....MuscleModels.Right.RotatoresLongus.RotatoresLongus_9;
    AnyRefFrame &Org = ....Segments.T10Seg.Right.RotatoresLongusT10T8Node;
    AnyRefFrame &Ins = ....Segments.T8Seg.Right.RotatoresLongusT10T8Node;
    viewMuscle = {#include "../DrawSettings/MusDrawSettings.any"};
    viewForce.Visible ??= Off;
  };
  AnyMuscleViaPoint RotatoresLongusT11T9 =   {
    AnyMuscleModel &MusMdl = ....MuscleModels.Right.RotatoresLongus.RotatoresLongus_10;
    AnyRefFrame &Org = ....Segments.T11Seg.Right.RotatoresLongusT11T9Node;
    AnyRefFrame &Ins = ....Segments.T9Seg.Right.RotatoresLongusT11T9Node;
    viewMuscle = {#include "../DrawSettings/MusDrawSettings.any"};
    viewForce.Visible ??= Off;
  };
  AnyMuscleViaPoint RotatoresLongusT12T10 =   {
    AnyMuscleModel &MusMdl = ....MuscleModels.Right.RotatoresLongus.RotatoresLongus_11;
    AnyRefFrame &Org = ....Segments.T12Seg.Right.RotatoresLongusT12T10Node;
    AnyRefFrame &Ins = ....Segments.T10Seg.Right.RotatoresLongusT12T10Node;
    viewMuscle = {#include "../DrawSettings/MusDrawSettings.any"};
    viewForce.Visible ??= Off;
  };
};

MuscleGroup TransversusThoracis = {
  AnyMuscleViaPoint TrThR2S = {
    AnyMuscleModel &MusMdl = ....MuscleModels.Right.TransversusThoracis.TransvThModel_1;
    AnyRefNode &R2 = ....Segments.Right.R2Seg.TrThR2SNodeROrg;
    AnyRefNode &S = ....Segments.SternalBodySeg.TrThR2SNodeRIns;
    viewMuscle = {#include "../DrawSettings/MusDrawSettings.any"};
    viewForce.Visible ??= Off;
  };

  AnyMuscleViaPoint TrThR2R4S = {
    AnyMuscleModel &MusMdl = ....MuscleModels.Right.TransversusThoracis.TransvThModel_2;
    AnyRefNode &R4 = ....Segments.Right.R2Seg.TrThR2R4NodeROrg;
    AnyRefNode &S = ....Segments.Right.R4Seg.TrThR2R4NodeRIns;
    viewMuscle = {#include "../DrawSettings/MusDrawSettings.any"};
    viewForce.Visible ??= Off;
  };

  AnyMuscleViaPoint TrThR3S = {
    AnyMuscleModel &MusMdl = ....MuscleModels.Right.TransversusThoracis.TransvThModel_3;
    AnyRefNode &R3 = ....Segments.Right.R3Seg.TrThR3SNodeROrg;
    AnyRefNode &S = ....Segments.SternalBodySeg.TrThR3SNodeRIns;
    viewMuscle = {#include "../DrawSettings/MusDrawSettings.any"};
    viewForce.Visible ??= Off;
  };

  AnyMuscleViaPoint TrThR3R5S = {
    AnyMuscleModel &MusMdl = ....MuscleModels.Right.TransversusThoracis.TransvThModel_4;
    AnyRefNode &R3 = ....Segments.Right.R3Seg.TrThR3R5NodeROrg;
    AnyRefNode &S = ....Segments.Right.R5Seg.TrThR3R5NodeRIns;
    viewMuscle = {#include "../DrawSettings/MusDrawSettings.any"};
    viewForce.Visible ??= Off;
  };

  AnyMuscleViaPoint TrThR4S = {
    AnyMuscleModel &MusMdl = ....MuscleModels.Right.TransversusThoracis.TransvThModel_5;
    AnyRefNode &R4 = ....Segments.Right.R4Seg.TrThR4SNodeROrg;
    AnyRefNode &S = ....Segments.SternalBodySeg.TrThR4SNodeRIns;
    viewMuscle = {#include "../DrawSettings/MusDrawSettings.any"};
    viewForce.Visible ??= Off;
  };

  AnyMuscleViaPoint TrThR4R6S = {
    AnyMuscleModel &MusMdl = ....MuscleModels.Right.TransversusThoracis.TransvThModel_6;
    AnyRefNode &R4 = ....Segments.Right.R4Seg.TrThR4R6NodeROrg;
    AnyRefNode &S = ....Segments.Right.R6Seg.TrThR4R6NodeRIns;
    viewMuscle = {#include "../DrawSettings/MusDrawSettings.any"};
    viewForce.Visible ??= Off;
  };

  AnyMuscleViaPoint TrThR5S = {
    AnyMuscleModel &MusMdl = ....MuscleModels.Right.TransversusThoracis.TransvThModel_7;
    AnyRefNode &R5 = ....Segments.Right.R5Seg.TrThR5SNodeROrg;
    AnyRefNode &S = ....Segments.SternalBodySeg.TrThR5SNodeRIns;
    viewMuscle = {#include "../DrawSettings/MusDrawSettings.any"};
    viewForce.Visible ??= Off;
  };

  AnyMuscleViaPoint TrThR5R7S = {
    AnyMuscleModel &MusMdl = ....MuscleModels.Right.TransversusThoracis.TransvThModel_8;
    AnyRefNode &R4 = ....Segments.Right.R5Seg.TrThR5R7NodeROrg;
    AnyRefNode &S56 = ....Segments.Right.R7Seg.TrThR5R7NodeRIns;
    viewMuscle = {#include "../DrawSettings/MusDrawSettings.any"};
    viewForce.Visible ??= Off;
  };

  AnyMuscleViaPoint TrThR6S = {
    AnyMuscleModel &MusMdl = ....MuscleModels.Right.TransversusThoracis.TransvThModel_9;
    AnyRefNode &R4 = ....Segments.Right.R6Seg.TrThR6SNodeROrg;
    AnyRefNode &S56 = ....Segments.SternalBodySeg.TrThR6SNodeRIns;
    viewMuscle = {#include "../DrawSettings/MusDrawSettings.any"};
    viewForce.Visible ??= Off;
  };

  AnyMuscleViaPoint TrThR7S = {
    AnyMuscleModel &MusMdl = ....MuscleModels.Right.TransversusThoracis.TransvThModel_10;
    AnyRefNode &R7 = ....Segments.Right.R7Seg.TrThR7SNodeROrg;
    AnyRefNode &S8 = ....Segments.SternalBodySeg.TrThNodeRIns;
  };

  AnyMuscleViaPoint TrThR8S = {
    AnyMuscleModel &MusMdl = ....MuscleModels.Right.TransversusThoracis.TransvThModel_11;
    AnyRefNode &R8 = ....Segments.Right.R8Seg.TrThR8SNodeROrg;
    AnyRefNode &S8 = ....Segments.SternalBodySeg.TrThNodeRIns;
  };

  AnyMuscleViaPoint TrThR9S = {
    AnyMuscleModel &MusMdl = ....MuscleModels.Right.TransversusThoracis.TransvThModel_12;
    AnyRefNode &R9 = ....Segments.Right.R9Seg.TrThR9SNodeROrg;
    AnyRefNode &S8 = ....Segments.SternalBodySeg.TrThNodeRIns;
  };

  AnyMuscleViaPoint TrThR10S = {
    AnyMuscleModel &MusMdl = ....MuscleModels.Right.TransversusThoracis.TransvThModel_13;
    AnyRefNode &R10 = ....Segments.Right.R10Seg.TrThR10SNodeROrg;
    AnyRefNode &S8 = ....Segments.SternalBodySeg.TrThNodeRIns;
  };
};
#endif

#if BM_TRUNK_MUSCLES & BM_TRUNK_CAVITY_MODEL == _CAVITY_MODEL_VOLUME_
  MuscleGroup PelvicFloor = {
    AnyMuscleViaPoint Puporectalis1= {
      AnyMuscleModel &MusMdl = ....MuscleModels.Right.Puporectalis.Puporectalis_1;
      AnyRefNode &Org = ....Segments.PelvisSeg.Puporectalis1NodeR;
      AnyRefNode &Ins = ....Segments.SacrumSeg.Puporectalis1NodeR;
      viewMuscle = {#include "../DrawSettings/MusDrawSettings.any"};
      viewForce.Visible ??= Off;
    };
      AnyMuscleViaPoint Puporectalis2= {
      AnyMuscleModel &MusMdl = ....MuscleModels.Right.Puporectalis.Puporectalis_2;
      AnyRefNode &Org = ....Segments.PelvisSeg.Puporectalis2NodeR;
      AnyRefNode &Ins = ....Segments.SacrumSeg.Puporectalis2NodeR;
      viewMuscle = {#include "../DrawSettings/MusDrawSettings.any"};
      viewForce.Visible ??= Off;
    };

    AnyMuscleViaPoint Pupococcygeus1= {
      AnyMuscleModel &MusMdl = ....MuscleModels.Right.Pupococcygeus.Pupococcygeus_1;
      AnyRefNode &Org = ....Segments.PelvisSeg.Pupococcygeus1NodeR;
      AnyRefNode &Ins = ....Segments.SacrumSeg.Pupococcygeus1NodeR;
      viewMuscle = {#include "../DrawSettings/MusDrawSettings.any"};
      viewForce.Visible ??= Off;
    };
      AnyMuscleViaPoint Pupococcygeus2= {
      AnyMuscleModel &MusMdl = ....MuscleModels.Right.Pupococcygeus.Pupococcygeus_2;
      AnyRefNode &Org = ....Segments.PelvisSeg.Pupococcygeus2NodeR;
      AnyRefNode &Ins = ....Segments.SacrumSeg.Pupococcygeus2NodeR;
      viewMuscle = {#include "../DrawSettings/MusDrawSettings.any"};
      viewForce.Visible ??= Off;
    };
  };
#endif
#endif
